Simulations: Version=6
  DataStore
  Folder Slurp
    Simulation Slurp1
      Clock: StartDate=1980-07-01; EndDate=1981-06-30
      Weather: FileName=%root%\Examples\WeatherFiles\lincoln.met
      Summary
      SoilArbitrator
      Zone Field: Area=1; Slope=0
        Folder Managers
          Manager AutomaticFertiliser
            AllowFertiliser = yes
            Depth2SoilN = 500
            CriticalSoilN = 20
            FertNAmount = 25
            FertType = UreaN
            FertApplicationDepth = 1
            FertMinimumDays = 1
```csharp
using System;
using Models.Core;
using Models.PMF;
using Models.Soils;
using APSIM.Shared.Utilities;
using System.Xml.Serialization;

namespace Models
{
	[Serializable]
	public class Script : Model
	{
		[Link] Clock Clock;
		[Link] Fertiliser fertiliser;
		[Link] ISummary summary = null;
		[Link] Soil Soil;

		//User inputs from properties tab
		[Description("Turn ferliser applications on? ")]
		public yesnoType AllowFertiliser { get; set; }
		
		[Description("Depth to calculate available soil N (mm): ")]
		public double Depth2SoilN { get; set; }

		[Description("Minimum available N, triggers an application (kgN/ha): ")]
		public double CriticalSoilN { get; set; }

		[Description("Amount of N fertiliser for each application (kgN/ha): ")]
		public double FertNAmount { get; set; }

		[Description("Type of N fertiliser to apply: ")]
		public Fertiliser.Types FertType { get; set; }

		[Description("Depth at which to apply the fertiliser (mm): ")]
		public double FertApplicationDepth { get; set; }
	   
		[Description("Minimum period between applications (days): ")]
		public double FertMinimumDays { get; set; }
	   
		public enum yesnoType
		{
			/// <summary>a positive answer</summary>
			yes,
			/// <summary>a negative answer</summary>
			no
		}

		[XmlIgnore] public double TopMineralN { get; set; }
		
		private DateTime lastApplicationDate;
		private bool fertiliserIsAllowed;
		private int nLayers;

		[EventSubscribe("StartOfSimulation")]
		private void OnStartOfSimulation(object sender, EventArgs e)
		{
			fertiliserIsAllowed = (AllowFertiliser == yesnoType.yes);
			nLayers = Soil.SoilWater.Thickness.Length;
		}

		[EventSubscribe("DoManagement")]
		private void OnDoManagement(object sender, EventArgs e)
		{
			double daysSinceLastApplication = (Clock.Today - lastApplicationDate).TotalDays;
			
			// get the N stored in the soil
			double depthFromSurface = 0.0;
			double fracLayer = 0.0;
			TopMineralN = 0.0;
			for (int layer = 0; layer < nLayers; layer++)
			{
				fracLayer = Math.Min(1.0, (Depth2SoilN - depthFromSurface) / Soil.SoilWater.Thickness[layer]);
				TopMineralN += (Soil.SoilNitrogen.NO3[layer]
				+ Soil.SoilNitrogen.NH4[layer]
				+ Soil.SoilNitrogen.urea[layer])
				* fracLayer;
				depthFromSurface += Soil.SoilWater.Thickness[layer];
				if (depthFromSurface >= Depth2SoilN)
					layer = nLayers;
			}

			if (fertiliserIsAllowed && (daysSinceLastApplication >= FertMinimumDays) && (TopMineralN <= CriticalSoilN))
			{
				fertiliser.Apply(FertNAmount, FertType, FertApplicationDepth);
				lastApplicationDate = Clock.Today;
			}
		}
	}
}
```
          Manager AutomaticIrrigation
            allowIrrigation = yes
            seasonStart = 15-Aug
            seasonEnd = 30-May
            seasonsAllocation = 10000
            triggerDeficit = 75
            targetDeficit = 99
            returndays = 1
            maximumAmount = 30
            depthPAWC = 300
```csharp
using System;
using Models.Core;
using Models.PMF;
using Models.Soils;
using System.Xml.Serialization;
using Models.PMF;
using APSIM.Shared.Utilities;

        
namespace Models
{
	[Serializable] 
	[System.Xml.Serialization.XmlInclude(typeof(Model))]
	public class Script : Model
	{
		//Communication to other modules
		[Link] ISummary summary = null;
		[Link] Irrigation Irrigation;
		[Link] Clock Clock;
		[Link] Soil Soil;
		[Link(IsOptional = true)] ICrop existingCrop;
	   
		//User inputs from properties tab
		[Description("Turn irrigation on?")]
		public answerType allowIrrigation { get; set; }
		[Description("Start of irrigation season (dd-MMM)")]
		public string seasonStart { get; set; }
		[Description("End of irrigation season (dd-MMM)")]
		public string seasonEnd { get; set; }
		[Description("Season allocation (mm)")]
		public double seasonsAllocation { get; set; }
		[Description("Deficit to trigger irrigation (% PAWC)")]
		public double triggerDeficit { get; set; }
		[Description("Deficit to stop irrigaton (% PAWC)")]
		public double targetDeficit { get; set; }
		[Description("Minimum days for irrigation to return")]
		public double returndays { get; set; }
		[Description("Maximum irrigation application (mm/day)")]
		public double maximumAmount { get; set; }
		[Description("Depth to calculate PAWC (mm)")]
		public double depthPAWC { get; set; }
	   
		public enum answerType
		{
			/// <summary>a positive answer</summary>
			yes,
			/// <summary>a negative answer</summary>
			no
		}

		//Class members
		[XmlIgnore] public double TopSWdeficit { get; set; }
		[XmlIgnore] public double TopSWC { get; set; }
		[XmlIgnore] public double DaysSinceIrrigation { get; set; }
		[XmlIgnore] public double AmountToApply { get; set; }
		[XmlIgnore] public double SeasonAppliedAmount { get; set; }
		
		private bool IrrigationIsAllowed { get; set; }
		private bool SeasonIsOpen { get; set; }
		private bool CropIsActive { get; set; }
		private bool IrrigatorIsAvailable { get; set; }
		private bool SoilIsDry { get; set; }

		private DateTime StartDate;
		private DateTime EndDate;
		private double TopDUL;
		private double TopLL;
		private int nLayers;
	
		//Calculate static soil variables
		[EventSubscribe("StartOfSimulation")]
		private void OnStartOfSimulation(object sender, EventArgs e)
		{   
			//Set the season dates
			StartDate = DateTime.Parse(seasonStart + "-" + Clock.Today.Year.ToString());
			EndDate = DateTime.Parse(seasonEnd + "-" + Clock.Today.Year.ToString());
			
			//Can we irrigate at all?
			IrrigationIsAllowed = false; 
			if (allowIrrigation == answerType.yes)
				IrrigationIsAllowed = true; 

			//Calculate soil water variables
			double depthFromSurface = 0.0;
			double fracLayer = 0.0;
			nLayers = Soil.SoilWater.Thickness.Length;
			for (int layer = 0; layer < nLayers; layer++)
			{
				fracLayer = Math.Min(1.0, (depthPAWC - depthFromSurface) / Soil.SoilWater.Thickness[layer]);
				TopLL += Soil.SoilWater.LL15mm[layer] * fracLayer;
				TopDUL += Soil.SoilWater.DULmm[layer] * fracLayer;
				depthFromSurface += Soil.SoilWater.Thickness[layer];
				if (depthFromSurface >= depthPAWC)
					layer = nLayers;
			}
		}
	   	  
		//Determine daily requirement for irrigation
		[EventSubscribe("StartOfDay")]
		private void OnStartOfDay(object sender, EventArgs e)
		{
			//Can we irrigate today?		  
			SeasonIsOpen = isBetween(Clock.Today, StartDate, EndDate);

			//Is there a crop in the ground that needs irrigation?
			CropIsActive = false;
			if ((existingCrop != null) && (existingCrop.IsAlive))
				CropIsActive = true;
	      
			//Is the irrigator available?
			IrrigatorIsAvailable = false;
			DaysSinceIrrigation += 1;
			if (DaysSinceIrrigation >= returndays)
				IrrigatorIsAvailable = true;
	      
			//Is the soil dry enough to require irrigation?
			SoilIsDry = false;
			double depthFromSurface = 0.0;
			double fracLayer = 0.0;
			TopSWC = 0.0;
			for (int layer = 0; layer < nLayers; layer++)
			//for (int layer = 0; depthFromSurface < depthPAWC + Soil.SoilWater.Thickness[layer]; layer++)
			{
				fracLayer = Math.Min(1.0, (depthPAWC - depthFromSurface) / Soil.SoilWater.Thickness[layer]);
				TopSWC += Soil.SoilWater.SWmm[layer] * fracLayer;
				depthFromSurface += Soil.SoilWater.Thickness[layer];
				if (depthFromSurface >= depthPAWC)
					layer = nLayers;
			}
			
			TopSWdeficit = TopSWC - TopDUL;
			if (Math.Max(0.0, -TopSWdeficit) >= (TopDUL - TopLL) * (100 - triggerDeficit) / 100)
				SoilIsDry = true;
	            
			//Are all the conditions ratifying irrigation
			if (IrrigationIsAllowed && SeasonIsOpen && CropIsActive && IrrigatorIsAvailable && SoilIsDry)
			{
				//Lets bloody well irrigate then!!!!
				AmountToApply = TopDUL * targetDeficit / 100 - TopSWC;
				AmountToApply = Math.Max(0.0, Math.Min(AmountToApply, seasonsAllocation - SeasonAppliedAmount));
				Irrigation.Apply(AmountToApply);
				DaysSinceIrrigation = 0;
				SeasonAppliedAmount += AmountToApply;
			}
		}
		
		///Checks whether theDate is between iniDate and endDate (non-year specific)
		private bool isBetween(DateTime theDay, DateTime iniDate, DateTime endDate)
		{
			bool result = false;
			if (iniDate.DayOfYear < endDate.DayOfYear)
			{
				// period is within one year, ex: summer in the northern hemisphere
				if ((theDay.DayOfYear >= iniDate.DayOfYear) && (theDay.DayOfYear <= endDate.DayOfYear))
					result = true;
			}
			else
			{
				// period goes over the end of the year, ex: summer in the southern hemisphere
				if ((theDay.DayOfYear >= iniDate.DayOfYear) || (theDay.DayOfYear <= endDate.DayOfYear))
					result = true;
			}
			
			return result;
		}
	}
}
```
          Manager SlurpSowingRule
            CultivarName = StaticCrop
            InitialRootDepth = 600
            SowingDate = 1980-07-01
```csharp
using System;
using Models.Core;
using Models.PMF;
using APSIM.Shared.Utilities;
        
namespace Models
{
	[Serializable] 
	[System.Xml.Serialization.XmlInclude(typeof(Model))]
	public class Script : Model
	{
		[Link] Plant Slurp;
		[Link] Clock Clock;

		[Description("Cultivar")]
		public string CultivarName { get; set; }
		[Description("Initial Root Depth")]
		public double InitialRootDepth { get; set; }
		[Description("Sowing Date")]
		public DateTime SowingDate { get; set; }

               
		[EventSubscribe("DoManagement")]
		private void OnDoManagement(object sender, EventArgs e)
		{
			if (Clock.Today.Date == SowingDate)
				Slurp.Sow(cultivar: CultivarName, population: 1, depth: InitialRootDepth, rowSpacing: 150);
			//Potato.Sow(... Contains the following arguements:
			//Population  double  Optional  Seeds sowing/m2.  Default is zero
			//Cultivar    string  Required  "NameOfCultivar"
			//Depth       double  Optional  Depth (mm) seed sown.   Default is 100mm 
			//MaxCover    double  Optional  Proportion (0-1) of the ground row crop will cover.   Default is 1.0
			//BudNumber   double  Optional  Number of mainstems per seed sown.  Default is 1.0
			//RowSpacing  double  Optional  Spaceing (mm) between drill rows when crop is sown.  Default is 150mm
			//CropClass   string  Optional  Crop class to instantiate when crop is sown.  Default is "Plant"
		}
	}
}
```
          Manager ResetProduction
            OverRidePath = Slurp.Leaf.Photosynthesis.FixedValue
            OverRideInteger = 1
            ChangeDate = 1980-07-01
```csharp
using System;
using Models.Core;
using System.Collections.Generic;
using System.Text;
using Models.PMF;
using Models;
using System.Xml.Serialization;
using APSIM.Shared.Utilities;

namespace Models
{
	[Serializable] 
	public class Script : Model
	{
		[Link] Plant Plant;
		[Link] Clock Clock;
		[Link] Zone zone;
		
		[Description("Path for coefficient to be Overwritten")]
		public string OverRidePath { get; set; }
		[Description("Value for new coefficient Integer")]
		public int OverRideInteger { get; set; }
		[Description("Sowing Date")]
		public DateTime ChangeDate { get; set; }
        
		[EventSubscribe("DoManagement")]
		private void OnDoManagement(object sender, EventArgs e)
		{
			if (Clock.Today.Date == ChangeDate)
			{
				object ResetValue = OverRideInteger;
				zone.Set(OverRidePath, ResetValue);
			}
		}
	}
}
```
          Manager ResetLAI
            OverRidePath = Slurp.Leaf.LAIFunction.FixedValue
            OverRideInterger = 2
            ChangeDate = 1980-07-01
```csharp
using System;
using Models.Core;
using System.Collections.Generic;
using System.Text;
using Models.PMF;
using Models;
using System.Xml.Serialization;
using APSIM.Shared.Utilities;

namespace Models
{
	[Serializable] 
	public class Script : Model
	{
		[Link] Plant Plant;
		[Link] Clock Clock;
		[Link] Zone zone;
		
		[Description("Path for coefficient to be Overwritten")]
		public string OverRidePath { get; set; }
		[Description("Value for new coefficient Interger")]
		public int OverRideInterger { get; set; }
		[Description("Sowing Date")]
		public DateTime ChangeDate { get; set; }
        
		[EventSubscribe("DoManagement")]
		private void OnDoManagement(object sender, EventArgs e)
		{
			if (Clock.Today.Date == ChangeDate)
			{
				object ResetValue = OverRideInterger;
				zone.Set(OverRidePath, ResetValue);
			}
		}
	}
}
```
        MicroClimate: a_interception=0; b_interception=0; c_interception=0; d_interception=0; soil_albedo=0.23; sun_angle=15; soil_heat_flux_fraction=0.4; night_interception_fraction=0.5; refheight=2; albedo=0.293662; emissivity=0.96; RadIntTotal=0
        Irrigation
        Fertiliser
        SurfaceOrganicMatter: ReportAdditions=no; ReportRemovals=no; PoolName=Sward; type=grass; mass=1000; standing_fraction=0; cnr=15; CriticalResidueWeight=2000; OptimumDecompTemp=20; MaxCumulativeEOS=20; CNRatioDecompCoeff=0.277; CNRatioDecompThreshold=25; TotalLeachRain=25; MinRainToLeach=10; CriticalMinimumOrganicC=0.004; DefaultCPRatio=0; DefaultStandingFraction=0; StandingExtinctCoeff=0.5; FractionFaecesAdded=0.5
          Pools:
            {PoolName=Sward, ResidueType=grass, Mass=1000, CNRatio=15, StandingFraction=0}
          ResidueTypes: LoadFromResource=ResidueTypes
          TillageTypes TillageTypesList
        SoluteManager
        Soil LismoreSoil: SoilType=NZ_Sedimentary; LocalName=Lismore; Site=Winchmore; NearestTown=Ashburton; Region=Canterbury; Country=New Zealand; Latitude=-48.48; Longitude=0
          Analysis: PHUnits=Water; BoronUnits=HotWater
            Thickness  Rocks  PH  CEC   ParticleSizeSand  ParticleSizeSilt  ParticleSizeClay
            150        0      6   12.5  15                65                20
            150        0      6   10    20                65                15
            200        10     6   9     25                63                12
            150        40     6   5     35                57                8
            250        60     6   4     40                54                6
            300        70     6   4     40                55                5
            300        70     6   4     40                55                5
          Water
            Thickness  BD    AirDry  LL15   DUL    SAT   KS
            150        1.3   0.05    0.15   0.36   0.45  5000
            150        1.35  0.12    0.14   0.34   0.43  2500
            200        1     0.055   0.055  0.19   0.25  3000
            150        0.53  0.015   0.015  0.065  0.15  10000
            250        0.31  0.01    0.01   0.04   0.11  17500
            300        0.3   0.01    0.01   0.03   0.11  20000
            300        0.3   0.01    0.01   0.03   0.11  20000
            SoilCrop SwardSoil: LL=[0.15, 0.14, 0.06, 0.02, 0.01, 0.01, 0.01]; KL=[0.1, 0.1, 0.08, 0.04, 0.01, 0, 0]; XF=[1, 1, 1, 1, 1, 0, 0]
            SoilCrop RyegrassSoil: LL=[0.15, 0.14, 0.06, 0.02, 0.01, 0.01, 0.01]; KL=[0.1, 0.1, 0.08, 0.04, 0.01, 0, 0]; XF=[1, 1, 1, 1, 1, 0, 0]
            SoilCrop WhiteCloverSoil: LL=[0.15, 0.14, 0.06, 0.02, 0.01, 0.01, 0.01]; KL=[0.1, 0.1, 0.08, 0.04, 0.01, 0, 0]; XF=[1, 1, 1, 1, 1, 0, 0]
            SoilCrop SlurpSoil: LL=[0.15, 0.14, 0.06, 0.02, 0.01, 0.01, 0.01]; KL=[0.1, 0.1, 0.08, 0.04, 0.01, 0, 0]; XF=[1, 1, 1, 1, 1, 0, 0]
          SoilWater: SummerDate=1-Nov; SummerU=6; SummerCona=3.5; WinterDate=1-apr; WinterU=2; WinterCona=2; DiffusConst=88; DiffusSlope=35; Salb=0.13; CN2Bare=73; CNRed=20; CNCov=0.8; slope=0; discharge_width=0; catchment_area=0; max_pond=0; residueinterception=0
            Thickness  SWCON  KLAT
            150        0.5    0
            150        0.52   0
            200        0.55   0
            150        0.6    0
            250        0.65   0
            300        0.65   0
            300        0.65   0
          SoilNitrogen: fom_type=[default, manure, mucuna, lablab, shemp, stable]; fract_carb=[0.2, 0.3, 0.54, 0.57, 0.45, 0]; fract_cell=[0.7, 0.3, 0.37, 0.37, 0.47, 0.1]; fract_lign=[0.1, 0.4, 0.09, 0.06, 0.08, 0.9]; wfpsN2N2O_x=[22, 88]; wfpsN2N2O_y=[0.1, 1]
            oc=[3.71368, 2.46983, 1.2384, 0.49836, 0.250251, 0.150353, 0.100194]
          SoilOrganicMatter: RootCN=40; RootWt=1000; SoilCN=12; EnrACoeff=7.4; EnrBCoeff=0.2; OCUnits=Total
            Thickness  OC    FBiom  FInert
            150        3     0.04   0.5
            150        1     0.02   0.7
            200        0.6   0.02   0.83
            150        0.4   0.01   0.9
            250        0.25  0.01   0.95
            300        0.15  0      0.99
            300        0.1   0      0.99
          InitialWater Initial water: PercentMethod=EvenlyDistributed; FractionFull=0.95
          Sample Initial nitrogen: NO3Units=ppm; NH4Units=ppm; SWUnits=Volumetric; OCUnits=Total; PHUnits=Water
            Thickness  NO3   NH4
            150        5     0.1
            150        2.5   0.1
            200        1     0.1
            150        0.75  0.1
            250        0.5   0.1
            300        0.5   0.1
            300        0.5   0.1
          CERESSoilTemperature
        Report Results: EventNames=[Clock].EndOfDay
          VariableNames:
            [Clock].Today as Date
            [Slurp].Leaf.Wt
            [Slurp].Leaf.LAI
            [Slurp].Leaf.Photosynthesis
            [Slurp].Root.NTakenUp
            sum([LismoreSoil].NO3N)
        Plant Slurp: CropType=Slurp
    Simulation Slurp5
      Clock: StartDate=1980-07-01; EndDate=1981-06-30
      Weather: FileName=%root%\Examples\WeatherFiles\lincoln.met
      Summary
      SoilArbitrator
      Zone Field: Area=1; Slope=0
        Folder Managers
          Manager AutomaticFertiliser: same as Slurp.Slurp1.Field.Managers.AutomaticFertiliser
          Manager AutomaticIrrigation: same as Slurp.Slurp1.Field.Managers.AutomaticIrrigation
          Manager SlurpSowingRule: same as Slurp.Slurp1.Field.Managers.SlurpSowingRule
          Manager ResetProduction
            OverRidePath = Slurp.Leaf.Photosynthesis.FixedValue
            OverRideInteger = 5
            ChangeDate = 1980-07-01
            script: same as in Slurp.Slurp1.Field.Managers.ResetProduction
          Manager ResetLAI
            OverRidePath = Slurp.Leaf.LAIFunction.FixedValue
            OverRideInterger = 5
            ChangeDate = 1980-07-01
            script: same as in Slurp.Slurp1.Field.Managers.ResetLAI
        MicroClimate: a_interception=0; b_interception=0; c_interception=0; d_interception=0; soil_albedo=0.23; sun_angle=15; soil_heat_flux_fraction=0.4; night_interception_fraction=0.5; refheight=2; albedo=0.293662; emissivity=0.96; RadIntTotal=0
        Irrigation
        Fertiliser
        SurfaceOrganicMatter: same as Slurp.Slurp1.Field.SurfaceOrganicMatter
        SoluteManager
        Soil LismoreSoil: same as Slurp.Slurp1.Field.LismoreSoil
        Report Results: EventNames=[Clock].EndOfDay
          VariableNames:
            [Clock].Today as Date
            [Slurp].Leaf.Wt
            [Slurp].Leaf.LAI
            [Slurp].Leaf.Photosynthesis
            [Slurp].Root.NTakenUp
            sum([LismoreSoil].NO3N)
        Plant Slurp: CropType=Slurp
    Manager SowingRule
      StartDate = 1-jul
      EndDate = 1-jul
      MinESW = 5
      MinRain = 5
      RainDays = 5
      CultivarName = Slurp
      SowingDepth = 30
      RowSpacing = 250
      Population = 120
```csharp
using System;
using Models.Core;
using Models.PMF.OldPlant;
using Models.Soils;
using Models.Utilities;
using APSIM.Shared.Utilities;

namespace Models
{
	[Serializable]
	public class Script : Model
	{
		[Link] Clock Clock;
		[Link] Fertiliser Fertiliser;
		[Link] Summary Summary;
		[Link] Plant15 Wheat;
		[Link] Soil Soil;
		Accumulator accumulatedRain;
		
		[Description("Start of sowing window (d-mmm)")]
		public string StartDate { get; set; }
		[Description("End of sowing window (d-mmm)")]
		public string EndDate { get; set; }
		[Description("Minimum extractable soil water for sowing (mm)")]
		public double MinESW { get; set; }
		[Description("Accumulated rainfall required for sowing (mm)")]
		public double MinRain { get; set; }
		[Description("Duration of rainfall accumulation (d)")]
		public int RainDays { get; set; }
		[Description("Cultivar to be sown")]
		public string CultivarName { get; set; }
		[Description("Sowing depth (mm)")]
		public double SowingDepth { get; set; }
		[Description("Row spacing (mm)")]
		public double RowSpacing { get; set; }
		[Description("Plant population (/m2)")]
		public double Population { get; set; }
		
		
		[EventSubscribe("Commencing")]
		private void OnSimulationCommencing(object sender, EventArgs e)
		{
			accumulatedRain = new Accumulator(this, "[Weather].Rain", RainDays);
		}
		

		[EventSubscribe("DoManagement")]
		private void OnDoManagement(object sender, EventArgs e)
		{
			accumulatedRain.Update();
			
			if (DateUtilities.WithinDates(StartDate, Clock.Today, EndDate) &&
			    Wheat.plant_status == "out" &&
			    Soil.SoilWater.ESW > MinESW &&
			    accumulatedRain.Sum > MinRain)
			{
				Wheat.Sow(population: Population, cultivar: CultivarName, depth: SowingDepth, rowSpacing: RowSpacing);	
			}
		
		}
		
	}
}
```
  Folder SlurpRpl
    Experiment
      Factors
        Factor: Specifications=[ResetProduction].Script.OverRideInteger=1,2,3,5
      Simulation Slurp
        Clock: StartDate=1980-07-01; EndDate=1981-06-30
        Weather: FileName=%root%\Examples\WeatherFiles\lincoln.met
        Summary
        SoilArbitrator
        Zone Field: Area=1; Slope=0
          Folder Managers
            Manager AutomaticFertiliser
              AllowFertiliser = no
              Depth2SoilN = 500
              CriticalSoilN = 200
              FertNAmount = 100
              FertType = UreaN
              FertApplicationDepth = 1
              FertMinimumDays = 1
              script: same as in Slurp.Slurp1.Field.Managers.AutomaticFertiliser
            Manager AutomaticIrrigation: same as Slurp.Slurp1.Field.Managers.AutomaticIrrigation
            Manager SlurpSowingRule: same as Slurp.Slurp1.Field.Managers.SlurpSowingRule
            Manager ResetProduction
              OverRidePath = Slurp.Leaf.Photosynthesis.FixedValue
              OverRideInteger = 2
              ChangeDate = 1980-07-01
              script: same as in Slurp.Slurp1.Field.Managers.ResetProduction
            Manager ResetLAI: same as Slurp.Slurp5.Field.Managers.ResetLAI
            Manager ResetMaxNUptake
              OverRidePath = Slurp.Root.MaxDailyNUptake.FixedValue
              OverRideInterger = 5
              ChangeDate = 1980-07-01
```csharp
using System;
using Models.Core;
using System.Collections.Generic;
using System.Text;
using Models.PMF;
using Models;
using System.Xml.Serialization;
using APSIM.Shared.Utilities;

namespace Models
{
	[Serializable] 
	public class Script : Model
	{
		[Link] Plant Plant;
		[Link] Clock Clock;
		[Link] Zone zone;
		
		[Description("Path for coefficient to be Overwritten")]
		public string OverRidePath { get; set; }
		[Description("Value for new coefficient Interger")]
		public double OverRideInterger { get; set; }
		[Description("Sowing Date")]
		public DateTime ChangeDate { get; set; }
        
		[EventSubscribe("DoManagement")]
		private void OnDoManagement(object sender, EventArgs e)
		{
			if (Clock.Today.Date == ChangeDate)
			{
				object ResetValue = OverRideInterger;
				zone.Set(OverRidePath, ResetValue);
			}
		}
	}
}
```
          MicroClimate: a_interception=0; b_interception=0; c_interception=0; d_interception=0; soil_albedo=0.23; sun_angle=15; soil_heat_flux_fraction=0.4; night_interception_fraction=0.5; refheight=2; albedo=0.293662; emissivity=0.96; RadIntTotal=0
          Irrigation
          Fertiliser
          SurfaceOrganicMatter: same as Slurp.Slurp1.Field.SurfaceOrganicMatter
          SoluteManager
          Soil LismoreSoil: SoilType=NZ_Sedimentary; LocalName=Lismore; Site=Winchmore; NearestTown=Ashburton; Region=Canterbury; Country=New Zealand; Latitude=-48.48; Longitude=0
            Analysis: same as Slurp.Slurp1.Field.LismoreSoil.Analysis
            Water: same as Slurp.Slurp1.Field.LismoreSoil.Water
            SoilWater: same as Slurp.Slurp1.Field.LismoreSoil.SoilWater
            SoilNitrogen: same as Slurp.Slurp1.Field.LismoreSoil.SoilNitrogen
            SoilOrganicMatter: same as Slurp.Slurp1.Field.LismoreSoil.SoilOrganicMatter
            InitialWater Initial water: PercentMethod=EvenlyDistributed; FractionFull=0.95
            Sample Initial nitrogen: NO3Units=ppm; NH4Units=ppm; SWUnits=Volumetric; OCUnits=Total; PHUnits=Water
              Thickness  NO3  NH4
              150        50   0.1
              150        50   0.1
              200        50   0.1
              150        50   0.1
              250        50   0.1
              300        50   0.1
              300        50   0.1
            CERESSoilTemperature
          Report Results: EventNames=[Clock].EndOfDay
            VariableNames:
              [Clock].Today as Date
              [Slurp].Leaf.Wt
              [Slurp].Leaf.LAI
              [Slurp].Leaf.Photosynthesis
              [Slurp].Root.NTakenUp
              sum([Slurp].Root.NTakenUp)
              sum([LismoreSoil].NO3N)
              [Slurp].Root.MaxDailyNUptake
          Plant Slurp: CropType=Slurp
  Folder SlurpOneTwo
    Experiment
      Factors
        Factor: Specifications=[SlurpSowingRule2].Script.NumSlurps=1,2
      Simulation SlurpTwo
        Clock: StartDate=1980-07-01; EndDate=1981-06-30
        Weather: FileName=%root%\Examples\WeatherFiles\lincoln.met
        Summary
        SoilArbitrator
        Zone Field: Area=1; Slope=0
          Folder Managers
            Manager AutomaticFertiliser: same as SlurpRpl.Experiment.Slurp.Field.Managers.AutomaticFertiliser
            Manager AutomaticIrrigation: same as Slurp.Slurp1.Field.Managers.AutomaticIrrigation
            Manager SlurpSowingRule2
              NumSlurps = 2
              CultivarName = StaticCrop
              InitialRootDepth = 600
              SowingDate = 1980-07-01
```csharp
using System;
using Models.Core;
using Models.PMF;
using APSIM.Shared.Utilities;
        
namespace Models
{
	[Serializable] 
	[System.Xml.Serialization.XmlInclude(typeof(Model))]
	public class Script : Model
	{
		[ScopedLinkByName] Plant Slurp1;
		[ScopedLinkByName] Plant Slurp2;
		[Link] Clock Clock;

		[Description("How many Slurps should be sown?")]
		public int NumSlurps { get; set; }
		[Description("Cultivar")]
		public string CultivarName { get; set; }
		[Description("Initial Root Depth")]
		public double InitialRootDepth { get; set; }
		[Description("Sowing Date")]
		public DateTime SowingDate { get; set; }

               
		[EventSubscribe("DoManagement")]
		private void OnDoManagement(object sender, EventArgs e)
		{
			if (Clock.Today.Date == SowingDate)
			{
				Slurp1.Sow(cultivar: CultivarName, population: 1, depth: InitialRootDepth, rowSpacing: 150);
				if (NumSlurps > 1)
					Slurp2.Sow(cultivar: CultivarName, population: 1, depth: InitialRootDepth, rowSpacing: 150);				
			}
		}
	}
}
```
            Manager ResetProduction2
              OverRidePath = Leaf.Photosynthesis.FixedValue
              OverRideInteger = 5
              ChangeDate = 1980-07-01
```csharp
using System;
using Models.Core;
using System.Collections.Generic;
using System.Text;
using Models.PMF;
using Models;
using System.Xml.Serialization;
using APSIM.Shared.Utilities;

namespace Models
{
	[Serializable] 
	public class Script : Model
	{
		[Link] Plant Plant;
		[ScopedLinkByName] Plant Slurp1;
		[ScopedLinkByName] Plant Slurp2;
		[Link] Clock Clock;
		[Link] Zone zone;
		
		[Description("Path for coefficient to be Overwritten")]
		public string OverRidePath { get; set; }
		[Description("Value for new coefficient Integer")]
		public int OverRideInteger { get; set; }
		[Description("Sowing Date")]
		public DateTime ChangeDate { get; set; }
        
		[EventSubscribe("DoManagement")]
		private void OnDoManagement(object sender, EventArgs e)
		{
			if (Clock.Today.Date == ChangeDate)
			{
				object ResetValue = OverRideInteger;
				zone.Set("Slurp1." + OverRidePath, ResetValue);
				zone.Set("Slurp2." + OverRidePath, ResetValue);
			}
		}
	}
}
```
            Manager ResetLAI2
              OverRidePath = Leaf.LAIFunction.FixedValue
              OverRideInteger = 5
              ChangeDate = 1980-07-01
              script: same as in SlurpOneTwo.Experiment.SlurpTwo.Field.Managers.ResetProduction2
            Manager ResetManNUptake2
              OverRidePath = Root.MaxDailyNUptake.FixedValue
              OverRideInteger = 5
              ChangeDate = 1980-07-01
              script: same as in SlurpOneTwo.Experiment.SlurpTwo.Field.Managers.ResetProduction2
          MicroClimate: a_interception=0; b_interception=0; c_interception=0; d_interception=0; soil_albedo=0.23; sun_angle=15; soil_heat_flux_fraction=0.4; night_interception_fraction=0.5; refheight=2; albedo=0.293662; emissivity=0.96; RadIntTotal=0
          Irrigation
          Fertiliser
          SurfaceOrganicMatter: same as Slurp.Slurp1.Field.SurfaceOrganicMatter
          SoluteManager
          Plant Slurp1: ResourceName=Slurp; CropType=Slurp
          Plant Slurp2: ResourceName=Slurp; CropType=Slurp
          Soil LismoreSoil: SoilType=NZ_Sedimentary; LocalName=Lismore; Site=Winchmore; NearestTown=Ashburton; Region=Canterbury; Country=New Zealand; Latitude=-48.48; Longitude=0
            Analysis: same as Slurp.Slurp1.Field.LismoreSoil.Analysis
            Water
              Thickness  BD    AirDry  LL15   DUL    SAT   KS
              150        1.3   0.05    0.15   0.36   0.45  5000
              150        1.35  0.12    0.14   0.34   0.43  2500
              200        1     0.055   0.055  0.19   0.25  3000
              150        0.53  0.015   0.015  0.065  0.15  10000
              250        0.31  0.01    0.01   0.04   0.11  17500
              300        0.3   0.01    0.01   0.03   0.11  20000
              300        0.3   0.01    0.01   0.03   0.11  20000
              SoilCrop SwardSoil: LL=[0.15, 0.14, 0.06, 0.02, 0.01, 0.01, 0.01]; KL=[0.1, 0.1, 0.08, 0.04, 0.01, 0, 0]; XF=[1, 1, 1, 1, 1, 0, 0]
              SoilCrop RyegrassSoil: LL=[0.15, 0.14, 0.06, 0.02, 0.01, 0.01, 0.01]; KL=[0.1, 0.1, 0.08, 0.04, 0.01, 0, 0]; XF=[1, 1, 1, 1, 1, 0, 0]
              SoilCrop WhiteCloverSoil: LL=[0.15, 0.14, 0.06, 0.02, 0.01, 0.01, 0.01]; KL=[0.1, 0.1, 0.08, 0.04, 0.01, 0, 0]; XF=[1, 1, 1, 1, 1, 0, 0]
              SoilCrop Slurp1Soil: LL=[0.15, 0.14, 0.06, 0.02, 0.01, 0.01, 0.01]; KL=[0.1, 0.1, 0.08, 0.04, 0.01, 0, 0]; XF=[1, 1, 1, 1, 1, 0, 0]
              SoilCrop Slurp2Soil: LL=[0.15, 0.14, 0.06, 0.02, 0.01, 0.01, 0.01]; KL=[0.1, 0.1, 0.08, 0.04, 0.01, 0, 0]; XF=[1, 1, 1, 1, 1, 0, 0]
            SoilWater: same as Slurp.Slurp1.Field.LismoreSoil.SoilWater
            SoilNitrogen: same as Slurp.Slurp1.Field.LismoreSoil.SoilNitrogen
            SoilOrganicMatter: same as Slurp.Slurp1.Field.LismoreSoil.SoilOrganicMatter
            InitialWater Initial water: PercentMethod=EvenlyDistributed; FractionFull=0.95
            Sample Initial nitrogen: NO3Units=ppm; NH4Units=ppm; SWUnits=Volumetric; OCUnits=Total; PHUnits=Water
              Thickness  NO3  NH4
              150        50   0.1
              150        50   0.1
              200        50   0.1
              150        50   0.1
              250        50   0.1
              300        50   0.1
              300        50   0.1
            CERESSoilTemperature
          Report Results: EventNames=[Clock].EndOfDay
            VariableNames:
              [Clock].Today as Date
              ([Slurp1].Leaf.Wt+[Slurp2].Leaf.Wt) as LeafWt
              ([Slurp1].Leaf.LAI+[Slurp2].Leaf.LAI) as LAI
              ([Slurp1].Leaf.Photosynthesis.FixedValue+[Slurp2].Leaf.Photosynthesis.FixedValue) as Photosyn
              ([Slurp1].Root.NTakenUp+[Slurp2].Root.NTakenUp) as NTakenUp
              sum([LismoreSoil].NO3N)
              [Slurp1].Leaf.Photosynthesis
              [Slurp2].Leaf.Photosynthesis
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