Simulations: Version=6
  DataStore
  Simulation StripExpt_ZoneMgr
    Clock: StartDate=2000-01-01; EndDate=2000-01-31
    ControlledEnvironment: MaxT=25; MinT=15; Rain=0; Radn=25; PanEvap=0; VP=17; Wind=3; CO2=350; AirPressure=1010; Latitude=0; DayLength=12
    SoilArbitrator
    Summary
    Zone Zm2: Area=1; Slope=0
      Folder Managers
        Manager DoRootsMultiZone
          RootDepth = 600
          RootMass = 500
          strZoneNames = Zm2 Zm1 Z0 Zp1 Zp2
          MyZoneName = Zp2
          strRootProps = 50 100 50
```csharp
// Defoliates AgPasture on a regular rotation or one-off via a schedule
// currenty defoliates the amount specified by spreading evenly over the specified period

using System;
using System.Collections.Generic;
using System.Xml.Serialization;
using Models.Core;
using Models.PMF;
using APSIM.Shared.Utilities;

namespace Models
{
	[Serializable]
	public class Script : Model
	{
		// - Links to APSIM models
		[Link] Zone myZone;
		[Link] Clock Clock;
		[Link] ISummary summary = null;
		
		List<AgPasture.PastureSpecies> Pasture = new List<AgPasture.PastureSpecies>();
		
		// - Paramters for this manager
		[Description("Root depth in the plant's zone (mm): ")]  public double RootDepth { get; set; }
		[Description("Root mass  in the plant's zone (mm): ")]  public double RootMass { get; set; }

		[Description("Name of the zones in order: ")] public string strZoneNames { get; set; }
		[Description("Name of the current zone: ")] public string MyZoneName { get; set; }
		[Description("Two-sided distribution of roots: ")] public string strRootProps { get; set; }

		// Zm9 Zm8 Zm7 Zm6 Zm5 Zm4 Zm3 Zm2 Zm1 Z0 Zp1 Zp2 Zp3 Zp4 Zp5 Zp6 Zp7 Zp8 Zp9


		// - Outputs from this manager

		// - Internal variables
		public string[] ZoneNames;
		public string[] str1RootProps;
		public int MyZoneNum;

		[EventSubscribe("Commencing")]
		private void OnSimulationCommencing(object sender, EventArgs e)
		{
			// create array of zone names
			ZoneNames = strZoneNames.Split(default(string[]), StringSplitOptions.RemoveEmptyEntries);
			// find where I am in this array
			MyZoneNum = Array.IndexOf(ZoneNames, MyZoneName);

			// split up the array of root proportions
			str1RootProps = strRootProps.Split(default(string[]), StringSplitOptions.RemoveEmptyEntries);
			//NumRootProps = str1RootProps.Length;
			summary.WriteMessage(this, "NumRootProps " + str1RootProps.Length.ToString("#0"));
			double[] PaddedRootProps = new double[ZoneNames.Length];  // initialised at 0.0
			int ii = 0;
			int StartInsertion = MyZoneNum - ((str1RootProps.Length - 1) / 2);
			for (int i = StartInsertion; i < StartInsertion + str1RootProps.Length; i++)
			{
				if ((i >= 0) && (i <= ZoneNames.Length - 1))
					PaddedRootProps[i] = Convert.ToDouble(str1RootProps[ii]);
				if (ii == ((str1RootProps.Length - 1) / 2))
					PaddedRootProps[i] = 0.0;
				ii += 1;
			}

			for (int i = 0; i < ZoneNames.Length; i++)
				summary.WriteMessage(this, ZoneNames[i] + "  " + PaddedRootProps[i].ToString("#0"));			
			
			int SpeciesNum = 0;
			foreach (AgPasture.PastureSpecies species in Apsim.Children(myZone, typeof(AgPasture.PastureSpecies)))
			{
				SpeciesNum += 1;
				if (SpeciesNum == 1)
				{
					for (int i = 0; i < ZoneNames.Length; i++)
					{
						if (PaddedRootProps[i] > 0)
							species.AddZone(zoneName: ZoneNames[i], rootDepth: PaddedRootProps[i] * RootDepth, rootDM: PaddedRootProps[i] * RootMass, specificRootLength: 100);
					}
					
					//if (Zone2Prop > 0)
					//	species.AddZone(zoneName: Zone2Name, rootDepth: Zone2Prop * RootDepth, rootDM: Zone2Prop * RootMass, specificRootLength: 100);
				} 
			}

			//Pasture[1].AddZone(zoneName: "Zone1", rootDepth: 100, rootDM: 1000, specificRootLength: 100);
			//Pasture[1].AddZone(zoneName: "Zone2", rootDepth: 50, rootDM: 500, specificRootLength: 100);
		}
	}
}
```
        Manager CutRotationSingle
          CutRotationStartDate = 1900-07-01
          CutRotationEndDate = 2100-12-31
          CutInterval = 1
          IntervalType = FixedInterval
          DurationOfCut = 1
          RemoveAmountType = ResidualDM
          AmountGiven = 2250
          DMRemoveType = RemoveAll
          FractionN2Remove = 1
          ProportionN2Dung = 0
```csharp
// Defoliates AgPasture on a regular rotation or one-off via a schedule
// currenty defoliates the amount specified by spreading evenly over the specified period

using System;
using System.Collections.Generic;
using System.Xml.Serialization;
using Models.Core;
using Models.PMF;
using APSIM.Shared.Utilities;

namespace Models
{
	[Serializable]
	public class Script : Model
	{
		// - Links to APSIM models
		[Link] Zone myZone;
		[Link] Clock Clock;
		[Link] Fertiliser fertiliser;
		[Link] ISummary summary = null;
		
		List<AgPasture.PastureSpecies> Pasture = new List<AgPasture.PastureSpecies>();
		
		// - Paramters for this manager
		[Description("Date to begin the rotation: ")]
		public DateTime CutRotationStartDate { get; set; }

		[Description("Date to finish the rotation: ")]
		public DateTime CutRotationEndDate { get; set; }

		[Description("Rotation interval (days): ")]
		public int CutInterval { get; set; }

		[Description("How the interval is defined: ")]
		public rotationIntervalTypes IntervalType { get; set; }

		[Description("Duration of each event (days): ")]
		public int DurationOfCut { get; set; }

		[Description("What amount is being defined: ")]
		public removeAmountTypes RemoveAmountType { get; set; }

		[Description("Amount to use (kg/ha): ")]
		public double AmountGiven { get; set; }

		[Description("Fraction of DM that is removed from the field:")]
		public removeDMTypes DMRemoveType { get; set; }

		[Description("Fraction of N that is removed from the field (0-1):")]
		public double FractionN2Remove { get; set; }

		[Description("Proportion of N returned in dung (0-1):")]
		public double ProportionN2Dung { get; set; }

		// - Outputs from this manager
		[XmlIgnore][Units("g/m2")]// Description: Pasture DM defoliated today
		public double DefoliatedWt { get; set; }
		[XmlIgnore][Units("g/m2")]// Description: Pasture N defoliate today
		public double DefoliatedN { get; set; }
		[XmlIgnore][Units("g/m2")]// Description: Pasture DM harvested today
		public double HarvestedWt { get; set; }
		[XmlIgnore][Units("g/m2")]// Description: Pasture N harvested today
		public double HarvestedN { get; set; }
		[XmlIgnore][Units("g/m2")]// Description: Pasture DM removed from the field
		public double RemovedWt { get; set; }
		[XmlIgnore][Units("g/m2")]// Description: Pasture N removed from the field
		public double RemovedN { get; set; }
		[XmlIgnore][Units("g/m2")]// Description: Residue DM returned to the field
		public double ReturnedWt { get; set; }
		[XmlIgnore][Units("g/m2")]// Description: Residue N returned to the field
		public double ReturnedN { get; set; }
		[XmlIgnore][Units("g/m2")]// Description: Harvested N returned as dung (SurfaceOM)
		public double NReturnedInDung { get; set; }
		[XmlIgnore][Units("g/m2")]// Description: Harvested N returned as urine (urea)
		public double NReturnedInUrine { get; set; }
		[XmlIgnore][Units("day")]// Description: Number of days after last defoliation
		public int DaysAfterCut { get; set; }
		[XmlIgnore][Units("g/m2")]// Description: Total standing DM (Leaf + Stem/Sheath) before cut
		public double PreHarvestDM { get; set; }
		[XmlIgnore][Units("g/m2")]// Description: Total standing DM (Leaf + Stem/Sheath) after cut
		public double PostHarvestDM { get; set; }
		
		// - Internal variables
		// fraction of harvested Dm to actually remove from field
		private double fractionDM2Remove = 1.0;
		// flag whether defoliation is allowed
		private bool rotationAllowed = true;
		// number of days for each defoliation event
		private int cuttingDuration = 0;
		// counter for day within each defoliation
		private int daysCutting = 0;
		// type of interval (Fixed or target)
		private string intervalType;
		// total herbage to remove in g/m2 per day
		private double herbageToRemove;
		// type of DM amount (ResidualDM or DMToRemove)
		private string amountType;
		// auxiliary flag for defoliation
		private bool aCutHasHappened = false;

		// - Event to add residue or dung to surface OM
		public event BiomassRemovedDelegate BiomassRemoved;

		[EventSubscribe("Commencing")]
		private void OnSimulationCommencing(object sender, EventArgs e)
		{
			foreach (AgPasture.PastureSpecies species in Apsim.Children(myZone, typeof(AgPasture.PastureSpecies)))
			{
				Pasture.Add(species);
			}

			// reset variables
			DaysAfterCut = 0;
			resetVariables();
			cuttingDuration = DurationOfCut;
			
			// get the type of amount given
			if (RemoveAmountType == removeAmountTypes.ResidualDM)
				amountType = "SetResidueAmount";
			else
				amountType = "SetRemoveAmount";

			// get the type of amount given
			if (IntervalType == rotationIntervalTypes.FixedInterval)
				intervalType = "Fixed";
			else
				intervalType = "Target";

			// make sure that rotation start when startDate < simulationStartDay
			if ((Clock.Today > CutRotationStartDate) && (Clock.Today < CutRotationEndDate))
				CutRotationStartDate = Clock.Today;
		}
		
		[EventSubscribe("DoManagement")]
		private void OnDoManagement(object sender, EventArgs e)
		{
			if (rotationAllowed)
			{
				if (Clock.Today == CutRotationStartDate)
					DaysAfterCut = CutInterval;

				// Check whether we can defoliate
				if ((Clock.Today >= CutRotationStartDate) && (Clock.Today <= CutRotationEndDate) && (Pasture[0].IsAlive))
				{
					// Check whether we should start a defoliation
					if (DaysAfterCut >= (CutInterval - 1))
					{
						Graze(AmountGiven, amountType, DurationOfCut);
					}
				}
			}

			// Check whether we need to continue cutting
			if ((daysCutting > 0) && (daysCutting < cuttingDuration))
			{
				// reset outputs
				resetVariables();

				removeDM(herbageToRemove);
				returnExcreta();
				daysCutting += 1;
				if (daysCutting == cuttingDuration)
					PostHarvestDM = Pasture[0].StandingHerbageWt; //+ Pasture[1].StandingHerbageWt
			}

			// reset outputs
			if (daysCutting < 0)
			{
				resetVariables();
				daysCutting = 0;
			}
		}

		[EventSubscribe("DoManagementCalculations")]
		private void OnDoManagementCalculations(object sender, EventArgs e)
		{
			// Check whether a cutting has finished
			if (daysCutting == cuttingDuration)
			{
				aCutHasHappened = true;
				daysCutting = -1;
			}

			// Increase the counter for days after cutting
			if (aCutHasHappened && (daysCutting == 0))
				DaysAfterCut += 1;
		}

		public enum removeAmountTypes
		{
			/// <summary>Setting DM amount to remove</summary>
			DMToRemove,
			/// <summary>Setting residual DM amount</summary>
			ResidualDM
		}

		public enum rotationIntervalTypes
		{
			/// <summary>Setting a fixed interval</summary>
			FixedInterval,
			/// <summary>Setting a target (minimum) inteval</summary>
			TargetInterval
		}

		public enum removeDMTypes
		{
			/// <summary>Remove all DM</summary>
			RemoveAll,
			/// <summary>Remove no DM</summary>
			RemoveNone,
			/// <summary>Remove a fraction based on digestibility</summary>
			BasedOnDigestibility
		}

		// Resets the values of all outputs
		private void resetVariables()
		{
			DefoliatedWt = 0.0;
			DefoliatedN = 0.0;
			HarvestedWt = 0.0;
			HarvestedN = 0.0;
			RemovedWt = 0.0;
			RemovedN = 0.0;
			ReturnedWt = 0.0;
			ReturnedN = 0.0;
			NReturnedInDung = 0.0;
			NReturnedInUrine = 0.0;
		}

		// Description: Perform the basic calculations for defoliation
		public void Graze(double amountDM, string amountType, int duration)
		{
			// Get the existing plant amount
			PreHarvestDM = Pasture[0].StandingHerbageWt;  //+ Pasture[1].StandingHerbageWt
			
			// Check the amount to remove and print some info
			if ((amountType == "SetRemoveAmount") && (PreHarvestDM >= amountDM / duration))
			{
				summary.WriteMessage(this, "   Defoliating " + (10 * amountDM).ToString("#0.0") + "kg/ha over " + duration + " days");
				herbageToRemove = amountDM / duration;
			}
			else if ((amountType == "SetResidueAmount") && (PreHarvestDM >= amountDM))
			{
				summary.WriteMessage(this, "   Defoliating down to approximately " + (10 * amountDM).ToString("#0.0") + "kg/ha over " + duration + " days");
				herbageToRemove = (PreHarvestDM - amountDM) / duration;
			}
			else
			{
				summary.WriteMessage(this, "   Defoliation will not happend because there is not enough plant material");
				if (intervalType == "Fixed")
					DaysAfterCut = -duration;
				return;
			}

			cuttingDuration = duration;
			// Preform first defoliation
			removeDM(herbageToRemove);
			returnExcreta();
			daysCutting = 1;
			DaysAfterCut = 0;
			if (daysCutting == cuttingDuration)
				PostHarvestDM = Pasture[0].StandingHerbageWt;  //+ Pasture[1].StandingHerbageWt
		}

		// Do the DM removal
		private void removeDM(double removeAmount)
		{
			double existingWt = Pasture[0].HarvestableWt;  // + Pasture[1].HarvestableWt

			// Check whether we harvest anything
			if (existingWt >= removeAmount)
			{
				foreach (AgPasture.PastureSpecies species in Pasture)
				{
					double amountToRemove = removeAmount * species.HarvestableWt / existingWt;
					species.Graze(amount: amountToRemove, type: "SetRemoveAmount");
				}
				
				// get total harvested
				DefoliatedWt = Pasture[0].HarvestedWt;  // + Pasture[1].HarvestedWt
				DefoliatedN = Pasture[0].HarvestedN;  //+ Pasture[1].HarvestedN
				HarvestedWt = DefoliatedWt;
				HarvestedN = DefoliatedN;

				// get amounts actually removed from field and that to be returned (dung/urine)
				if (DMRemoveType == removeDMTypes.RemoveAll)
					fractionDM2Remove = 1.0;
				else if (DMRemoveType == removeDMTypes.RemoveNone)
					fractionDM2Remove = 0.0;
				else
				{
					fractionDM2Remove = Pasture[0].HarvestedDigestibility * Pasture[0].HarvestedWt;  //+ Pasture[1].HarvestedDigestibility * Pasture[1].HarvestedWt
					fractionDM2Remove /= removeAmount;
				}
				
				RemovedWt = HarvestedWt * fractionDM2Remove;
				RemovedN = HarvestedN * FractionN2Remove;
				ReturnedWt = HarvestedWt - RemovedWt;
				ReturnedN = HarvestedN - RemovedN;
				NReturnedInDung = ReturnedN * ProportionN2Dung;
				NReturnedInUrine = ReturnedN - NReturnedInDung;
			}
		}

		// Return dung and urine
		private void returnExcreta()
		{
			if ((ReturnedWt > 0.0) || (NReturnedInDung > 0.0))
			{
				PMF.BiomassRemovedType BiomassDung = new PMF.BiomassRemovedType();
				string[] type = new string[] { "RuminantDung_PastureFed" };
				float[] dltdm = new float[] { (Single)ReturnedWt };
				float[] dltn = new float[] { (Single)NReturnedInDung };
				float[] dltp = new float[] { 0 };
				float[] fraction = new float[] { 1 };     // fraction is always 1.0 here

				BiomassDung.crop_type = "RuminantDung_PastureFed";
				BiomassDung.dm_type = type;
				BiomassDung.dlt_crop_dm = dltdm;
				BiomassDung.dlt_dm_n = dltn;
				BiomassDung.dlt_dm_p = dltp;
				BiomassDung.fraction_to_residue = fraction;
				BiomassRemoved.Invoke(BiomassDung);
			}

			if (NReturnedInUrine > 0.0)
			{
				fertiliser.Apply(NReturnedInUrine * 10, Fertiliser.Types.UreaN, 1.0);
			}
		}
	}
}
```
        Manager AutomaticFertiliser
          AllowFertiliser = no
          Depth2SoilN = 500
          CriticalSoilN = 50
          FertNAmount = 25
          FertType = UreaN
          FertApplicationDepth = 1
          FertMinimumDays = 1
```csharp
using System;
using Models.Core;
using Models.PMF;
using Models.Soils;
using APSIM.Shared.Utilities;
using System.Xml.Serialization;

namespace Models
{
	[Serializable]
	public class Script : Model
	{
		[Link] Clock Clock;
		[Link] Fertiliser fertiliser;
		[Link] ISummary summary = null;
		[Link] Soil Soil;

		//User inputs from properties tab
		[Description("Turn ferliser applications on? ")]
		public yesnoType AllowFertiliser { get; set; }
		
		[Description("Depth to calculate available soil N (mm): ")]
		public double Depth2SoilN { get; set; }

		[Description("Minimum available N, triggers an application (kgN/ha): ")]
		public double CriticalSoilN { get; set; }

		[Description("Amount of N fertiliser for each application (kgN/ha): ")]
		public double FertNAmount { get; set; }

		[Description("Type of N fertiliser to apply: ")]
		public Fertiliser.Types FertType { get; set; }

		[Description("Depth at which to apply the fertiliser (mm): ")]
		public double FertApplicationDepth { get; set; }
	   
		[Description("Minimum period between applications (days): ")]
		public double FertMinimumDays { get; set; }
	   
		public enum yesnoType
		{
			/// <summary>a positive answer</summary>
			yes,
			/// <summary>a negative answer</summary>
			no
		}

		[XmlIgnore] public double TopMineralN { get; set; }
		
		private DateTime lastApplicationDate;
		private bool fertiliserIsAllowed;
		private int nLayers;

		[EventSubscribe("StartOfSimulation")]
		private void OnStartOfSimulation(object sender, EventArgs e)
		{
			fertiliserIsAllowed = (AllowFertiliser == yesnoType.yes);
			nLayers = Soil.SoilWater.Thickness.Length;
		}

		[EventSubscribe("DoManagement")]
		private void OnDoManagement(object sender, EventArgs e)
		{
			double daysSinceLastApplication = (Clock.Today - lastApplicationDate).TotalDays;
			
			// get the N stored in the soil
			double depthFromSurface = 0.0;
			double fracLayer = 0.0;
			TopMineralN = 0.0;
			for (int layer = 0; layer < nLayers; layer++)
			{
				fracLayer = Math.Min(1.0, (Depth2SoilN - depthFromSurface) / Soil.SoilWater.Thickness[layer]);
				TopMineralN += (Soil.SoilNitrogen.NO3[layer]
				+ Soil.SoilNitrogen.NH4[layer]
				+ Soil.SoilNitrogen.urea[layer])
				* fracLayer;
				depthFromSurface += Soil.SoilWater.Thickness[layer];
				if (depthFromSurface >= Depth2SoilN)
					layer = nLayers;
			}

			if (fertiliserIsAllowed && (daysSinceLastApplication >= FertMinimumDays) && (TopMineralN <= CriticalSoilN))
			{
				fertiliser.Apply(FertNAmount, FertType, FertApplicationDepth);
				lastApplicationDate = Clock.Today;
			}
		}
	}
}
```
        Manager AutomaticIrrigation
          allowIrrigation = yes
          allowIrrigationAll = yes
          seasonStart = 15-Aug
          seasonEnd = 30-May
          seasonsAllocation = 10000
          triggerDeficit = 99
          targetDeficit = 100
          returndays = 1
          maximumAmount = 5
          depthPAWC = 600
```csharp
using System;
using Models.Core;
using Models.PMF;
using Models.Soils;
using System.Xml.Serialization;
using Models.PMF;
using APSIM.Shared.Utilities;

        
namespace Models
{
	[Serializable] 
	[System.Xml.Serialization.XmlInclude(typeof(Model))]
	public class Script : Model
	{
		//Communication to other modules
		[Link] ISummary summary = null;
		[Link] Irrigation Irrigation;
		[Link] Clock Clock;
		[Link] Soil Soil;
		[Link(IsOptional = true)] ICrop existingCrop;
	   
		//User inputs from properties tab
		[Description("Turn irrigation on?")] public answerType allowIrrigation { get; set; }
		[Description("Irrigate regardless of crop state?")] public answerType allowIrrigationAll { get; set; }
		[Description("Start of irrigation season (dd-MMM)")]
		public string seasonStart { get; set; }
		[Description("End of irrigation season (dd-MMM)")]
		public string seasonEnd { get; set; }
		[Description("Season allocation (mm)")]
		public double seasonsAllocation { get; set; }
		[Description("Deficit to trigger irrigation (% PAWC)")]
		public double triggerDeficit { get; set; }
		[Description("Deficit to stop irrigaton (% PAWC)")]
		public double targetDeficit { get; set; }
		[Description("Minimum days for irrigation to return")]
		public double returndays { get; set; }
		[Description("Maximum irrigation application (mm/day)")]
		public double maximumAmount { get; set; }
		[Description("Depth to calculate PAWC (mm)")]
		public double depthPAWC { get; set; }
	   
		public enum answerType
		{
			/// <summary>a positive answer</summary>
			yes,
			/// <summary>a negative answer</summary>
			no
		}

		//Class members
		[XmlIgnore] public double TopSWdeficit { get; set; }
		[XmlIgnore] public double TopSWC { get; set; }
		[XmlIgnore] public double DaysSinceIrrigation { get; set; }
		[XmlIgnore] public double AmountToApply { get; set; }
		[XmlIgnore] public double SeasonAppliedAmount { get; set; }
		
		private bool IrrigationIsAllowed { get; set; }
		private bool IrrigationIsAlwaysAllowed { get; set; }
		
		private bool SeasonIsOpen { get; set; }
		private bool CropIsActive { get; set; }
		private bool IrrigatorIsAvailable { get; set; }
		private bool SoilIsDry { get; set; }

		private DateTime StartDate;
		private DateTime EndDate;
		private double TopDUL;
		private double TopLL;
		private int nLayers;
	
		//Calculate static soil variables
		[EventSubscribe("StartOfSimulation")]
		private void OnStartOfSimulation(object sender, EventArgs e)
		{   
			//Set the season dates
			StartDate = DateTime.Parse(seasonStart + "-" + Clock.Today.Year.ToString());
			EndDate = DateTime.Parse(seasonEnd + "-" + Clock.Today.Year.ToString());
			
			//Can we irrigate at all?
			IrrigationIsAllowed = false; 
			if (allowIrrigation == answerType.yes)
				IrrigationIsAllowed = true; 
			if (allowIrrigationAll == answerType.yes)
				IrrigationIsAlwaysAllowed = true; 





			//Calculate soil water variables
			double depthFromSurface = 0.0;
			double fracLayer = 0.0;
			nLayers = Soil.SoilWater.Thickness.Length;
			for (int layer = 0; layer < nLayers; layer++)
			{
				fracLayer = Math.Min(1.0, (depthPAWC - depthFromSurface) / Soil.SoilWater.Thickness[layer]);
				TopLL += Soil.SoilWater.LL15mm[layer] * fracLayer;
				TopDUL += Soil.SoilWater.DULmm[layer] * fracLayer;
				depthFromSurface += Soil.SoilWater.Thickness[layer];
				if (depthFromSurface >= depthPAWC)
					layer = nLayers;
			}
		}
	   	  
		//Determine daily requirement for irrigation
		[EventSubscribe("StartOfDay")]
		private void OnStartOfDay(object sender, EventArgs e)
		{
			//Can we irrigate today?		  
			SeasonIsOpen = isBetween(Clock.Today, StartDate, EndDate);

			//Is there a crop in the ground that needs irrigation?
			CropIsActive = false;
			if (IrrigationIsAlwaysAllowed)
				CropIsActive = true;  // might not be but we don't care
			else if ((existingCrop != null) && (existingCrop.IsAlive))
				CropIsActive = true;
			//if ((existingCrop.Phenology.Stage >= 3.0) && (existingCrop.Phenology.Stage < 6.0))
	      
			//Is the irrigator available?
			IrrigatorIsAvailable = false;
			DaysSinceIrrigation += 1;
			if (DaysSinceIrrigation >= returndays)
				IrrigatorIsAvailable = true;
	      
			//Is the soil dry enough to require irrigation?
			SoilIsDry = false;
			double depthFromSurface = 0.0;
			double fracLayer = 0.0;
			TopSWC = 0.0;
			for (int layer = 0; layer < nLayers; layer++)
			//for (int layer = 0; depthFromSurface < depthPAWC + Soil.SoilWater.Thickness[layer]; layer++)
			{
				fracLayer = Math.Min(1.0, (depthPAWC - depthFromSurface) / Soil.SoilWater.Thickness[layer]);
				TopSWC += Soil.SoilWater.SWmm[layer] * fracLayer;
				depthFromSurface += Soil.SoilWater.Thickness[layer];
				if (depthFromSurface >= depthPAWC)
					layer = nLayers;
			}
			
			TopSWdeficit = TopSWC - TopDUL;
			if (Math.Max(0.0, -TopSWdeficit) >= (TopDUL - TopLL) * (100 - triggerDeficit) / 100)
				SoilIsDry = true;
	            
			//Are all the conditions ratifying irrigation
			if (IrrigationIsAllowed && SeasonIsOpen && CropIsActive && IrrigatorIsAvailable && SoilIsDry)
			{
				//Lets bloody well irrigate then!!!!
				AmountToApply = TopDUL * targetDeficit / 100 - TopSWC;
				AmountToApply = Math.Max(0.0, Math.Min(AmountToApply, seasonsAllocation - SeasonAppliedAmount));
				Irrigation.Apply(AmountToApply);
				DaysSinceIrrigation = 0;
				SeasonAppliedAmount += AmountToApply;
			}
		}
		
		///Checks whether theDate is between iniDate and endDate (non-year specific)
		private bool isBetween(DateTime theDay, DateTime iniDate, DateTime endDate)
		{
			bool result = false;
			if (iniDate.DayOfYear < endDate.DayOfYear)
			{
				// period is within one year, ex: summer in the northern hemisphere
				if ((theDay.DayOfYear >= iniDate.DayOfYear) && (theDay.DayOfYear <= endDate.DayOfYear))
					result = true;
			}
			else
			{
				// period goes over the end of the year, ex: summer in the southern hemisphere
				if ((theDay.DayOfYear >= iniDate.DayOfYear) || (theDay.DayOfYear <= endDate.DayOfYear))
					result = true;
			}
			
			return result;
		}
	}
}
```
      MicroClimate: a_interception=0; b_interception=1; c_interception=0; d_interception=0; soil_albedo=0.23; sun_angle=15; soil_heat_flux_fraction=0.4; night_interception_fraction=0.5; refheight=2; albedo=0.15; emissivity=0.96; RadIntTotal=0
      Irrigation
      Fertiliser
      SurfaceOrganicMatter: PondActive=no; ReportAdditions=no; ReportRemovals=no; PoolName=Sward; type=grass; mass=0; standing_fraction=0; cnr=15; CriticalResidueWeight=2000; OptimumDecompTemp=20; MaxCumulativeEOS=20; CNRatioDecompCoeff=0.277; CNRatioDecompThreshold=25; TotalLeachRain=25; MinRainToLeach=10; CriticalMinimumOrganicC=0.004; DefaultCPRatio=0; DefaultStandingFraction=0; StandingExtinctCoeff=0.5; FractionFaecesAdded=0.5
        Pools:
          {PoolName=Sward, ResidueType=grass, Mass=0, CNRatio=15, StandingFraction=0}
        ResidueTypes: LoadFromResource=ResidueTypes
        TillageTypes TillageTypesList
      Soil: LocalName=Stores lots of water; Site=Made up; Latitude=0; Longitude=0
        Analysis: PHUnits=Water; BoronUnits=HotWater
          Thickness  Rocks  PH  CEC  ParticleSizeSand  ParticleSizeSilt  ParticleSizeClay
          150        0      6   10   10                30                60
          150        0      6   10   10                30                60
          150        0      6   10   10                30                60
          150        0      6   10   10                30                60
        Water
          Thickness  BD   AirDry  LL15  DUL   SAT  KS
          150        1.3  0.05    0.1   0.45  0.5  500
          150        1.3  0.1     0.1   0.45  0.5  500
          150        1.3  0.1     0.1   0.45  0.5  500
          150        1.3  0.1     0.1   0.45  0.5  500
          SoilCrop RyegrassSoil: LL=[0.1, 0.1, 0.1, 0.1]; KL=[0.05, 0.05, 0.05, 0.05]; XF=[1, 1, 1, 1]
          SoilCrop WhiteCloverSoil: LL=[0.1, 0.1, 0.1, 0.1]; KL=[0.05, 0.05, 0.05, 0.05]; XF=[1, 1, 1, 1]
        SoilWater: SummerDate=1-Nov; SummerU=6; SummerCona=3.5; WinterDate=1-apr; WinterU=6; WinterCona=3.5; DiffusConst=88; DiffusSlope=35; Salb=0.13; CN2Bare=73; CNRed=20; CNCov=0.8; slope=0; discharge_width=0; catchment_area=0; max_pond=0; residueinterception=0
          Thickness  SWCON  KLAT
          150        0.3    0
          150        0.3    0
          150        0.3    0
          150        0.3    0
        SoilNitrogen: fom_type=[default, manure, mucuna, lablab, shemp, stable]; fract_carb=[0.2, 0.3, 0.54, 0.57, 0.45, 0]; fract_cell=[0.7, 0.3, 0.37, 0.37, 0.47, 0.1]; fract_lign=[0.1, 0.4, 0.09, 0.06, 0.08, 0.9]; wfpsN2N2O_x=[22, 88]; wfpsN2N2O_y=[0.1, 1]; oc=[3.71368, 2.46983, 1.2384, 0.49836]
        SoilOrganicMatter: RootCN=40; RootWt=0; SoilCN=12; EnrACoeff=7.4; EnrBCoeff=0.2; OCUnits=Total
          Thickness  OC  FBiom  FInert
          150        0   0      0
          150        0   0      0
          150        0   0      0
          150        0   0      0
        InitialWater Initial water: PercentMethod=EvenlyDistributed; FractionFull=0.95
        Sample Initial nitrogen: NO3Units=ppm; NH4Units=ppm; SWUnits=Volumetric; OCUnits=Total; PHUnits=Water
          Thickness  NO3  NH4
          150        5    0
          150        5    0
          150        5    0
          150        5    0
        CERESSoilTemperature
      SoluteManager
      PastureSpecies Ryegrass: MaximumNUptake=10; Albedo=0.26; Gsmax=0.011; R50=200; SpeciesFamily=Grass; PhotosyntheticPathway=C3; InitialShootDM=2500; InitialRootDM=500; InitialRootDepth=600; ReferencePhotosyntheticRate=1; LightExtinctionCoefficient=0.5; GrowthTminimum=1; GrowthToptimum=20; GrowthTEffectExponent=1.7; UseHeatStressFactor=yes; HeatOnsetTemperature=28; HeatFullTemperature=35; HeatRecoverySumDD=30; HeatRecoveryTReference=25; UseColdStressFactor=yes; ColdOnsetTemperature=1; ColdFullTemperature=-5; ColdRecoverySumDD=25; ColdRecoveryTReference=0; MaintenanceRespirationCoefficient=0.03; GrowthRespirationCoefficient=0.25; RespirationTReference=20; RespirationExponent=1.5; NThresholdsForLeaves=[0.04, 0.012, 0.05]; NThresholdsForStems=[0.02, 0.006, 0.025]; NThresholdsForStolons=[0, 0, 0]; NThresholdsForRoots=[0.02, 0.006, 0.025]; DegreesDayForGermination=125; TargetShootRootRatio=4; MaxRootAllocation=0.25; ShootRootGlfFactor=0.5; UseReproSeasonFactor=yes; ReproSeasonReferenceLatitude=41; ReproSeasonTimingCoeff=0.14; ReproSeasonMaxAllocationIncrease=0.5; ReproSeasonAllocationCoeff=0.1; FractionLeafMaximum=0.7; FractionLeafMinimum=0.7; FractionLeafDMThreshold=500; FractionLeafDMFactor=2000; FractionLeafExponent=3; FractionToStolon=0; SpecificLeafArea=25; SpecificRootLength=100; StolonEffectOnLAI=0; ShootMaxEffectOnLAI=1000; MaxStemEffectOnLAI=1; LiveLeavesPerTiller=3; TissueTurnoverRateShoot=0.05; TissueTurnoverRateRoot=0.02; DetachmentRateShoot=0.08; TurnoverTemperatureMin=2; TurnoverTemperatureRef=20; TurnoverTemperatureExponent=1; TurnoverDroughtEffectMax=1; TurnoverDroughtThreshold=0.5; TurnoverDefoliationCoefficient=0.5; TurnoverDefoliationRootEffect=0.1; FractionNLuxuryRemobilisable=[0.1, 0.1, 0.1]; MinimumNFixation=0; MaximumNFixation=0; SoilSaturationEffectMax=0.1; MinimumWaterFreePorosity=-1; SoilSaturationRecoveryFactor=0.25; NDillutionCoefficient=0.25; GlfGeneric=1; GlfSoilFertility=1; PlantHeightMinimum=25; PlantHeightMaximum=600; PlantHeightMassForMax=10000; PlantHeightExponent=2.8; RootDepthMinimum=50; RootDepthMaximum=750; RootElongationRate=25; RootDistributionDepthParam=90; RootDistributionExponent=3.2; DigestibilitiesCellWall=[0.6, 0.6, 0.6, 0.2]; MinimumGreenWt=100; FractionStolonStanding=0; PreferenceForGreenOverDead=1; PreferenceForLeafOverStems=1; WaterAvailableMethod=DefaultAPSIM; NitrogenAvailableMethod=BasicAgPasture
      Report Results: EventNames=[Clock].EndOfDay
        VariableNames:
          [Clock].Today as Date
          [Ryegrass].AboveGroundWt as PlantMass
          [Ryegrass].HarvestedWt as Harvested
          [Ryegrass].WaterDemand as SW_Demand
          [Ryegrass].DemandAtOptimumN as N_Demand
          sum([Ryegrass].WaterUptake) as SW_Uptake
          sum([Ryegrass].SoilNO3Uptake) as N_Uptake
          [Ryegrass].GlfWaterSupply as glfWater
          [Ryegrass].GlfNSupply as glfNitrogen
          sum([Soil].SoilWater.SWmm) as SoilWater
          sum([Soil].SoilNitrogen.NH4)+sum([Soil].SoilNitrogen.NO3) as SoilNitrogen
          [Irrigation].IrrigationApplied as Irrigation
          [Fertiliser].NitrogenApplied as Fertiliser
    Zone Zm1: Area=1; Slope=0
      Folder Managers
        Manager DoRootsMultiZone
          RootDepth = 600
          RootMass = 500
          strZoneNames = Zm2 Zm1 Z0 Zp1 Zp2
          MyZoneName = Zm1
          strRootProps = 50 100 50
          script: same as in StripExpt_ZoneMgr.Zm2.Managers.DoRootsMultiZone
        Manager CutRotationSingle: same as StripExpt_ZoneMgr.Zm2.Managers.CutRotationSingle
        Manager AutomaticFertiliser: same as StripExpt_ZoneMgr.Zm2.Managers.AutomaticFertiliser
        Manager AutomaticIrrigation: same as StripExpt_ZoneMgr.Zm2.Managers.AutomaticIrrigation
      MicroClimate: a_interception=0; b_interception=1; c_interception=0; d_interception=0; soil_albedo=0.23; sun_angle=15; soil_heat_flux_fraction=0.4; night_interception_fraction=0.5; refheight=2; albedo=0.15; emissivity=0.96; RadIntTotal=0
      Irrigation
      Fertiliser
      SurfaceOrganicMatter: same as StripExpt_ZoneMgr.Zm2.SurfaceOrganicMatter
      Soil: same as StripExpt_ZoneMgr.Zm2.Soil
      SoluteManager
      PastureSpecies Ryegrass: same as StripExpt_ZoneMgr.Zm2.Ryegrass
      Report Results: same as StripExpt_ZoneMgr.Zm2.Results
    Zone Z0: Area=1; Slope=0
      Folder Managers
        Manager DoRootsMultiZone
          RootDepth = 600
          RootMass = 500
          strZoneNames = Zm2 Zm1 Z0 Zp1 Zp2
          MyZoneName = Z0
          strRootProps = 50 100 50
          script: same as in StripExpt_ZoneMgr.Zm2.Managers.DoRootsMultiZone
        Manager CutRotationSingle: same as StripExpt_ZoneMgr.Zm2.Managers.CutRotationSingle
        Manager AutomaticFertiliser: same as StripExpt_ZoneMgr.Zm2.Managers.AutomaticFertiliser
        Manager AutomaticIrrigation: same as StripExpt_ZoneMgr.Zm2.Managers.AutomaticIrrigation
      MicroClimate: a_interception=0; b_interception=1; c_interception=0; d_interception=0; soil_albedo=0.23; sun_angle=15; soil_heat_flux_fraction=0.4; night_interception_fraction=0.5; refheight=2; albedo=0.15; emissivity=0.96; RadIntTotal=0
      Irrigation
      Fertiliser
      SurfaceOrganicMatter: same as StripExpt_ZoneMgr.Zm2.SurfaceOrganicMatter
      Soil: same as StripExpt_ZoneMgr.Zm2.Soil
      SoluteManager
      PastureSpecies Ryegrass: same as StripExpt_ZoneMgr.Zm2.Ryegrass
      Report Results: same as StripExpt_ZoneMgr.Zm2.Results
    Zone Zp1: Area=1; Slope=0
      Folder Managers
        Manager DoRootsMultiZone
          RootDepth = 600
          RootMass = 500
          strZoneNames = Zm2 Zm1 Z0 Zp1 Zp2
          MyZoneName = Zp1
          strRootProps = 50 100 50
          script: same as in StripExpt_ZoneMgr.Zm2.Managers.DoRootsMultiZone
        Manager CutRotationSingle: same as StripExpt_ZoneMgr.Zm2.Managers.CutRotationSingle
        Manager AutomaticFertiliser: same as StripExpt_ZoneMgr.Zm2.Managers.AutomaticFertiliser
        Manager AutomaticIrrigation: same as StripExpt_ZoneMgr.Zm2.Managers.AutomaticIrrigation
      MicroClimate: a_interception=0; b_interception=1; c_interception=0; d_interception=0; soil_albedo=0.23; sun_angle=15; soil_heat_flux_fraction=0.4; night_interception_fraction=0.5; refheight=2; albedo=0.15; emissivity=0.96; RadIntTotal=0
      Irrigation
      Fertiliser
      SurfaceOrganicMatter: same as StripExpt_ZoneMgr.Zm2.SurfaceOrganicMatter
      Soil: same as StripExpt_ZoneMgr.Zm2.Soil
      SoluteManager
      PastureSpecies Ryegrass: same as StripExpt_ZoneMgr.Zm2.Ryegrass
      Report Results: same as StripExpt_ZoneMgr.Zm2.Results
    Zone Zp2: same as StripExpt_ZoneMgr.Zm2
  Simulation StripExpt_GodMgr
    Clock: StartDate=2000-01-01; EndDate=2000-01-31
    ControlledEnvironment: MaxT=25; MinT=15; Rain=0; Radn=25; PanEvap=0; VP=17; Wind=3; CO2=350; AirPressure=1010; Latitude=0; DayLength=12
    SoilArbitrator
    Summary
    Manager DoRootsMultiZoneGod
      RootDepth = 600
      RootMass = 500
      strRootProps = 50 100 50
```csharp
//this module describes the irrigator, it's use and how much irrigation should be applied to each field

using System;
using Models.Core;
using Models.PMF.OldPlant;
//don't need OldPlant when use MCSP
using System.Collections.Generic;
using Models.Soils;
using APSIM.Shared.Utilities;

namespace Models
{
	[Serializable]
	public class Script : Model
	{
		[Link] Summary Summary;
		[Link] Clock Clock;
		//[Link] Weather Weather;
		[Link] Simulation Simulation;
		
		// - Paramters for this manager
		[Description("Root depth in the plant's zone (mm): ")]  public double RootDepth { get; set; }
		[Description("Root mass  in the plant's zone (mm): ")]  public double RootMass { get; set; }

		//[Description("Name of the zones in order: ")] public string strZoneNames { get; set; }
		//[Description("Name of the current zone: ")] public string MyZoneName { get; set; }
		[Description("Two-sided distribution of roots: ")] public string strRootProps { get; set; }

		// Zm9 Zm8 Zm7 Zm6 Zm5 Zm4 Zm3 Zm2 Zm1 Z0 Zp1 Zp2 Zp3 Zp4 Zp5 Zp6 Zp7 Zp8 Zp9

		
		//public double[] Today_PatchIrrigation { get; set; }

		//Fertiliser fertiliser = Apsim.Find(Zones[i], typeof(Fertiliser)) as Fertiliser;
		//fertiliser.Apply(Amount: Fert_rate, Depth: Fert_depth, Type: Fertiliser.Types.NO3N);


        
		private Zone[] Zones { get; set; }

		//setting things to zero
		[EventSubscribe("Commencing")] private void OnSimulationCommencing(object sender, EventArgs e)
		{
			// I assume I can't get the zones at this stage?
		}
        
		[EventSubscribe("StartOfSimulation")] private void DoStartOfSimulation(object sender, EventArgs e)
		{
			// Set up our list of zones in the simulation
			List<Zone> zones = new List<Zone>();
			foreach (Zone zone in Apsim.FindAll(this.Parent, typeof(Zone)))
				zones.Add(zone as Zone);
			Zones = zones.ToArray();
			
			string[] ZoneNames = new string[3] { "Z0", "Z01", "Z02" };
			double[] PaddedRootProps = new double[3] { 50.0, 0.0, 50.0 };
               
			//Fertiliser fertiliser = Apsim.Find(Zones[i], typeof(Fertiliser)) as Fertiliser;
			//Soil soil = Apsim.Find(Zones[i], typeof(Soil)) as Soil;
			
			AgPasture.PastureSpecies agpasture = Apsim.Find(Zones[1], typeof(AgPasture.PastureSpecies)) as AgPasture.PastureSpecies;
			agpasture.AddZone(zoneName: ZoneNames[0], rootDepth: PaddedRootProps[0] * RootDepth, rootDM: PaddedRootProps[0] * RootMass, specificRootLength: 100);
			agpasture.AddZone(zoneName: ZoneNames[1], rootDepth: PaddedRootProps[1] * RootDepth, rootDM: PaddedRootProps[1] * RootMass, specificRootLength: 100);

			/*for (int i = 0; i < Zones.Length; i++)
			{
				if (i == 1)  //(i == (Zones.Length - 1) / 2)
				{
					AgPasture.PastureSpecies agpasture = Apsim.Find(Zones[i], typeof(AgPasture.PastureSpecies)) as AgPasture.PastureSpecies;
					if (PaddedRootProps[i] > 0.0)
						agpasture.AddZone(zoneName: ZoneNames[i], rootDepth: PaddedRootProps[i] * RootDepth, rootDM: PaddedRootProps[i] * RootMass, specificRootLength: 100);
				}
			} */
			
		}
		
		
		[EventSubscribe("DoManagement")] private void DoManagement(object sender, EventArgs e)
		{
		}
	}
}
```
    Zone Z0: Area=1; Slope=0
      Folder Managers
        Manager CutRotationSingle: same as StripExpt_ZoneMgr.Zm2.Managers.CutRotationSingle
        Manager AutomaticFertiliser: same as StripExpt_ZoneMgr.Zm2.Managers.AutomaticFertiliser
        Manager AutomaticIrrigation
          allowIrrigation = no
          allowIrrigationAll = yes
          seasonStart = 15-Aug
          seasonEnd = 30-May
          seasonsAllocation = 10000
          triggerDeficit = 99
          targetDeficit = 100
          returndays = 1
          maximumAmount = 5
          depthPAWC = 600
          script: same as in StripExpt_ZoneMgr.Zm2.Managers.AutomaticIrrigation
      MicroClimate: a_interception=0; b_interception=1; c_interception=0; d_interception=0; soil_albedo=0.23; sun_angle=15; soil_heat_flux_fraction=0.4; night_interception_fraction=0.5; refheight=2; albedo=0.15; emissivity=0.96; RadIntTotal=0
      Irrigation
      Fertiliser
      SurfaceOrganicMatter: same as StripExpt_ZoneMgr.Zm2.SurfaceOrganicMatter
      Soil: same as StripExpt_ZoneMgr.Zm2.Soil
      SoluteManager
      PastureSpecies Ryegrass: same as StripExpt_ZoneMgr.Zm2.Ryegrass
      Report Results: same as StripExpt_ZoneMgr.Zm2.Results
    Zone Z01: same as StripExpt_GodMgr.Z0
    Zone Z02: same as StripExpt_GodMgr.Z0
  Folder Storage
    Manager MultiZoneIrrigator
      Today_PatchIrrigation =
      SoilPAW =
      TodayDeficit =
      IrrigDeficit =
      No_fields = 4
      On_off = True
      Start_irrig = 1998-10-01
      Finish_irrig = 1999-04-01
      Irrig_eff = 0
      Nozzle_diameter = 0
      Rain_pause = 0
      Days_pause = 0
      Crop_in = True
      Application = 0
      Resp_irrig = True
      Var_rate = True
      Var_field = False
      Soil_depth = 0
      Irrig_paw = 0
      Irrig_method = Driest
      Current_TodayDeficit = 0
      Current_IrrigDeficit = 0
```csharp
//this module describes the irrigator, it's use and how much irrigation should be applied to each field

using System;
using Models.Core;
using Models.PMF.OldPlant;
//don't need OldPlant when use MCSP
using System.Collections.Generic;
using Models.Soils;
using APSIM.Shared.Utilities;

namespace Models
{
	[Serializable]
	public class Script : Model
	{
		[Link] Summary Summary;
		[Link] Clock Clock;
		[Link] Weather Weather;
		[Link] Simulation Simulation;
		
		public double[] Today_PatchIrrigation { get; set; }
		public double[] SoilPAW { get; set; }
		public double[] TodayDeficit { get; set; }
		public double[] IrrigDeficit { get; set; }
		
		[Description("Number of fields to irrigate")]
		public double No_fields { get; set; }
		[Description("Irrigation on? (True/False)")]
		public bool On_off { get; set; }
		[Description("Date irrigator switched on")]
		public DateTime Start_irrig { get; set; }
		[Description("Date irrigator switched off")]
		public DateTime Finish_irrig { get; set; }
		[Description("Irrigation efficiency (%)")]
		public float Irrig_eff { get; set; }
		[Description("Wetting diameter of nozzle (m)")]
		public double Nozzle_diameter { get; set; }
		[Description("Amount of rainfall in last 3 days causes irrigator to pause (mm)")]
		public float Rain_pause { get; set; }
		[Description("Number of days irrigator will pause after rainfall")]
		public float Days_pause { get; set; }
		[Description("Only irrigate when crop is present? (True/False)")]
		public bool Crop_in { get; set; }
		[Description("Depth of irrigation applied per day for set irrigation (mm)")]
		public float Application { get; set; }
		[Description("Irrigation responds to soil moisture? (True/False)")]
		public bool Resp_irrig { get; set; }
		[Description("Variable rate irrigation? (True/False)")]
		public bool Var_rate { get; set; }
		[Description("Variable rate on a field basis? (True/False)")]
		public bool Var_field { get; set; }
		[Description("Depth to which water deficit is considered (mm)")]
		public float Soil_depth { get; set; }
		[Description("PAW lost as threshold for irrigation (%)")]
		public float Irrig_paw { get; set; }
		[Description("Method by which PAW is calculated on a field basis (Mean, Driest, Wettest)")]
		public string Irrig_method { get; set; }

        
		private Zone[] Zones { get; set; }
      
		private int Irrigator_position;
		private int Counter;
		
		private double Rain3;
		private double[] Rain_3;
		private double Days2Pause;
		public double Current_TodayDeficit { get; set; }
		public double Current_IrrigDeficit { get; set; }

		//setting things to zero
		[EventSubscribe("Commencing")]
		private void OnSimulationCommencing(object sender, EventArgs e)
		{
			Irrigator_position = 0;
			Counter = 1;
			Rain3 = 0;
			Rain_3 = new double[4];
			Rain_3[0] = 0;
			Rain_3[1] = 0;
			Rain_3[2] = 0;
			
			//THESE ARE HERE BECAUSE INTERFACE IS BROKEN - TO BE REMOVED
			Application = 10;
			Irrig_eff = 80;
			Rain_pause = 30;
			Days_pause = 3;
			Soil_depth = 550;
			Irrig_paw = 30;
			Nozzle_diameter = 20;
		}
        
		[EventSubscribe("StartOfSimulation")]
		private void DoStartOfSimulation(object sender, EventArgs e)
		{
			// Set up our list of zones in the simulation
			List<Zone> zones = new List<Zone>();
			foreach (Zone zone in Apsim.FindAll(this.Parent, typeof(Zone)))
			{
				zones.Add(zone as Zone);
			}
			Zones = zones.ToArray();
               
			//set up arrays
			Today_PatchIrrigation = new double[Zones.Length + 1];
			SoilPAW = new double[Zones.Length + 1];
			TodayDeficit = new double[Zones.Length + 1];
			IrrigDeficit = new double[Zones.Length + 1];
		}
		
		
		[EventSubscribe("DoManagement")]
		private void DoManagement(object sender, EventArgs e)
		{
			//sets todays irrigation for each patch to 0
			for (int i = 0; i < Zones.Length; i++)
			{
				Today_PatchIrrigation[i] = 0;
				TodayDeficit[i] = 0;
				IrrigDeficit[i] = 0;
				SoilPAW[i] = 0;
			}

			if (DateUtilities.WithinDates(Start_irrig, Clock.Today.Date, Finish_irrig) && (On_off))
			{ //Only irrigates between set dates and switched on
				
				//calculates rain in last 3 days and whether irrigator is paused 
				Rain_3[2] = Rain_3[1]; //passes the days backwards
				Rain_3[1] = Rain_3[0]; //passes the days backwards
				Rain_3[0] = (double)Apsim.Get(Simulation, "CatchRain.Script.Today_Rain"); //today's rain caught in the CatchRain manager script
				Rain3 = Rain_3[0] + Rain_3[1] + Rain_3[2]; //sums the rain in the last 3 days
				if (Rain3 >= Rain_pause) //and if the total is greater than required for irrigator to pause (from UI)
				{ 
					Days2Pause = Days_pause; //the irrigator is paused for set no. days (from UI)
				}
				else
				{
					Days2Pause = Days2Pause - 1; // if not, a day is taken from the pause amount
				}
			
				//Moves the irrigator around the fields every day unless paused. If in the last field, will go onto first field next day.
				if (Counter < No_fields && Days2Pause < 0.5)
				{
					Irrigator_position = Counter;
					Counter = Counter + 1;
				}
				else if (Counter >= No_fields && Days2Pause < 0.5)
				{
					Irrigator_position = Counter;
					Counter = 1;
				}

				if (Resp_irrig)  //if model set to use irrigation responsive to soil water (from UI)
				{
					//Calculate potential PAW and deficit for each patch...

					for (int i = 0; i < Zones.Length; i++)
					{
						Soil soil = Apsim.Find(Zones[i], typeof(Soil)) as Soil;
						double[] sw_dul = soil.SoilWater.DULmm;
						double[] sw_sw = soil.SoilWater.SWmm;
						double[] sw_15 = soil.SoilWater.LL15mm;
						double MySoilDepth = 0;
						for (int z = 0; z <= soil.SoilWater.dlayer.Length - 1; z++)
						{
							MySoilDepth = MySoilDepth + soil.SoilWater.dlayer[z];
							if (MySoilDepth <= Soil_depth)
							{
								SoilPAW[i] = SoilPAW[i] + (sw_dul[z] - sw_15[z]);
								TodayDeficit[i] = TodayDeficit[i] + (sw_dul[z] - Math.Min(sw_dul[z], sw_sw[z]));
							}
						}
						IrrigDeficit[i] = ((Irrig_paw / 100) * SoilPAW[i]);
					
					}

					//Determines the current fields deficit and threshold (depending on how it's calculated - from UI)
					double Sum_Area = 0;

					if (Irrig_method == "Wettest")
					{
						Current_TodayDeficit = 0;
						Current_IrrigDeficit = 0.0001;
					}
					else if (Irrig_method == "Driest")
					{
						Current_TodayDeficit = 1000;
						Current_IrrigDeficit = 1;
					}
					else if (Irrig_method == "Mean")
					{
						Current_TodayDeficit = 0;
						Current_IrrigDeficit = 0;
					}

                
					for (int i = 0; i < Zones.Length; i++) //cycles through each patch that is within the paddock where the irrigator is
					{
						double Current_Paddock = (double)Apsim.Get(Zones[i], "Manager_P.Script.This_field_no");
						double Current_Area = (double)Apsim.Get(Zones[i], "Manager_P.Script.Patch_area");
					
						if (Current_Paddock == Irrigator_position)
						{
							if (Irrig_method == "Wettest" && ((TodayDeficit[i] / IrrigDeficit[i]) > (Current_TodayDeficit / Current_IrrigDeficit)))
							{
								Current_TodayDeficit = TodayDeficit[i];
								//Driest todays deficit
								Current_IrrigDeficit = IrrigDeficit[i];
								//Selected irrig deficit threshold
							}
							else if (Irrig_method == "Driest" && ((TodayDeficit[i] / IrrigDeficit[i]) < (Current_TodayDeficit / Current_IrrigDeficit)))
							{
								Current_TodayDeficit = TodayDeficit[i];
								Current_IrrigDeficit = IrrigDeficit[i];
								//Selected irrig deficit threshold
							}
							else if (Irrig_method == "Mean")
							{
								Current_TodayDeficit = Current_TodayDeficit + (TodayDeficit[i] * Current_Area);
								Current_IrrigDeficit = Current_IrrigDeficit + (IrrigDeficit[i] * Current_Area);
								Sum_Area = Sum_Area + Current_Area;
							}
						}
							
						if (Current_Paddock == Irrigator_position && Irrig_method == "Mean")
						{
							Current_TodayDeficit = Current_TodayDeficit / Sum_Area;
							Current_IrrigDeficit = Current_IrrigDeficit / Sum_Area;
						}
					
					}
 
				}
				else if (!Resp_irrig) //If irrigation is not responsive  
				{
					Current_TodayDeficit = 1;
					Current_IrrigDeficit = 0;
				}

				//Moves through all of the paddocks
				for (int i = 0; i < Zones.Length; i++)
				{
					double Current_Paddock = (double)Apsim.Get(Zones[i], "Manager_P.Script.This_field_no");
					double Current_CropStage = (double)Apsim.Get(Zones[i], "Wheat.Zadok.Stage");
					string Status = "Dead";
					Today_PatchIrrigation[i] = 0;
							
					//If option selected then irrigates only alive crops 
					if ((Crop_in && Current_CropStage > 0 && Current_CropStage < 100) || !Crop_in)
					{
						Status = "alive";
					}
					else
					{
						Status = "Dead";
					}
				
					// allocates irrigation if the irrigator is in that paddock, the crops are in, the irrigator isn't paused by rain and if the paddock 'needs' water
					if (Var_rate)
					{
						if (Var_field)
						{
							//on a field basis if variable rate field irrigation
							if (Current_Paddock == Irrigator_position && Status == "alive" && (Days2Pause < 0.5) && (Current_TodayDeficit >= Current_IrrigDeficit))
							{
								Today_PatchIrrigation[i] = (Current_TodayDeficit * (Irrig_eff / 100));
							}	
						}
						else
						{
							//on a patch basis if variable rate patch irrigation
							if (Current_Paddock == Irrigator_position && Status == "alive" && (Days2Pause < 0.5) && (TodayDeficit[i] >= IrrigDeficit[i]))
							{
								Today_PatchIrrigation[i] = (TodayDeficit[i] * (Irrig_eff / 100));
							}	
						}
					}
					else
					{
						//on a field basis if set application rate irrigation
						if (Current_Paddock == Irrigator_position && Status == "alive" && (Days2Pause < 0.5) && (Current_TodayDeficit >= Current_IrrigDeficit))
						{
							Today_PatchIrrigation[i] = (Application * (Irrig_eff / 100));
						}	
					}
				}
			}
		}
	}
}
```
    Manager Manager_Field_01
      Field_no = 1
      Field_crop = Hartog
      Sow_date = 1998-09-01
      Sow_density = 150
      Sow_depth = 20
      Sow_row = 650
      Fert1_date = 1998-09-01
      Fert2_date = 1998-11-01
      Fert_rate = 0
      Fert_depth = 0
      Harvest_date = 1999-02-01
```csharp
using System;
using Models.Core;
using Models.PMF.OldPlant;
//don't need OldPlant when use MCSP
using System.Collections.Generic;
using Models.Soils;

namespace Models
{
	[Serializable]
	
	public class Script : Model
	{
		//Inherits Instance

		//Parameter variables
		[Description("Field number")]
		public double Field_no { get; set; }
		[Description("Crop")]
		public string Field_crop { get; set; }
		[Description("Sowing date (dd/mm)")]
		public DateTime Sow_date { get; set; }
		[Description("Sowing density (plants/m2)")]
		public double Sow_density { get; set; }
		[Description("Sowing depth (mm)")]
		public double Sow_depth { get; set; }
		[Description("Row spacing (mm)")]
		public double Sow_row { get; set; }
		[Description("1st fertiliser application date (dd/mm)")]
		public DateTime Fert1_date { get; set; }
		[Description("2nd fertiliser application date (dd/mm)")]
		public DateTime Fert2_date { get; set; }
		[Description("Fertiliser application rate")]
		public float Fert_rate { get; set; }
		[Description("Fertiliser application depth")]
		public float Fert_depth { get; set; }
		[Description("Harvest date (dd/mm)")]
		public DateTime Harvest_date { get; set; }

		//Inputs
		[Link] Clock Clock;
		//private DateTime Today;

		[Link] Summary Summary;
		
		private Zone[] Zones { get; set; }

		// The following event handler will be called once at the beginning of the simulation

		[EventSubscribe("StartOfSimulation")]
		private void DoStartOfSimulation(object sender, EventArgs e)
		{
			// Set up our list on zones in the simulation
			List<Zone> zones = new List<Zone>();
			foreach (Zone zone in Apsim.FindAll(this.Parent, typeof(Zone)))
			{
				zones.Add(zone as Zone);
			}
			Zones = zones.ToArray();
			Fert_depth = 10;//WHEN FIXED REMOVE
			Fert_rate = 50;//WHEN FIXED REMOVE
		}
		

		// The following event handler will be called each day at the beginning of the day
		[EventSubscribe("DoManagement")]
		private void OnDoManagement(object sender, EventArgs e)
		{
					
			for (int i = 0; i < Zones.Length; i++)
			{
				double Current_Paddock = (double)Apsim.Get(Zones[i], "Manager_P.Script.This_field_no");
		
				if (Clock.Today.Date == Sow_date && Current_Paddock == Field_no)
				{
					Plant15 wheat = Apsim.Find(Zones[i], typeof(Plant15)) as Plant15;//instead of Plant15 will just be Plant when move to MCSP
					wheat.Sow(population: Sow_density, cultivar: Field_crop, depth: Sow_depth, rowSpacing: Sow_row);
				}
					
				if (Clock.Today.Date == Harvest_date && Current_Paddock == Field_no)
				{
					Plant15 wheat = Apsim.Find(Zones[i], typeof(Plant15)) as Plant15;//instead of Plant15 will just be Plant when move to MCSP
					//wheat.harvest();// NO IDEA WHY THIS WON'T HARVEST
				}
					
				if ((Clock.Today.Date == Fert1_date || Clock.Today.Date == Fert2_date) && Current_Paddock == Field_no)
				{
					Fertiliser fertiliser = Apsim.Find(Zones[i], typeof(Fertiliser)) as Fertiliser;
					fertiliser.Apply(Amount: Fert_rate, Depth: Fert_depth, Type: Fertiliser.Types.NO3N);
				}
				
			}
		}

	}
}
```
    Manager ApplyWater
      IrrApp =
      TotWaterApp =
      Runoff =
      RunoffField =
      TargetHourlyApp =
      ActualHourlyApp =
      TotArea =
      TopKS = 0
      RunOn =
      AreaRunOn =
      WaterExport =
```csharp
using System;
using Models.Core;
using Models.PMF;
using System.Collections.Generic;
using Models.Soils;

namespace Models
{
	[Serializable]
	public class Script : Model
	{
		[Link] Summary Summary;
		[Link] Simulation Simulation;
		
		private Zone[] Zones { get; set; }
		public double[] IrrApp { get; set; }
		public double[] TotWaterApp { get; set; }
		public double[] Runoff { get; set; }
		public double[] RunoffField { get; set; }
		public double[] TargetHourlyApp { get; set; }
		public double[] ActualHourlyApp { get; set; }
		public double[] TotArea { get; set; }
		public double TopKS { get; set; }
		public double[] RunOn { get; set; }
		public double[] AreaRunOn { get; set; }
		public double[] WaterExport { get; set; }
		
		[EventSubscribe("StartOfSimulation")]
		private void DoStartOfSimulation(object sender, EventArgs e)
		{
			// Set up our list on zones in the simulation
			List<Zone> zones = new List<Zone>();
			foreach (Zone zone in Apsim.FindAll(this.Parent, typeof(Zone)))
			{
				zones.Add(zone as Zone);
			}
			Zones = zones.ToArray();
               
		}
		
		[EventSubscribe("DoManagement")]
		private void DoManagement(object sender, EventArgs e)
		{
			//create the variables we need
			IrrApp = new double[Zones.Length];
			TotWaterApp = new double[Zones.Length];
			Runoff = new double[Zones.Length];
			RunOn = new double[Zones.Length];
			
			//get all the info we need
			IrrApp = (double[])Apsim.Get(Simulation, "MultiZoneIrrigator.Script.Today_PatchIrrigation");
			double TotFields = (double)Apsim.Get(Simulation, "MultiZoneIrrigator.Script.No_fields");
			double NozDiam = (double)Apsim.Get(Simulation, "MultiZoneIrrigator.Script.Nozzle_diameter");
			double RainApp = (double)Apsim.Get(Simulation, "CatchRain.Script.Today_Rain");
            
			RunoffField = new double[(int)TotFields];
			TotArea = new double[(int)TotFields];
			AreaRunOn = new double[(int)TotFields];
			WaterExport = new double[(int)TotFields];
            
			//Calculate how much water (irrigation and rainfall) to apply to each zone and apply it
			for (int i = 0; i < Zones.Length; i++)
			{
				//create the variables we need
				TargetHourlyApp = new double[24];
				ActualHourlyApp = new double[24];
				double Current_IrrPos = (double)Apsim.Get(Zones[i], "Manager_P.Script.Irrigator_position");
				double Current_Area = (double)Apsim.Get(Zones[i], "Manager_P.Script.Patch_area");
				double Current_Field = (double)Apsim.Get(Zones[i], "Manager_P.Script.This_field_no");
				string Current_LandPos = (string)Apsim.Get(Zones[i], "Manager_P.Script.Landscape_position");
										
				//create the links we need
				Soil soil = Apsim.Find(Zones[i], typeof(Soil)) as Soil;
               		
				//calculate application rate               		               		
				double Length = (2 * Math.PI * ((Current_IrrPos * 100) - 50)) / TotFields;
				double WetEvent = 24 / (Length / NozDiam); //24 hours in one day
				double IrrAppRate = IrrApp[i] / WetEvent;
				double RainAppRate = RainApp / 24; //without further information assume rain is equal throughout the day
				double IrrToApply = IrrApp[i];
					
				//get soil characteristics - KS infiltration rate
				double[] KSArray = soil.KS;
				TopKS = KSArray[0]; //double TopKS = KSArray[0];
				TopKS = TopKS / 24; //Need hourly infiltration rate
					
				TotArea[(int)Current_Field - 1] = TotArea[(int)Current_Field - 1] + Current_Area;
					
				//populate hourly water application array THIS IS CORRECT
				for (int j = 0; j < TargetHourlyApp.Length; j++) //for each hour
				{
					TargetHourlyApp[j] = RainAppRate; //add the rain
						
					if (IrrToApply >= IrrAppRate) // then if how much irrigation left to apply is greater or equal to the hourly application rate then
					{
						TargetHourlyApp[j] = TargetHourlyApp[j] + IrrAppRate; // add the amount that will be applied in one hour then
						IrrToApply = IrrToApply - IrrAppRate; // minus it from the total amount for that day
					}
					else if (IrrToApply > 0) // else if the amount of irrigation left is greater than zero (but less than the hourly application rate) then
					{
						TargetHourlyApp[j] = TargetHourlyApp[j] + IrrToApply; //add what's left 
						IrrToApply = 0; //and set to zero
					}
				}
					
				//calculate how much water is going in 

				for (int j = 0; j < TargetHourlyApp.Length; j++) //for each hour
				{
					if ((TargetHourlyApp[j] > TopKS) && Current_LandPos == "Loss") // if the amount of water to appply is greater than the surface infiltration rate then
					{
						Runoff[i] = Runoff[i] + (TargetHourlyApp[j] - TopKS); //runoff anything above the maximum infiltration rate and sum it over the patch
						ActualHourlyApp[j] = TopKS; // and only apply what can infiltrate
					}
					else if (TargetHourlyApp[j] <= TopKS || Current_LandPos != "Loss")
					{
						ActualHourlyApp[j] = TargetHourlyApp[j];
					}
				}
					
				//sum up the hourly array to create a daily water application
				for (int j = 0; j < ActualHourlyApp.Length; j++) //for each hour
				{
					TotWaterApp[i] = TotWaterApp[i] + ActualHourlyApp[j]; // how much water is being applied per patch
				}
					
				RunoffField[(int)Current_Field - 1] = RunoffField[(int)Current_Field - 1] + ((Runoff[i] * 10000) * Current_Area); //Multiply runoff in mm per patch by 10,000 to convert to litres/ha then by the number of ha to get a volume in litres of water running off the patch. Sum across all the patches losing water in the field.
					
					
				if (Current_LandPos == "Gain")
				{
					AreaRunOn[(int)Current_Field - 1] = AreaRunOn[(int)Current_Field - 1] + Current_Area;
				}
			}
            
			//then for each zone find out if runoff to be applied and apply it value in RunoffField[i] * Current_Area
			for (int i = 0; i < Zones.Length; i++)
			{
				double Current_Area = (double)Apsim.Get(Zones[i], "Manager_P.Script.Patch_area");
				string Current_LandPos = (string)Apsim.Get(Zones[i], "Manager_P.Script.Landscape_position");
				double Current_Field = (double)Apsim.Get(Zones[i], "Manager_P.Script.This_field_no");
				Irrigation irrigation = Apsim.Find(Zones[i], typeof(Irrigation)) as Irrigation;
            	            	
				if (RunoffField[(int)Current_Field - 1] > 0 && Current_LandPos == "Gain")
				{
					RunOn[i] = (((RunoffField[(int)Current_Field - 1] / AreaRunOn[(int)Current_Field - 1]) / 10000) * Current_Area);
					TotWaterApp[i] = TotWaterApp[i] + RunOn[i];
				}
				else if (RunoffField[(int)Current_Field - 1] > 0 && AreaRunOn[(int)Current_Field - 1] == 0)
				{
					WaterExport[(int)Current_Field - 1] = (RunoffField[(int)Current_Field - 1] / 10000) / TotArea[(int)Current_Field - 1];
				}
	           	
				//apply the water
				irrigation.Apply(TotWaterApp[i]);        
            
			}
		}
		
	}
}
```
    Manager Field_Reporting
      RArea_Array =
      RYieldArea_Array =
      RIrrigationArea_Array =
      RWaterArea_Array =
      RFertiliserArea_Array =
      RDrainArea_Array =
```csharp
using System;
using Models.Core;
using Models.PMF;
using System.Collections.Generic;
using Models.Soils;

namespace Models
{
	[Serializable]
	public class Script : Model
	{
		[Link] Summary Summary;
		[Link] Simulation Simulation;
		
		private Zone[] Zones { get; set; }
		private double No_Fields { get; set; }
		private double[] Yield_Array { get; set; }
		public double[] RArea_Array { get; set; }
		public double[] RYieldArea_Array { get; set; }
		private double[] Irrigation_Array { get; set; }
		public double[] RIrrigationArea_Array { get; set; }
		private double[] Water_Array { get; set; }
		public double[] RWaterArea_Array { get; set; }
		private double[] Fertiliser_Array { get; set; }
		public double[] RFertiliserArea_Array { get; set; }
		private double[] Drain_Array { get; set; }
		public double[] RDrainArea_Array { get; set; }
		private double[] Current_Irrigation { get; set; }
		private double[] Current_Water { get; set; }
		private double[] Current_Rain { get; set; }
		private double[] Current_Drain { get; set; }
		
		
		[EventSubscribe("StartOfSimulation")]
		private void DoStartOfSimulation(object sender, EventArgs e)
		{
			// Set up our list on zones in the simulation
			List<Zone> zones = new List<Zone>();
			foreach (Zone zone in Apsim.FindAll(this.Parent, typeof(Zone)))
			{
				zones.Add(zone as Zone);
			}
			Zones = zones.ToArray();
               
		}
		
		[EventSubscribe("DoManagement")]
		private void DoManagement(object sender, EventArgs e)
		{

			No_Fields = (double)Apsim.Get(Simulation, "MultiZoneIrrigator.Script.No_fields");
			Yield_Array = new double[(int)No_Fields];
			RArea_Array = new double[(int)No_Fields];
			RYieldArea_Array = new double[(int)No_Fields];
			Irrigation_Array = new double[(int)No_Fields];
			RIrrigationArea_Array = new double[(int)No_Fields];
			Water_Array = new double[(int)No_Fields];
			RWaterArea_Array = new double[(int)No_Fields];
			Fertiliser_Array = new double[(int)No_Fields];
			RFertiliserArea_Array = new double[(int)No_Fields];
			Drain_Array = new double[(int)No_Fields];
			RDrainArea_Array = new double[(int)No_Fields];
			
			Current_Irrigation = new double[Zones.Length];			
			Current_Irrigation = (double[])Apsim.Get(Simulation, "MultiZoneIrrigator.Script.Today_PatchIrrigation");
			
			Current_Water = new double[Zones.Length];			
			Current_Water = (double[])Apsim.Get(Simulation, "ApplyWater.Script.TotWaterApp");
			
			for (int i = 0; i < Zones.Length; i++)
			{
				double Current_Paddock = (double)Apsim.Get(Zones[i], "Manager_P.Script.This_field_no");
				double Current_Area = (double)Apsim.Get(Zones[i], "Manager_P.Script.Patch_area"); 
				double Current_Yield = (double)Apsim.Get(Zones[i], "Wheat.AboveGround.Wt");
				double Current_Fertiliser = (double)Apsim.Get(Zones[i], "Fertiliser.NitrogenApplied");
				double Current_Drain = (double)Apsim.Get(Zones[i], "Soil.SoilWater.Drainage");
				Yield_Array[(int)Current_Paddock - 1] += Current_Yield * Current_Area;
				Irrigation_Array[(int)Current_Paddock - 1] += Current_Irrigation[i] * Current_Area;
				Water_Array[(int)Current_Paddock - 1] += Current_Water[i] * Current_Area;
				Fertiliser_Array[(int)Current_Paddock - 1] += Current_Fertiliser * Current_Area;
				Drain_Array[(int)Current_Paddock - 1] += Current_Drain * Current_Area;
				RArea_Array[(int)Current_Paddock - 1] += Current_Area;
			}
            
			for (int i = 0; i < RYieldArea_Array.Length; i++)
			{
				RYieldArea_Array[i] = Yield_Array[i] / RArea_Array[i];
				RIrrigationArea_Array[i] = Irrigation_Array[i] / RArea_Array[i];
				RWaterArea_Array[i] = Water_Array[i] / RArea_Array[i];
				RFertiliserArea_Array[i] = Fertiliser_Array[i] / RArea_Array[i];
				RDrainArea_Array[i] = Drain_Array[i] / RArea_Array[i];
			}
		}
		
	}
}
```
    Manager DoRootsMultiZone: same as StripExpt_ZoneMgr.Zm2.Managers.DoRootsMultiZone
    Manager DoRootsMultiZoneGod
      RootDepth = 600
      RootMass = 500
      strRootProps = 50 100 50
```csharp
using System;
using System.Collections.Generic;
using System.Xml.Serialization;
using Models.Core;
using Models.PMF;
using APSIM.Shared.Utilities;

namespace Models
{
	[Serializable]
	public class Script : Model
	{
		[Link] Summary Summary;
		[Link] Clock Clock;
		//[Link] Weather Weather;
		[Link] Simulation Simulation;
		
		// - Paramters for this manager
		[Description("Root depth in the plant's zone (mm): ")]  public double RootDepth { get; set; }
		[Description("Root mass  in the plant's zone (mm): ")]  public double RootMass { get; set; }

		//[Description("Name of the zones in order: ")] public string strZoneNames { get; set; }
		//[Description("Name of the current zone: ")] public string MyZoneName { get; set; }
		[Description("Two-sided distribution of roots: ")] public string strRootProps { get; set; }

		// Zm9 Zm8 Zm7 Zm6 Zm5 Zm4 Zm3 Zm2 Zm1 Z0 Zp1 Zp2 Zp3 Zp4 Zp5 Zp6 Zp7 Zp8 Zp9

		
		//public double[] Today_PatchIrrigation { get; set; }

		//Fertiliser fertiliser = Apsim.Find(Zones[i], typeof(Fertiliser)) as Fertiliser;
		//fertiliser.Apply(Amount: Fert_rate, Depth: Fert_depth, Type: Fertiliser.Types.NO3N);


        
		private Zone[] Zones { get; set; }

		//setting things to zero
		[EventSubscribe("Commencing")] private void OnSimulationCommencing(object sender, EventArgs e)
		{
			// I assume I can't get the zones at this stage?
		}
        
		[EventSubscribe("StartOfSimulation")] private void DoStartOfSimulation(object sender, EventArgs e)
		{
			// Set up our list of zones in the simulation
			List<Zone> zones = new List<Zone>();
			foreach (Zone zone in Apsim.FindAll(this.Parent, typeof(Zone)))
				zones.Add(zone as Zone);
			Zones = zones.ToArray();
			
			string[] ZoneNames = new string[3] { "Z0", "Z01", "Z02" };
			double[] PaddedRootProps = new double[3] { 50.0, 0.0, 50.0 };
               
			//Fertiliser fertiliser = Apsim.Find(Zones[i], typeof(Fertiliser)) as Fertiliser;
			//Soil soil = Apsim.Find(Zones[i], typeof(Soil)) as Soil;
			
			//AgPasture.PastureSpecies agpasture = Apsim.Find(Zones[1], typeof(AgPasture.PastureSpecies)) as AgPasture.PastureSpecies;
			//agpasture.AddZone(zoneName: ZoneNames[0], rootDepth: PaddedRootProps[0] * RootDepth, rootDM: PaddedRootProps[0] * RootMass, specificRootLength: 100);
			//agpasture.AddZone(zoneName: ZoneNames[1], rootDepth: PaddedRootProps[1] * RootDepth, rootDM: PaddedRootProps[1] * RootMass, specificRootLength: 100);

			/*for (int i = 0; i < Zones.Length; i++)
			{
				if (i == 1)  //(i == (Zones.Length - 1) / 2)
				{
					AgPasture.PastureSpecies agpasture = Apsim.Find(Zones[i], typeof(AgPasture.PastureSpecies)) as AgPasture.PastureSpecies;
					if (PaddedRootProps[i] > 0.0)
						agpasture.AddZone(zoneName: ZoneNames[i], rootDepth: PaddedRootProps[i] * RootDepth, rootDM: PaddedRootProps[i] * RootMass, specificRootLength: 100);
				}
			} */
			
		}
		
		
		[EventSubscribe("DoManagement")] private void DoManagement(object sender, EventArgs e)
		{
		}
	}
}
```
    Manager DoFertMultiZoneGod
      DateFert2Add = 0001-01-01
      ZoneFert2Add = Z01
      AmtFert2Add = 1000
```csharp
using System;
using System.Collections.Generic;
using System.Xml.Serialization;
using Models.Core;
using Models.PMF;
using APSIM.Shared.Utilities;

namespace Models
{
	[Serializable]
	public class Script : Model
	{
		[Link] Summary Summary;
		[Link] Clock Clock;
		//[Link] Weather Weather;
		[Link] Simulation Simulation;
		
		// - Paramters for this manager
		[Description("Date to add the fertiliser: ")] public DateTime DateFert2Add { get; set; }
		[Description("Zone to add fertiliser: ")] public string ZoneFert2Add { get; set; }
		[Description("Amount of fertiliser to add (kg N /ha): ")]  public double AmtFert2Add { get; set; }

		// Zm9 Zm8 Zm7 Zm6 Zm5 Zm4 Zm3 Zm2 Zm1 Z0 Zp1 Zp2 Zp3 Zp4 Zp5 Zp6 Zp7 Zp8 Zp9

		
		//public double[] Today_PatchIrrigation { get; set; }

		//Fertiliser fertiliser = Apsim.Find(Zones[i], typeof(Fertiliser)) as Fertiliser;
		//fertiliser.Apply(Amount: Fert_rate, Depth: Fert_depth, Type: Fertiliser.Types.NO3N);


        
		private Zone[] Zones { get; set; }
		


		[EventSubscribe("Commencing")] private void OnSimulationCommencing(object sender, EventArgs e)
		{
			// Set up our list of zones in the simulation
			List<Zone> zones = new List<Zone>();
			foreach (Zone zone in Apsim.FindAll(this.Parent, typeof(Zone)))
				zones.Add(zone as Zone);
			Zones = zones.ToArray();
			
			
			//ZoneNames = strZoneNames.Split(default(string[]), StringSplitOptions.RemoveEmptyEntries);
			string[] ZoneNames = new string[3] { "Z0", "Z01", "Z02" };
			// find where I am in this array
			int MyZoneNum = Array.IndexOf(ZoneNames, ZoneFert2Add);
			
			
			//double[] PaddedRootProps = new double[3] { 100.0, 0.0, 100.0 };
               
			//Fertiliser fertiliser = Apsim.Find(Zones[i], typeof(Fertiliser)) as Fertiliser;
			//Soil soil = Apsim.Find(Zones[i], typeof(Soil)) as Soil;
			
			//AgPasture.PastureSpecies agpasture = Apsim.Find(Zones[1], typeof(AgPasture.PastureSpecies)) as AgPasture.PastureSpecies;
			//agpasture.AddZone(zoneName: ZoneNames[0], rootDepth: PaddedRootProps[0] * RootDepth, rootDM: PaddedRootProps[0] * RootMass, specificRootLength: 100);
			//agpasture.AddZone(zoneName: ZoneNames[2], rootDepth: PaddedRootProps[2] * RootDepth, rootDM: PaddedRootProps[2] * RootMass, specificRootLength: 100);

			for (int i = 0; i < Zones.Length; i++)
			{
				if (i == MyZoneNum)
				{
					Fertiliser fertiliser = Apsim.Find(Zones[i], typeof(Fertiliser)) as Fertiliser;
					fertiliser.Apply(Amount: AmtFert2Add, Depth: 10.0, Type: Fertiliser.Types.NO3N);
					
				}
			} 
		}
        
		[EventSubscribe("StartOfSimulation")] private void DoStartOfSimulation(object sender, EventArgs e)
		{
			
		}
		
		
		[EventSubscribe("DoManagement")] private void DoManagement(object sender, EventArgs e)
		{
		}
	}
}
```
    Manager DoFertMultiZoneGod1
      DateFert2Add = 2000-01-01
      strZonesFert2Add = Z0 Z02
      AmtFert2Add = 1000
```csharp
using System;
using System.Collections.Generic;
using System.Xml.Serialization;
using Models.Core;
using Models.PMF;
using APSIM.Shared.Utilities;

namespace Models
{
	[Serializable]
	public class Script : Model
	{
		[Link] Summary Summary;
		[Link] Clock Clock;
		//[Link] Weather Weather;
		[Link] Simulation Simulation;
		
		// - Paramters for this manager
		[Description("Date to add the fertiliser: ")] public DateTime DateFert2Add { get; set; }
		[Description("Zone to add fertiliser: ")] public string strZonesFert2Add { get; set; }
		[Description("Amount of fertiliser to add (kg N /ha): ")]  public double AmtFert2Add { get; set; }

		// Zm9 Zm8 Zm7 Zm6 Zm5 Zm4 Zm3 Zm2 Zm1 Z0 Zp1 Zp2 Zp3 Zp4 Zp5 Zp6 Zp7 Zp8 Zp9

		private Zone[] Zones { get; set; }
		public string[] ZonesFert2Add;

		[EventSubscribe("Commencing")] private void OnSimulationCommencing(object sender, EventArgs e)
		{
			ZonesFert2Add = strZonesFert2Add.Split(default(string[]), StringSplitOptions.RemoveEmptyEntries);
			// this will get replaced with an auto-population of the names
			string[] ZoneNames = new string[3] { "Z0", "Z01", "Z02" };
		}
        
		[EventSubscribe("StartOfSimulation")] private void DoStartOfSimulation(object sender, EventArgs e)
		{
			// Set up our list of zones in the simulation
			List<Zone> zones = new List<Zone>();
			foreach (Zone zone in Apsim.FindAll(this.Parent, typeof(Zone)))
				zones.Add(zone as Zone);
			Zones = zones.ToArray();
			
			for (int i = 0; i < Zones.Length; i++)
			{
				for (int ii = 0; ii < ZonesFert2Add.Length; ii++)
				{
					if (ZoneNames[i] == ZonesFert2Add[ii])
					{
						Fertiliser fertiliser = Apsim.Find(Zones[i], typeof(Fertiliser)) as Fertiliser;
						fertiliser.Apply(Amount: AmtFert2Add, Depth: 10.0, Type: Fertiliser.Types.NO3N);
					}
				}
			} 
		}
		
		[EventSubscribe("DoManagement")] private void DoManagement(object sender, EventArgs e)
		{
		}
	}
}
```
    Manager DoFertMultiZoneGod2
      DateFert2Add = 2000-01-01
      strZonesFert2Add = Z0 Z02
      AmtFert2Add = 1000
```csharp
using System;
using System.Collections.Generic;
using System.Xml.Serialization;
using Models.Core;
using Models.PMF;
using APSIM.Shared.Utilities;

namespace Models
{
	[Serializable]
	public class Script : Model
	{
		[Link] Summary Summary;
		[Link] Clock Clock;
		//[Link] Weather Weather;
		[Link] Simulation Simulation;
		
		// - Paramters for this manager
		[Description("Date to add the fertiliser: ")] public DateTime DateFert2Add { get; set; }
		[Description("Zone to add fertiliser: ")] public string strZonesFert2Add { get; set; }
		[Description("Amount of fertiliser to add (kg N /ha): ")]  public double AmtFert2Add { get; set; }

		// Zm9 Zm8 Zm7 Zm6 Zm5 Zm4 Zm3 Zm2 Zm1 Z0 Zp1 Zp2 Zp3 Zp4 Zp5 Zp6 Zp7 Zp8 Zp9

		private Zone[] Zones { get; set; }
		public string[] ZonesFert2Add;
		string[] ZoneNames;

		[EventSubscribe("Commencing")] private void OnSimulationCommencing(object sender, EventArgs e)
		{
			ZonesFert2Add = strZonesFert2Add.Split(default(string[]), StringSplitOptions.RemoveEmptyEntries);
			// this will get replaced with an auto-population of the names
			ZoneNames = new string[3] { "Z0", "Z01", "Z02" };
		}
        
		[EventSubscribe("StartOfSimulation")] private void DoStartOfSimulation(object sender, EventArgs e)
		{
			// Set up our list of zones in the simulation
			List<Zone> zones = new List<Zone>();
			foreach (Zone zone in Apsim.FindAll(this.Parent, typeof(Zone)))
				zones.Add(zone as Zone);
			Zones = zones.ToArray();
			
			for (int i = 0; i < Zones.Length; i++)
			{
				for (int ii = 0; ii < ZonesFert2Add.Length; ii++)
				{
					if (ZoneNames[i] == ZonesFert2Add[ii])
					{
						Fertiliser fertiliser = Apsim.Find(Zones[i], typeof(Fertiliser)) as Fertiliser;
						fertiliser.Apply(Amount: AmtFert2Add, Depth: 10.0, Type: Fertiliser.Types.NO3N);
					}
				}
			} 
		}
		
		[EventSubscribe("DoManagement")] private void DoManagement(object sender, EventArgs e)
		{
		}
	}
}
```
  Simulation StripExpt_GodMgr1
    Clock: StartDate=2000-01-01; EndDate=2000-01-31
    ControlledEnvironment: MaxT=25; MinT=15; Rain=0; Radn=25; PanEvap=0; VP=17; Wind=3; CO2=350; AirPressure=1010; Latitude=0; DayLength=12
    SoilArbitrator
    Summary
    Manager DoRootsMultiZoneGod
      RootDepth = 600
      RootMass = 500
      strRootProps = 100 100 100
```csharp
using System;
using System.Collections.Generic;
using System.Xml.Serialization;
using Models.Core;
using Models.PMF;
using APSIM.Shared.Utilities;

namespace Models
{
	[Serializable]
	public class Script : Model
	{
		[Link] Summary Summary;
		[Link] Clock Clock;
		//[Link] Weather Weather;
		[Link] Simulation Simulation;
		
		// - Paramters for this manager
		[Description("Root depth in the plant's zone (mm): ")]  public double RootDepth { get; set; }
		[Description("Root mass  in the plant's zone (mm): ")]  public double RootMass { get; set; }

		//[Description("Name of the zones in order: ")] public string strZoneNames { get; set; }
		//[Description("Name of the current zone: ")] public string MyZoneName { get; set; }
		[Description("Two-sided distribution of roots: ")] public string strRootProps { get; set; }

		// Zm9 Zm8 Zm7 Zm6 Zm5 Zm4 Zm3 Zm2 Zm1 Z0 Zp1 Zp2 Zp3 Zp4 Zp5 Zp6 Zp7 Zp8 Zp9

		
		//public double[] Today_PatchIrrigation { get; set; }

		//Fertiliser fertiliser = Apsim.Find(Zones[i], typeof(Fertiliser)) as Fertiliser;
		//fertiliser.Apply(Amount: Fert_rate, Depth: Fert_depth, Type: Fertiliser.Types.NO3N);


        
		private Zone[] Zones { get; set; }

		//setting things to zero
		[EventSubscribe("Commencing")] private void OnSimulationCommencing(object sender, EventArgs e)
		{
			// I assume I can't get the zones at this stage?
			// Set up our list of zones in the simulation
			List<Zone> zones = new List<Zone>();
			foreach (Zone zone in Apsim.FindAll(this.Parent, typeof(Zone)))
				zones.Add(zone as Zone);
			Zones = zones.ToArray();
			
			string[] ZoneNames = new string[3] { "Z0", "Z01", "Z02" };
			double[] PaddedRootProps = new double[3] { 100.0, 0.0, 100.0 };
               
			//Fertiliser fertiliser = Apsim.Find(Zones[i], typeof(Fertiliser)) as Fertiliser;
			//Soil soil = Apsim.Find(Zones[i], typeof(Soil)) as Soil;
			
			//AgPasture.PastureSpecies agpasture = Apsim.Find(Zones[1], typeof(AgPasture.PastureSpecies)) as AgPasture.PastureSpecies;
			//agpasture.AddZone(zoneName: ZoneNames[0], rootDepth: PaddedRootProps[0] * RootDepth, rootDM: PaddedRootProps[0] * RootMass, specificRootLength: 100);
			//agpasture.AddZone(zoneName: ZoneNames[2], rootDepth: PaddedRootProps[2] * RootDepth, rootDM: PaddedRootProps[2] * RootMass, specificRootLength: 100);

			for (int i = 0; i < Zones.Length; i++)
			{
				if (i == 1)  //(i == (Zones.Length - 1) / 2)
				{
					AgPasture.PastureSpecies agpasture = Apsim.Find(Zones[i], typeof(AgPasture.PastureSpecies)) as AgPasture.PastureSpecies;
					if (PaddedRootProps[i] > 0.0)
						agpasture.AddZone(zoneName: ZoneNames[i], rootDepth: PaddedRootProps[i] * RootDepth, rootDM: PaddedRootProps[i] * RootMass, specificRootLength: 100);
				}
			} 
		}
        
		[EventSubscribe("StartOfSimulation")] private void DoStartOfSimulation(object sender, EventArgs e)
		{
			
		}
		
		
		[EventSubscribe("DoManagement")] private void DoManagement(object sender, EventArgs e)
		{
		}
	}
}
```
    Zone Z0: Area=1; Slope=0
      Folder Managers
        Manager AutomaticFertiliser: same as StripExpt_ZoneMgr.Zm2.Managers.AutomaticFertiliser
        Manager AutomaticIrrigation: same as StripExpt_GodMgr.Z0.Managers.AutomaticIrrigation
      MicroClimate: a_interception=0; b_interception=1; c_interception=0; d_interception=0; soil_albedo=0.23; sun_angle=15; soil_heat_flux_fraction=0.4; night_interception_fraction=0.5; refheight=2; albedo=0.15; emissivity=0.96; RadIntTotal=0
      Irrigation
      Fertiliser
      SurfaceOrganicMatter: same as StripExpt_ZoneMgr.Zm2.SurfaceOrganicMatter
      Soil: same as StripExpt_ZoneMgr.Zm2.Soil
      SoluteManager
      Report Results: EventNames=[Clock].EndOfDay
        VariableNames:
          [Clock].Today as Date
          sum([Soil].SoilWater.SWmm) as SoilWater
          sum([Soil].SoilNitrogen.NH4)+sum([Soil].SoilNitrogen.NO3) as SoilNitrogen
          [Irrigation].IrrigationApplied as Irrigation
          [Fertiliser].NitrogenApplied as Fertiliser
    Zone Z01: same as StripExpt_GodMgr.Z0
    Zone Z02: same as StripExpt_GodMgr1.Z0
  Simulation StripExpt_GodMgrFertiliser
    Clock: StartDate=2000-01-01; EndDate=2000-01-01
    ControlledEnvironment: MaxT=25; MinT=15; Rain=0; Radn=25; PanEvap=0; VP=17; Wind=3; CO2=350; AirPressure=1010; Latitude=0; DayLength=12
    SoilArbitrator
    Summary
    Manager DoFertMultiZoneGod
      DateFert2Add = 2000-01-01
      strZonesFert2Add = Z0
      AmtFert2Add = 100
      DepthFert2Add = 450
```csharp
using System;
using System.Collections.Generic;
using System.Xml.Serialization;
using Models.Core;
using Models.PMF;
using APSIM.Shared.Utilities;
using Models.Soils;

namespace Models
{
	[Serializable]
	public class Script : Model
	{
		[Link] Summary Summary;
		[Link] Clock Clock;
		//[Link] Weather Weather;
		[Link] Simulation Simulation;
		
		// - Paramters for this manager
		[Description("Date to add the fertiliser: ")] public DateTime DateFert2Add { get; set; }
		[Description("Zone to add fertiliser: ")] public string strZonesFert2Add { get; set; }
		[Description("Amount of fertiliser to add (kg N /ha): ")]  public double AmtFert2Add { get; set; }
		[Description("Spread the N from the surface to a depth of (mm): ")]  public double DepthFert2Add { get; set; }

		// Zm9 Zm8 Zm7 Zm6 Zm5 Zm4 Zm3 Zm2 Zm1 Z0 Zp1 Zp2 Zp3 Zp4 Zp5 Zp6 Zp7 Zp8 Zp9

		private Zone[] Zones { get; set; }
		public string[] ZonesFert2Add;
		string[] ZoneNames;

		[EventSubscribe("Commencing")] private void OnSimulationCommencing(object sender, EventArgs e)
		{
			ZonesFert2Add = strZonesFert2Add.Split(default(string[]), StringSplitOptions.RemoveEmptyEntries);
			// this will get replaced with an auto-population of the names
			ZoneNames = new string[3] { "Z0", "Z01", "Z02" };
		}
        
		[EventSubscribe("StartOfSimulation")] private void DoStartOfSimulation(object sender, EventArgs e)
		{
			// Set up our list of zones in the simulation
			List<Zone> zones = new List<Zone>();
			foreach (Zone zone in Apsim.FindAll(this.Parent, typeof(Zone)))
				zones.Add(zone as Zone);
			Zones = zones.ToArray();
			
			for (int i = 0; i < Zones.Length; i++)
			{
				for (int ii = 0; ii < ZonesFert2Add.Length; ii++)
				{
					if (ZoneNames[i] == ZonesFert2Add[ii])
					{
						Fertiliser fertiliser = Apsim.Find(Zones[i], typeof(Fertiliser)) as Fertiliser;
						Soil soil = Apsim.Find(Zones[i], typeof(Soil)) as Soil;
						
						double PropFertAdded = 0.0;
						double[] CumDepth = new double[soil.SoilWater.dlayer.Length];
						CumDepth[0] = soil.SoilWater.dlayer[0];
						for (int j = 0; j < soil.SoilWater.dlayer.Length; j++)
						{
							double Prop2Add = 0.0;
							if (j == 0)
								CumDepth[j] = soil.SoilWater.dlayer[j];
							else
								CumDepth[j] = CumDepth[j - 1] + soil.SoilWater.dlayer[j];

							if (CumDepth[j] <= DepthFert2Add)
							{
								if (j == 0)
									Prop2Add = soil.SoilWater.dlayer[j] / DepthFert2Add;
								else
									Prop2Add = (CumDepth[j] - CumDepth[j - 1]) / DepthFert2Add;
								PropFertAdded += Prop2Add;
							}
							else
							{
								Prop2Add = (1.0 - PropFertAdded);
								PropFertAdded += Prop2Add;
							}
							if (Prop2Add > 0.0)
							{
								fertiliser.Apply(Amount: AmtFert2Add * Prop2Add, Depth: (CumDepth[j] - soil.SoilWater.dlayer[j] / 2.0), Type: Fertiliser.Types.NO3N);
							}
						}

						
						//fertiliser.Apply(Amount: AmtFert2Add, Depth: 10.0, Type: Fertiliser.Types.NO3N);
					}
				}
			} 
		}
		
		[EventSubscribe("DoManagement")] private void DoManagement(object sender, EventArgs e)
		{
		}
	}
}
```
    Zone Z0: Area=1; Slope=0
      Folder Managers: same as StripExpt_GodMgr1.Z0.Managers
      MicroClimate: a_interception=0; b_interception=1; c_interception=0; d_interception=0; soil_albedo=0.23; sun_angle=15; soil_heat_flux_fraction=0.4; night_interception_fraction=0.5; refheight=2; albedo=0.15; emissivity=0.96; RadIntTotal=0
      Irrigation
      Fertiliser
      SurfaceOrganicMatter: same as StripExpt_ZoneMgr.Zm2.SurfaceOrganicMatter
      Soil: same as StripExpt_ZoneMgr.Zm2.Soil
      SoluteManager
      Report Results: EventNames=[Clock].EndOfDay
        VariableNames:
          [Clock].Today as Date
          sum([Soil].SoilWater.SWmm) as SoilWater
          sum([Soil].SoilNitrogen.NH4)+sum([Soil].SoilNitrogen.NO3) as SoilNitrogen
          [Irrigation].IrrigationApplied as Irrigation
          [Fertiliser].NitrogenApplied as Fertiliser
          [Soil].SoilNitrogen.NO3
    Zone Z01: Area=1; Slope=0
      Folder Managers: same as StripExpt_GodMgr1.Z0.Managers
      MicroClimate: a_interception=0; b_interception=1; c_interception=0; d_interception=0; soil_albedo=0.23; sun_angle=15; soil_heat_flux_fraction=0.4; night_interception_fraction=0.5; refheight=2; albedo=0.15; emissivity=0.96; RadIntTotal=0
      Irrigation
      Fertiliser
      SurfaceOrganicMatter: same as StripExpt_ZoneMgr.Zm2.SurfaceOrganicMatter
      Soil: same as StripExpt_ZoneMgr.Zm2.Soil
      SoluteManager
      PastureSpecies Ryegrass: same as StripExpt_ZoneMgr.Zm2.Ryegrass
      Report Results: EventNames=[Clock].EndOfDay
        VariableNames:
          [Clock].Today as Date
          sum([Soil].SoilWater.SWmm) as SoilWater
          sum([Soil].SoilNitrogen.NH4)+sum([Soil].SoilNitrogen.NO3) as SoilNitrogen
          [Irrigation].IrrigationApplied as Irrigation
          [Fertiliser].NitrogenApplied as Fertiliser
          [Soil].SoilNitrogen.NO3
    Zone Z02: same as StripExpt_GodMgrFertiliser.Z0
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