Simulations: Version=7
  DataStore
  Folder The SoilArbitrator
    Memo Description
      The SoilArbitrator is an innovative approach to solving the problem of multiple crops in multiple soil zones competing for water and nutrient resources.  A single instance of the component is needed in each simulation (usually at the top of simulation tree but location is unimportant) and deals with all forms of uptake, all crops and all zones in the simulation.

      The approach ...

      Overview the tests ...
  Folder Tests of Multiple Crops in a Single Zone
    Memo Overview
      The series of test and simulations in this section test the performance of SoilArbitrator when there are multiple plants competing for resources in a single zone.  These tests take place with either a deep or a shallow soil and in the Lincoln (NZ) environment.  The plants vary between one or more Slurps, one or more ryegrasses and then finally a ryegrass – white clover sward.

      The first test compares simulations with one Slurp against equivalent simulations with two Slurps (each with half the leaf area etc. as the single Slurp).  The point is to demonstrate that the SoilArbitrator can effectively aggregate the multiple Slurps to match the single.

      “AgPasture Deep Soil Test” simulations have either two deep-rooted ryegrasses or one deep and one shallow rooted.  The simulated plant growth and sward composition are compared when under conditions with and without irrigation and fertiliser.  The exercise is repeated in “AgPasture Shallow Soil Test” but using a soil with substantially reduced soil water storage.

      “AgPasture Test Root Depth Differential” repeats “AgPasture Deep Soil Test” but only under conditions of no irrigation or fertiliser but with a range of rooting depths of the second ryegrass.

       The final test “A Ryegrass and White Clover Example” is more realistic in that it contains a white clover competing with a ryegrass and examines the changing sward composition as water and/or fertiliser are added to the simulation.
    Folder Basic Conceptual Test
      Memo Memo BasicConceptualTest
        This 'experiment' does a basic test of the SoilArbitrator comparing a single Slurp to two equal Slurps, both with and without irrigation and fertiliser.  Slurp is a static plant model in which LAI, water and nitrogen demand are user-set constants but in which the uptake of water and N are determined by availability and competition.

        Success in this test is that there should be minimal differences in leaf weight, soil water and soil nitrogen uptake when comparing one Slurp (OneSlurp) to two equal Slurps (TwoSlurp).  The simulations are done under conditions of unlimited irrigation and fertiliser (Plus) and with no irrigation or fertiliser (Minus).  In the graphs below, the relevant outputs from the individual Slurps in TwoSlurp are added together in the Output component.

        OneSlurp models are set up with photosynthesis at 6.0 g C /m2, LAI at 3.5 and N uptake at 2.5 kg N /ha /day.  TwoSlurp simulations are set up with two equal Slurps using values of 3.0 g C /m2, LAI at 1.75 and N uptake at 1.25 kg N /ha /day.  All simulations are run using the Lincoln weather data.

        The first four graphs below show soil water storage, soil nitrate N storage, cumulative water uptake and cumulative N uptake for the four contrasting simulations.  As expected, there are minimal differences caused by the number of Slurp models in the simulation but there are substantial differences caused by the presence or absence of irrigation and fertiliser.

        There are small differences in the soil water storage for the water-limited simulations (first graph, SoilWater) under conditions of severe water shortage.  These are likely to be due to the approximations in the Runge-Kutta method.  While it might be improved with a higher-order solution, the third plot (WaterUptake) shows that there are no persistent differences in water uptake and that the Runge-Kutta solution is likely to be sufficient for the types of simulation for which APSIM is used.

        The second and fourth graphs minimal differences in N storage and N uptake.

        The final two plots show the water and N uptake from the TwoSlurp simulations only giving the uptake from the individual crops.  As expected, there are no discernible differences between the crops.

        The simulations in this section are very simple conceptual tests using the static Slurp model.  They show that the Runge-Kutta method in SoilArbitrator is behaving sensibly in the presence of two equal crops when they are compared to a single equivalent crop.  These were intentionally simple tests.  Slurp is a static model and will not reduce its water or N demand in response to stress (i.e. no feedback to crop performance).  The next series of tests will use a dynamic model that will include that feedback.
      Experiment
        Factors
          Factor
            Factor OneSlurp_Plus
              Specifications:
                [SlurpSowMulitple].Script.NumSlurps = 1
                [SetProduction].Script.OverRidePhoto = 6.0
                [SetProduction].Script.OverRideLAI = 3.5
                [SetProduction].Script.OverRideNUp = 2.5
                [OnOffFertiliser].Script.FertOn = 1
                [OnOffIrrigation].Script.IrrigOn = 1
            Factor TwoSlurp_Plus
              Specifications:
                [SlurpSowMulitple].Script.NumSlurps = 2
                [SetProduction].Script.OverRidePhoto = 3.0
                [SetProduction].Script.OverRideLAI = 1.75
                [SetProduction].Script.OverRideNUp = 1.25
                [OnOffFertiliser].Script.FertOn = 1
                [OnOffIrrigation].Script.IrrigOn = 1
            Factor OneSlurp_Minus
              Specifications:
                [SlurpSowMulitple].Script.NumSlurps = 1
                [SetProduction].Script.OverRidePhoto = 6.0
                [SetProduction].Script.OverRideLAI = 3.5
                [SetProduction].Script.OverRideNUp = 2.5
                [OnOffFertiliser].Script.FertOn = 0
                [OnOffIrrigation].Script.IrrigOn = 0
            Factor TwoSlurp_Minus
              Specifications:
                [SlurpSowMulitple].Script.NumSlurps = 2
                [SetProduction].Script.OverRidePhoto = 3.0
                [SetProduction].Script.OverRideLAI = 1.75
                [SetProduction].Script.OverRideNUp = 1.25
                [OnOffFertiliser].Script.FertOn = 0
                [OnOffIrrigation].Script.IrrigOn = 0
        Simulation BasicConceptualTest
          Clock: StartDate=1980-07-01; EndDate=1981-06-30
          Weather: FileName=%root%\Examples\WeatherFiles\lincoln.met
          Summary
          SoilArbitrator
          Zone Field: Area=1; Slope=0
            Folder Managers
              Manager OnOffFertiliser
                AllowFertiliser = yes
                FertOn = 1
                Depth2SoilN = 500
                CriticalSoilN = 200
                FertNAmount = 100
                FertType = UreaN
                FertApplicationDepth = 1
                FertMinimumDays = 1
```csharp
using System;
using Models.Core;
using Models.PMF;
using Models.Soils;
using APSIM.Shared.Utilities;
using System.Xml.Serialization;

namespace Models
{
	[Serializable]
	public class Script : Model
	{
		[Link] Clock Clock;
		[Link] Fertiliser fertiliser;
		[Link] ISummary summary = null;
		[Link] Soil Soil;

		//User inputs from properties tab
		[Description("Turn fertiliser applications on? ")]
		public yesnoType AllowFertiliser { get; set; }
		
		[Description("Temporary variable to turn fertiliser on (1) or off (0): ")] public int FertOn { get; set; }

		[Description("Depth to calculate available soil N (mm): ")]
		public double Depth2SoilN { get; set; }

		[Description("Minimum available N, triggers an application (kgN/ha): ")]
		public double CriticalSoilN { get; set; }

		[Description("Amount of N fertiliser for each application (kgN/ha): ")]
		public double FertNAmount { get; set; }

		[Description("Type of N fertiliser to apply: ")]
		public Fertiliser.Types FertType { get; set; }

		[Description("Depth at which to apply the fertiliser (mm): ")]
		public double FertApplicationDepth { get; set; }
	   
		[Description("Minimum period between applications (days): ")]
		public double FertMinimumDays { get; set; }
	   
		public enum yesnoType
		{
			/// <summary>a positive answer</summary>
			yes,
			/// <summary>a negative answer</summary>
			no
		}

		[XmlIgnore] public double TopMineralN { get; set; }
		
		private DateTime lastApplicationDate;
		private bool fertiliserIsAllowed;
		private int nLayers;

		[EventSubscribe("StartOfSimulation")]
		private void OnStartOfSimulation(object sender, EventArgs e)
		{
			fertiliserIsAllowed = (AllowFertiliser == yesnoType.yes);
			nLayers = Soil.SoilWater.Thickness.Length;
		}

		[EventSubscribe("DoManagement")]
		private void OnDoManagement(object sender, EventArgs e)
		{
			double daysSinceLastApplication = (Clock.Today - lastApplicationDate).TotalDays;
			
			// get the N stored in the soil
			double depthFromSurface = 0.0;
			double fracLayer = 0.0;
			TopMineralN = 0.0;
			for (int layer = 0; layer < nLayers; layer++)
			{
				fracLayer = Math.Min(1.0, (Depth2SoilN - depthFromSurface) / Soil.SoilWater.Thickness[layer]);
				TopMineralN += (Soil.SoilNitrogen.NO3[layer]
				+ Soil.SoilNitrogen.NH4[layer]
				+ Soil.SoilNitrogen.urea[layer])
				* fracLayer;
				depthFromSurface += Soil.SoilWater.Thickness[layer];
				if (depthFromSurface >= Depth2SoilN)
					layer = nLayers;
			}

			if (fertiliserIsAllowed && (daysSinceLastApplication >= FertMinimumDays) && (TopMineralN <= CriticalSoilN))
			{
				fertiliser.Apply(FertNAmount * FertOn, FertType, FertApplicationDepth);
				lastApplicationDate = Clock.Today;
			}
		}
	}
}
```
              Manager OnOffIrrigation
                allowIrrigation = yes
                IrrigOn = 1
                seasonStart = 15-Aug
                seasonEnd = 30-May
                seasonsAllocation = 10000
                triggerDeficit = 75
                targetDeficit = 99
                returndays = 1
                maximumAmount = 30
                depthPAWC = 300
```csharp
using System;
using Models.Core;
using Models.PMF;
using Models.Soils;
using System.Xml.Serialization;
using Models.PMF;
using APSIM.Shared.Utilities;

        
namespace Models
{
	[Serializable] 
	[System.Xml.Serialization.XmlInclude(typeof(Model))]
	public class Script : Model
	{
		//Communication to other modules
		[Link] ISummary summary = null;
		[Link] Irrigation Irrigation;
		[Link] Clock Clock;
		[Link] Soil Soil;
		[Link(IsOptional = true)] ICrop existingCrop;
	   
		//User inputs from properties tab
		[Description("Turn irrigation on?")]
		public answerType allowIrrigation { get; set; }
		
		[Description("Temporary variable to turn fertiliser on (1) or off (0): ")] public int IrrigOn { get; set; }


		[Description("Start of irrigation season (dd-MMM)")]
		public string seasonStart { get; set; }
		[Description("End of irrigation season (dd-MMM)")]
		public string seasonEnd { get; set; }
		[Description("Season allocation (mm)")]
		public double seasonsAllocation { get; set; }
		[Description("Deficit to trigger irrigation (% PAWC)")]
		public double triggerDeficit { get; set; }
		[Description("Deficit to stop irrigaton (% PAWC)")]
		public double targetDeficit { get; set; }
		[Description("Minimum days for irrigation to return")]
		public double returndays { get; set; }
		[Description("Maximum irrigation application (mm/day)")]
		public double maximumAmount { get; set; }
		[Description("Depth to calculate PAWC (mm)")]
		public double depthPAWC { get; set; }
	   
		public enum answerType
		{
			/// <summary>a positive answer</summary>
			yes,
			/// <summary>a negative answer</summary>
			no
		}

		//Class members
		[XmlIgnore] public double TopSWdeficit { get; set; }
		[XmlIgnore] public double TopSWC { get; set; }
		[XmlIgnore] public double DaysSinceIrrigation { get; set; }
		[XmlIgnore] public double AmountToApply { get; set; }
		[XmlIgnore] public double SeasonAppliedAmount { get; set; }
		
		private bool IrrigationIsAllowed { get; set; }
		private bool SeasonIsOpen { get; set; }
		private bool CropIsActive { get; set; }
		private bool IrrigatorIsAvailable { get; set; }
		private bool SoilIsDry { get; set; }

		private DateTime StartDate;
		private DateTime EndDate;
		private double TopDUL;
		private double TopLL;
		private int nLayers;
	
		//Calculate static soil variables
		[EventSubscribe("StartOfSimulation")]
		private void OnStartOfSimulation(object sender, EventArgs e)
		{   
			//Set the season dates
			StartDate = DateTime.Parse(seasonStart + "-" + Clock.Today.Year.ToString());
			EndDate = DateTime.Parse(seasonEnd + "-" + Clock.Today.Year.ToString());
			
			//Can we irrigate at all?
			IrrigationIsAllowed = false; 
			if (allowIrrigation == answerType.yes)
				IrrigationIsAllowed = true; 

			//Calculate soil water variables
			double depthFromSurface = 0.0;
			double fracLayer = 0.0;
			nLayers = Soil.SoilWater.Thickness.Length;
			for (int layer = 0; layer < nLayers; layer++)
			{
				fracLayer = Math.Min(1.0, (depthPAWC - depthFromSurface) / Soil.SoilWater.Thickness[layer]);
				TopLL += Soil.SoilWater.LL15mm[layer] * fracLayer;
				TopDUL += Soil.SoilWater.DULmm[layer] * fracLayer;
				depthFromSurface += Soil.SoilWater.Thickness[layer];
				if (depthFromSurface >= depthPAWC)
					layer = nLayers;
			}
		}
	   	  
		//Determine daily requirement for irrigation
		[EventSubscribe("StartOfDay")]
		private void OnStartOfDay(object sender, EventArgs e)
		{
			//Can we irrigate today?		  
			SeasonIsOpen = isBetween(Clock.Today, StartDate, EndDate);

			//Is there a crop in the ground that needs irrigation?
			CropIsActive = false;
			if ((existingCrop != null) && (existingCrop.IsAlive))
				CropIsActive = true;
	      
			//Is the irrigator available?
			IrrigatorIsAvailable = false;
			DaysSinceIrrigation += 1;
			if (DaysSinceIrrigation >= returndays)
				IrrigatorIsAvailable = true;
	      
			//Is the soil dry enough to require irrigation?
			SoilIsDry = false;
			double depthFromSurface = 0.0;
			double fracLayer = 0.0;
			TopSWC = 0.0;
			for (int layer = 0; layer < nLayers; layer++)
			//for (int layer = 0; depthFromSurface < depthPAWC + Soil.SoilWater.Thickness[layer]; layer++)
			{
				fracLayer = Math.Min(1.0, (depthPAWC - depthFromSurface) / Soil.SoilWater.Thickness[layer]);
				TopSWC += Soil.SoilWater.SWmm[layer] * fracLayer;
				depthFromSurface += Soil.SoilWater.Thickness[layer];
				if (depthFromSurface >= depthPAWC)
					layer = nLayers;
			}
			
			TopSWdeficit = TopSWC - TopDUL;
			if (Math.Max(0.0, -TopSWdeficit) >= (TopDUL - TopLL) * (100 - triggerDeficit) / 100)
				SoilIsDry = true;
	            
			//Are all the conditions ratifying irrigation
			if (IrrigationIsAllowed && SeasonIsOpen && CropIsActive && IrrigatorIsAvailable && SoilIsDry)
			{
				//Lets bloody well irrigate then!!!!
				AmountToApply = TopDUL * targetDeficit / 100 - TopSWC;
				AmountToApply = Math.Max(0.0, Math.Min(AmountToApply, seasonsAllocation - SeasonAppliedAmount));
				Irrigation.Apply(AmountToApply * IrrigOn);
				DaysSinceIrrigation = 0;
				SeasonAppliedAmount += AmountToApply;
			}
		}
		
		///Checks whether theDate is between iniDate and endDate (non-year specific)
		private bool isBetween(DateTime theDay, DateTime iniDate, DateTime endDate)
		{
			bool result = false;
			if (iniDate.DayOfYear < endDate.DayOfYear)
			{
				// period is within one year, ex: summer in the northern hemisphere
				if ((theDay.DayOfYear >= iniDate.DayOfYear) && (theDay.DayOfYear <= endDate.DayOfYear))
					result = true;
			}
			else
			{
				// period goes over the end of the year, ex: summer in the southern hemisphere
				if ((theDay.DayOfYear >= iniDate.DayOfYear) || (theDay.DayOfYear <= endDate.DayOfYear))
					result = true;
			}
			
			return result;
		}
	}
}
```
              Manager SlurpSowMulitple
                NumSlurps = 1
                CultivarName = StaticCrop
                InitialRootDepth = 600
                SowingDate = 1980-07-01
```csharp
using System;
using Models.Core;
using Models.PMF;
using APSIM.Shared.Utilities;
        
namespace Models
{
	[Serializable] 
	[System.Xml.Serialization.XmlInclude(typeof(Model))]
	public class Script : Model
	{
		[ScopedLinkByName] Plant Slurp1;
		[ScopedLinkByName] Plant Slurp2;
		[Link] Clock Clock;

		[Description("How many Slurps should be sown?")] public int NumSlurps { get; set; }
		[Description("Cultivar")] public string CultivarName { get; set; }
		[Description("Initial Root Depth")] public double InitialRootDepth { get; set; }
		[Description("Sowing Date")] public DateTime SowingDate { get; set; }

               
		[EventSubscribe("DoManagement")] private void OnDoManagement(object sender, EventArgs e)
		{
			if (Clock.Today.Date == SowingDate)
			{
				Slurp1.Sow(cultivar: CultivarName, population: 1, depth: InitialRootDepth, rowSpacing: 150);
				if (NumSlurps > 1)
					Slurp2.Sow(cultivar: CultivarName, population: 1, depth: InitialRootDepth, rowSpacing: 150);				
			}
		}
	}
}
```
              Manager SetProduction
                myNumSlurps = 0
                OverRidePath = Leaf.Photosynthesis.FixedValue
                ChangeDate = 1980-07-01
                OverRidePhoto = 6
                OverRideLAI = 3.5
                OverRideNUp = 4
```csharp
using System;
using Models.Core;
using System.Collections.Generic;
using System.Text;
using Models.PMF;
using Models;
using System.Xml.Serialization;
using APSIM.Shared.Utilities;

namespace Models
{
	[Serializable] 
	public class Script : Model
	{
		[Link] Plant Plant;
		[ScopedLinkByName] Plant Slurp1;
		[ScopedLinkByName] Plant Slurp2;
		[Link] Clock Clock;
		[Link] Zone zone;
		
		public int myNumSlurps { get; set; }
		public string OverRidePath { get; set; }
		
		[Description("Change Date")] public DateTime ChangeDate { get; set; }
		[Description("Value for Leaf.Photosynthesis.FixedValue")] public double OverRidePhoto { get; set; }
		[Description("Value for Leaf.LAIFunction.FixedValue")] public double OverRideLAI { get; set; }
		[Description("Value for Root.MaxDailyNUptake.FixedValue")] public double OverRideNUp { get; set; }
		//[Description("Value for new coefficient Integer")] public int OverRideInteger { get; set; }




		[EventSubscribe("StartOfSimulation")] private void OnStartOfSimulation(object sender, EventArgs e)
		{
			myNumSlurps = (int)zone.Get("[SlurpSowMulitple].Script.NumSlurps");
			OverRidePath = "Leaf.Photosynthesis.FixedValue";
		}
        
		[EventSubscribe("DoManagement")] private void OnDoManagement(object sender, EventArgs e)
		{
			if (Clock.Today.Date == ChangeDate)
			{
				object ResetValue = OverRidePhoto;
				OverRidePath = "Leaf.Photosynthesis.FixedValue";
				zone.Set("Slurp1." + OverRidePath, ResetValue);
				if (myNumSlurps > 1)
					zone.Set("Slurp2." + OverRidePath, ResetValue);

				ResetValue = OverRideLAI;
				OverRidePath = "Leaf.LAIFunction.FixedValue";
				zone.Set("Slurp1." + OverRidePath, ResetValue);
				if (myNumSlurps > 1)
					zone.Set("Slurp2." + OverRidePath, ResetValue);

				ResetValue = OverRidePhoto;
				OverRidePath = "Root.MaxDailyNUptake.FixedValue";
				zone.Set("Slurp1." + OverRidePath, ResetValue);
				if (myNumSlurps > 1)
					zone.Set("Slurp2." + OverRidePath, ResetValue);
			}
		}
	}
}
```
            MicroClimate: a_interception=0; b_interception=0; c_interception=0; d_interception=0; soil_albedo=0.23; sun_angle=15; soil_heat_flux_fraction=0.4; night_interception_fraction=0.5; refheight=2; albedo=0.293662; emissivity=0.96; RadIntTotal=0
            Irrigation
            Fertiliser
            SurfaceOrganicMatter: ReportAdditions=no; ReportRemovals=no; PoolName=Sward; type=grass; mass=1000; standing_fraction=0; cnr=15; CriticalResidueWeight=2000; OptimumDecompTemp=20; MaxCumulativeEOS=20; CNRatioDecompCoeff=0.277; CNRatioDecompThreshold=25; TotalLeachRain=25; MinRainToLeach=10; CriticalMinimumOrganicC=0.004; DefaultCPRatio=0; DefaultStandingFraction=0; StandingExtinctCoeff=0.5; FractionFaecesAdded=0.5
              Pools:
                {PoolName=Sward, ResidueType=grass, Mass=1000, CNRatio=15, StandingFraction=0}
              ResidueTypes: LoadFromResource=ResidueTypes
              TillageTypes TillageTypesList
            SoluteManager
            Plant Slurp1: ResourceName=Slurp; CropType=Slurp
            Plant Slurp2: ResourceName=Slurp; CropType=Slurp
            Soil LismoreSoil: SoilType=NZ_Sedimentary; LocalName=Lismore; Site=Winchmore; NearestTown=Ashburton; Region=Canterbury; Country=New Zealand; Latitude=-48.48; Longitude=0
              Analysis: PHUnits=Water; BoronUnits=HotWater
                Thickness  Rocks  PH  CEC   ParticleSizeSand  ParticleSizeSilt  ParticleSizeClay
                150        0      6   12.5  15                65                20
                150        0      6   10    20                65                15
                200        10     6   9     25                63                12
                150        40     6   5     35                57                8
                250        60     6   4     40                54                6
                300        70     6   4     40                55                5
                300        70     6   4     40                55                5
              Water
                Thickness  BD    AirDry  LL15   DUL    SAT   KS
                150        1.3   0.05    0.15   0.36   0.45  5000
                150        1.35  0.12    0.14   0.34   0.43  2500
                200        1     0.055   0.055  0.19   0.25  3000
                150        0.53  0.015   0.015  0.065  0.15  10000
                250        0.31  0.01    0.01   0.04   0.11  17500
                300        0.3   0.01    0.01   0.03   0.11  20000
                300        0.3   0.01    0.01   0.03   0.11  20000
                SoilCrop SwardSoil: LL=[0.15, 0.14, 0.06, 0.02, 0.01, 0.01, 0.01]; KL=[0.1, 0.1, 0.08, 0.04, 0.01, 0, 0]; XF=[1, 1, 1, 1, 1, 0, 0]
                SoilCrop RyegrassSoil: LL=[0.15, 0.14, 0.06, 0.02, 0.01, 0.01, 0.01]; KL=[0.1, 0.1, 0.08, 0.04, 0.01, 0, 0]; XF=[1, 1, 1, 1, 1, 0, 0]
                SoilCrop WhiteCloverSoil: LL=[0.15, 0.14, 0.06, 0.02, 0.01, 0.01, 0.01]; KL=[0.1, 0.1, 0.08, 0.04, 0.01, 0, 0]; XF=[1, 1, 1, 1, 1, 0, 0]
                SoilCrop Slurp1Soil: LL=[0.15, 0.14, 0.06, 0.02, 0.01, 0.01, 0.01]; KL=[0.1, 0.1, 0.08, 0.04, 0.01, 0, 0]; XF=[1, 1, 1, 1, 1, 0, 0]
                SoilCrop Slurp2Soil: LL=[0.15, 0.14, 0.06, 0.02, 0.01, 0.01, 0.01]; KL=[0.1, 0.1, 0.08, 0.04, 0.01, 0, 0]; XF=[1, 1, 1, 1, 1, 0, 0]
              SoilWater: SummerDate=1-Nov; SummerU=6; SummerCona=3.5; WinterDate=1-apr; WinterU=2; WinterCona=2; DiffusConst=88; DiffusSlope=35; Salb=0.13; CN2Bare=73; CNRed=20; CNCov=0.8; slope=0; discharge_width=0; catchment_area=0; max_pond=0; residueinterception=0
                Thickness  SWCON  KLAT
                150        0.5    0
                150        0.52   0
                200        0.55   0
                150        0.6    0
                250        0.65   0
                300        0.65   0
                300        0.65   0
              SoilNitrogen: fom_type=[default, manure, mucuna, lablab, shemp, stable]; fract_carb=[0.2, 0.3, 0.54, 0.57, 0.45, 0]; fract_cell=[0.7, 0.3, 0.37, 0.37, 0.47, 0.1]; fract_lign=[0.1, 0.4, 0.09, 0.06, 0.08, 0.9]; wfpsN2N2O_x=[22, 88]; wfpsN2N2O_y=[0.1, 1]
                oc=[3.71368, 2.46983, 1.2384, 0.49836, 0.250251, 0.150353, 0.100194]
              SoilOrganicMatter: RootCN=40; RootWt=1000; SoilCN=12; EnrACoeff=7.4; EnrBCoeff=0.2; OCUnits=Total
                Thickness  OC    FBiom  FInert
                150        3     0.04   0.5
                150        1     0.02   0.7
                200        0.6   0.02   0.83
                150        0.4   0.01   0.9
                250        0.25  0.01   0.95
                300        0.15  0      0.99
                300        0.1   0      0.99
              InitialWater Initial water: PercentMethod=EvenlyDistributed; FractionFull=0.95
              Sample Initial nitrogen: NO3Units=ppm; NH4Units=ppm; SWUnits=Volumetric; OCUnits=Total; PHUnits=Water
                Thickness  NO3  NH4
                150        50   0.1
                150        50   0.1
                200        50   0.1
                150        50   0.1
                250        50   0.1
                300        50   0.1
                300        50   0.1
              CERESSoilTemperature
            Report BasicConceptualTest: EventNames=[Clock].EndOfDay
              VariableNames:
                [Clock].Today as Date
                [SlurpSowMulitple].Script.NumSlurps as NumSlurps
                [Slurp1].Leaf.Wt
                [Slurp2].Leaf.Wt
                [Slurp1].Root.NTakenUp
                [Slurp2].Root.NTakenUp
                [Slurp1].Root.WaterUptake
                [Slurp2].Root.WaterUptake
                ([Slurp1].Leaf.Wt+[Slurp2].Leaf.Wt) as LeafWt
                ([Slurp1].Leaf.LAI+[Slurp2].Leaf.LAI) as LAI
                ([Slurp1].Root.WaterUptake+[Slurp2].Root.WaterUptake) as WaterTakenUp
                ([Slurp1].Root.NTakenUp+[Slurp2].Root.NTakenUp) as NTakenUp
                sum([LismoreSoil].SoilNitrogen.NO3)
                sum([LismoreSoil].SoilWater.SWmm)
    Folder AgPasture Deep Soil Test
      Memo Memo AgPastureDeepSoilTest
        This next series of tests uses a dynamic (full) crop model so that any discrepancies in water or N supply to the plant will produce feedbacks into demand and subsequent uptake.  In this series of tests each simulation contains two ryegrass models.  In the “Equal” simulations both ryegrasses have a rooting depth of 750 mm while in the “Unequal” simulations Rye1 has a 750 mm root depth but Rye2 has a 150 mm root depth.  In all other respects the crops are equal.  Simulations are run with unlimited irrigation and fertiliser (“IrrigFert”) and without either input supplied (“DryNofert”).  The simulations use a soil with 132 mm of PAW to 750 mm deep in the Lincoln environment.

        The first two graphs show that there is no difference in standing herbage between the ryegrasses if they have the same rooting depth.  Graphs 3 and 4 show the significant advantage that the deeper-rooting Rye1 has over Rye2 in the Unequal simulations.

        The fifth graph “Yield” shows that there is a slight yield advantage, persistent despite inputs of irrigation or fertiliser, when the rooting depths are equal and deep.  This shows that the yield from the deeper-rooting Rye1 cannot completely compensate for the loss of yield from the shallow-rooting Rye2.  The sixth graph shows the proportion of the total yield originating from Rye1.  In the Equal simulations this sits, of course, at 0.5.  However, in the Unequal simulations the proportion of yield from Rye1 rises to 0.65 with earlier increases in this proportion when no irrigation or fertiliser is applied.
      Experiment
        Factors
          Factor
            Factor EqualIrrigFert
              Specifications:
                [OnOffFertiliser].Script.FertOn = 1
                [OnOffIrrigation].Script.IrrigOn = 1
            Factor EqualDryNofert
              Specifications:
                [OnOffFertiliser].Script.FertOn = 0
                [OnOffIrrigation].Script.IrrigOn = 0
            Factor UnequalIrrigFert
              Specifications:
                [OnOffFertiliser].Script.FertOn = 1
                [OnOffIrrigation].Script.IrrigOn = 1
                [Rye2].RootDepthMaximum = 150
                [Rye2].InitialRootDepth = 150
            Factor UnequalDryNofert
              Specifications:
                [OnOffFertiliser].Script.FertOn = 0
                [OnOffIrrigation].Script.IrrigOn = 0
                [Rye2].RootDepthMaximum = 150
                [Rye2].InitialRootDepth = 150
        Simulation AgPastureDeepSoilTest
          Clock: StartDate=1971-07-01; EndDate=1972-06-30
          Weather: FileName=%root%\Examples\WeatherFiles\lincoln.met
          Summary
          SoilArbitrator
          Zone Field: Area=1; Slope=0
            Folder Managers
              Manager OnOffFertiliser
                AllowFertiliser = yes
                FertOn = 1
                Depth2SoilN = 200
                CriticalSoilN = 15
                FertNAmount = 25
                FertType = UreaN
                FertApplicationDepth = 1
                FertMinimumDays = 14
                script: same as in Tests of Multiple Crops in a Single Zone.Basic Conceptual Test.Experiment.BasicConceptualTest.Field.Managers.OnOffFertiliser
              Manager OnOffIrrigation: same as Tests of Multiple Crops in a Single Zone.Basic Conceptual Test.Experiment.BasicConceptualTest.Field.Managers.OnOffIrrigation
              Manager CutRotation
                rotationAllowed = True
                CutRotationStartDate = 1900-07-01
                CutRotationEndDate = 2100-12-31
                CutInterval = 21
                IntervalType = FixedInterval
                DurationOfCut = 1
                RemoveAmountType = ResidualDM
                AmountGiven = 1000
                DMRemoveType = RemoveAll
                FractionN2Remove = 1
                ProportionN2Dung = 0
```csharp
// Defoliates AgPasture on a regular rotation or one-off via a schedule
// currenty defoliates the amount specified by spreading evenly over the specified period

using System;
using System.Collections.Generic;
using System.Xml.Serialization;
using Models.Core;
using Models.PMF;
using APSIM.Shared.Utilities;

namespace Models
{
	[Serializable]
	public class Script : Model
	{
		// - Links to APSIM models
		[Link] Zone myZone;
		[Link] Clock Clock;
		[Link] Fertiliser fertiliser;
		[Link] ISummary summary = null;
		
		List<AgPasture.PastureSpecies> Pasture = new List<AgPasture.PastureSpecies>();
		
		// - Paramters for this manager
		[Description("Do the grazing/cutting?: ")] public bool rotationAllowed { get; set; }
		[Description("Date to begin the rotation: ")] public DateTime CutRotationStartDate { get; set; }
		[Description("Date to finish the rotation: ")] public DateTime CutRotationEndDate { get; set; }
		[Description("Rotation interval (days): ")] public int CutInterval { get; set; }
		[Description("How the interval is defined: ")] public rotationIntervalTypes IntervalType { get; set; }
		[Description("Duration of each event (days): ")] public int DurationOfCut { get; set; }
		[Description("What amount is being defined: ")] public removeAmountTypes RemoveAmountType { get; set; }
		[Description("Amount to use (kg/ha): ")] public double AmountGiven { get; set; }
		[Description("Fraction of DM that is removed from the field:")] public removeDMTypes DMRemoveType { get; set; }
		[Description("Fraction of N that is removed from the field (0-1):")] public double FractionN2Remove { get; set; }
		[Description("Proportion of N returned in dung (0-1):")] public double ProportionN2Dung { get; set; }

		// - Outputs from this manager
		[XmlIgnore][Units("g/m2")] public double DefoliatedWt { get; set; }
		// Description: Pasture DM defoliated today
		[XmlIgnore][Units("g/m2")] public double DefoliatedN { get; set; }
		// Description: Pasture N defoliate today
		[XmlIgnore][Units("g/m2")] public double HarvestedWt { get; set; }
		// Description: Pasture DM harvested today
		[XmlIgnore][Units("g/m2")] public double HarvestedN { get; set; }
		// Description: Pasture N harvested today
		[XmlIgnore][Units("g/m2")] public double RemovedWt { get; set; }
		// Description: Pasture DM removed from the field
		[XmlIgnore][Units("g/m2")] public double RemovedN { get; set; }
		// Description: Pasture N removed from the field
		[XmlIgnore][Units("g/m2")] public double ReturnedWt { get; set; }
		// Description: Residue DM returned to the field
		[XmlIgnore][Units("g/m2")] public double ReturnedN { get; set; }
		// Description: Residue N returned to the field
		[XmlIgnore][Units("g/m2")] public double NReturnedInDung { get; set; }
		// Description: Harvested N returned as dung (SurfaceOM)
		[XmlIgnore][Units("g/m2")] public double NReturnedInUrine { get; set; }
		// Description: Harvested N returned as urine (urea)
		[XmlIgnore][Units("day")] public int DaysAfterCut { get; set; }
		// Description: Number of days after last defoliation
		[XmlIgnore][Units("g/m2")] public double PreHarvestDM { get; set; }
		// Description: Total standing DM (Leaf + Stem/Sheath) before cut
		[XmlIgnore][Units("g/m2")] public double PostHarvestDM { get; set; }
		// Description: Total standing DM (Leaf + Stem/Sheath) after cut
		
		// - Internal variables
		// fraction of harvested Dm to actually remove from field
		private double fractionDM2Remove = 1.0;
		// flag whether defoliation is allowed
		//private bool rotationAllowed = true;
		// number of days for each defoliation event
		private int cuttingDuration = 0;
		// counter for day within each defoliation
		private int daysCutting = 0;
		// type of interval (Fixed or target)
		private string intervalType;
		// total herbage to remove in g/m2 per day
		private double herbageToRemove;
		// type of DM amount (ResidualDM or DMToRemove)
		private string amountType;
		// auxiliary flag for defoliation
		private bool aCutHasHappened = false;

		// - Event to add residue or dung to surface OM
		public event BiomassRemovedDelegate BiomassRemoved;

		[EventSubscribe("Commencing")]
		private void OnSimulationCommencing(object sender, EventArgs e)
		{
			foreach (AgPasture.PastureSpecies species in Apsim.Children(myZone, typeof(AgPasture.PastureSpecies)))
			{
				Pasture.Add(species);
			}

			// reset variables
			DaysAfterCut = 0;
			resetVariables();
			cuttingDuration = DurationOfCut;
			
			// get the type of amount given
			if (RemoveAmountType == removeAmountTypes.ResidualDM)
				amountType = "SetResidueAmount";
			else
				amountType = "SetRemoveAmount";

			// get the type of amount given
			if (IntervalType == rotationIntervalTypes.FixedInterval)
				intervalType = "Fixed";
			else
				intervalType = "Target";

			// make sure that rotation starts when startDate < simulationStartDay
			if ((Clock.Today > CutRotationStartDate) && (Clock.Today < CutRotationEndDate))
				CutRotationStartDate = Clock.Today;
		}
		
		[EventSubscribe("DoManagement")]
		private void OnDoManagement(object sender, EventArgs e)
		{
			if (rotationAllowed)
			{
				if (Clock.Today == CutRotationStartDate)
					DaysAfterCut = CutInterval;

				bool SwardIsAlive = false;
				foreach (AgPasture.PastureSpecies species in Apsim.Children(myZone, typeof(AgPasture.PastureSpecies)))
				{
					if (species.IsAlive)
						SwardIsAlive = true;
				}
				
				// Check whether we can defoliate
				if ((Clock.Today >= CutRotationStartDate) && (Clock.Today <= CutRotationEndDate) && (SwardIsAlive))
				{
					// Check whether we should start a defoliation
					if (DaysAfterCut >= (CutInterval - 1))
					{
						Graze(AmountGiven, amountType, DurationOfCut);
					}
				}
			}

			// Check whether we need to continue cutting
			if ((daysCutting > 0) && (daysCutting < cuttingDuration))
			{
				// reset outputs
				resetVariables();

				removeDM(herbageToRemove);
				returnExcreta();
				daysCutting += 1;
				if (daysCutting == cuttingDuration)
				{
					PostHarvestDM = 0.0;
					foreach (AgPasture.PastureSpecies species in Apsim.Children(myZone, typeof(AgPasture.PastureSpecies)))
						PostHarvestDM += species.StandingHerbageWt;
				}
			}

			// reset outputs
			if (daysCutting < 0)
			{
				resetVariables();
				daysCutting = 0;
			}
		}

		[EventSubscribe("DoManagementCalculations")]
		private void OnDoManagementCalculations(object sender, EventArgs e)
		{
			// Check whether a cutting has finished
			if (daysCutting == cuttingDuration)
			{
				aCutHasHappened = true;
				daysCutting = -1;
			}

			// Increase the counter for days after cutting
			if (aCutHasHappened && (daysCutting == 0))
				DaysAfterCut += 1;
		}

		public enum removeAmountTypes
		{
			/// <summary>Setting DM amount to remove</summary>
			DMToRemove,
			/// <summary>Setting residual DM amount</summary>
			ResidualDM
		}

		public enum rotationIntervalTypes
		{
			/// <summary>Setting a fixed interval</summary>
			FixedInterval,
			/// <summary>Setting a target (minimum) inteval</summary>
			TargetInterval
		}

		public enum removeDMTypes
		{
			/// <summary>Remove all DM</summary>
			RemoveAll,
			/// <summary>Remove no DM</summary>
			RemoveNone,
			/// <summary>Remove a fraction based on digestibility</summary>
			BasedOnDigestibility
		}

		public enum answerType
		{
			/// <summary>a positive answer</summary>
			yes,
			/// <summary>a negative answer</summary>
			no
		}
		
				
		// Resets the values of all outputs
		private void resetVariables()
		{
			DefoliatedWt = 0.0;
			DefoliatedN = 0.0;
			HarvestedWt = 0.0;
			HarvestedN = 0.0;
			RemovedWt = 0.0;
			RemovedN = 0.0;
			ReturnedWt = 0.0;
			ReturnedN = 0.0;
			NReturnedInDung = 0.0;
			NReturnedInUrine = 0.0;
		}

		// Description: Perform the basic calculations for defoliation
		public void Graze(double amountDM, string amountType, int duration)
		{
			// Get the existing plant amount
			PreHarvestDM = 0.0;
			foreach (AgPasture.PastureSpecies species in Apsim.Children(myZone, typeof(AgPasture.PastureSpecies)))
				PreHarvestDM += species.StandingHerbageWt;
			
			// Check the amount to remove and print some info
			if ((amountType == "SetRemoveAmount") && (PreHarvestDM >= amountDM / duration))
			{
				summary.WriteMessage(this, "   Defoliating " + (10 * amountDM).ToString("#0.0") + "kg/ha over " + duration + " days");
				herbageToRemove = amountDM / duration;
			}
			else if ((amountType == "SetResidueAmount") && (PreHarvestDM >= amountDM))
			{
				summary.WriteMessage(this, "   Defoliating down to approximately " + (10 * amountDM).ToString("#0.0") + "kg/ha over " + duration + " days");
				herbageToRemove = (PreHarvestDM - amountDM) / duration;
			}
			else
			{
				summary.WriteMessage(this, "   Defoliation will not happend because there is not enough plant material");
				if (intervalType == "Fixed")
					DaysAfterCut = -duration;
				return;
			}

			cuttingDuration = duration;
			// Preform first defoliation
			removeDM(herbageToRemove);
			returnExcreta();
			daysCutting = 1;
			DaysAfterCut = 0;
			if (daysCutting == cuttingDuration)
			{
				PostHarvestDM = 0.0;
				foreach (AgPasture.PastureSpecies species in Apsim.Children(myZone, typeof(AgPasture.PastureSpecies)))
					PostHarvestDM += species.StandingHerbageWt;
			}
		}

		// Do the DM removal
		private void removeDM(double removeAmount)
		{
			double existingWt = 0.0;
			foreach (AgPasture.PastureSpecies species in Apsim.Children(myZone, typeof(AgPasture.PastureSpecies)))
				existingWt += species.HarvestableWt;


			// Check whether we harvest anything
			if (existingWt >= removeAmount)
			{
				foreach (AgPasture.PastureSpecies species in Pasture)
				{
					double amountToRemove = removeAmount * species.HarvestableWt / existingWt;
					species.Graze(amount: amountToRemove, type: "SetRemoveAmount");
				}
				
				// get total harvested
				DefoliatedWt = 0.0;
				foreach (AgPasture.PastureSpecies species in Apsim.Children(myZone, typeof(AgPasture.PastureSpecies)))
					DefoliatedWt += species.HarvestedWt;
				DefoliatedN = 0.0;
				foreach (AgPasture.PastureSpecies species in Apsim.Children(myZone, typeof(AgPasture.PastureSpecies)))
					DefoliatedN += species.HarvestedN;
				HarvestedWt = DefoliatedWt;
				HarvestedN = DefoliatedN;

				// get amounts actually removed from field and that to be returned (dung/urine)
				if (DMRemoveType == removeDMTypes.RemoveAll)
					fractionDM2Remove = 1.0;
				else if (DMRemoveType == removeDMTypes.RemoveNone)
					fractionDM2Remove = 0.0;
				else
				{
					fractionDM2Remove = 0.0;
					foreach (AgPasture.PastureSpecies species in Apsim.Children(myZone, typeof(AgPasture.PastureSpecies)))
						fractionDM2Remove += species.HarvestedDigestibility * species.HarvestedWt;
					fractionDM2Remove /= removeAmount;
				}
				
				RemovedWt = HarvestedWt * fractionDM2Remove;
				RemovedN = HarvestedN * FractionN2Remove;
				ReturnedWt = HarvestedWt - RemovedWt;
				ReturnedN = HarvestedN - RemovedN;
				NReturnedInDung = ReturnedN * ProportionN2Dung;
				NReturnedInUrine = ReturnedN - NReturnedInDung;
			}
		}

		// Return dung and urine
		private void returnExcreta()
		{
			if ((ReturnedWt > 0.0) || (NReturnedInDung > 0.0))
			{
				PMF.BiomassRemovedType BiomassDung = new PMF.BiomassRemovedType();
				string[] type = new string[] { "RuminantDung_PastureFed" };
				float[] dltdm = new float[] { (Single)ReturnedWt };
				float[] dltn = new float[] { (Single)NReturnedInDung };
				float[] dltp = new float[] { 0 };
				float[] fraction = new float[] { 1 };     // fraction is always 1.0 here

				BiomassDung.crop_type = "RuminantDung_PastureFed";
				BiomassDung.dm_type = type;
				BiomassDung.dlt_crop_dm = dltdm;
				BiomassDung.dlt_dm_n = dltn;
				BiomassDung.dlt_dm_p = dltp;
				BiomassDung.fraction_to_residue = fraction;
				BiomassRemoved.Invoke(BiomassDung);
			}

			if (NReturnedInUrine > 0.0)
			{
				fertiliser.Apply(NReturnedInUrine * 10, Fertiliser.Types.UreaN, 1.0);
			}
		}
	}
}
```
              Manager PropRye1
```csharp
// Defoliates AgPasture on a regular rotation or one-off via a schedule
// currenty defoliates the amount specified by spreading evenly over the specified period

using System;
using System.Collections.Generic;
using System.Xml.Serialization;
using Models.Core;
using Models.PMF;
using APSIM.Shared.Utilities;

namespace Models
{
	[Serializable]
	public class Script : Model
	{
		// - Links to APSIM models
		[Link] Zone myZone;
		[Link] Clock Clock;
		[Link] Fertiliser fertiliser;
		[Link] ISummary summary = null;
		
		List<AgPasture.PastureSpecies> Pasture = new List<AgPasture.PastureSpecies>();
		
		// - Paramters for this manager

		// - Outputs from this manager
		[XmlIgnore][Units("kg/kg")] public double PropYieldRye1 { get; set; }
		[XmlIgnore][Units("kg/ha")] public double YieldRye1 { get; set; }
		[XmlIgnore][Units("kg/ha")] public double YieldRye2 { get; set; }
		
		// - Internal variables
		//private double fractionDM2Remove = 1.0;

		// - Event to add residue or dung to surface OM
		//public event BiomassRemovedDelegate BiomassRemoved;

		[EventSubscribe("Commencing")]
		private void OnSimulationCommencing(object sender, EventArgs e)
		{
			foreach (AgPasture.PastureSpecies species in Apsim.Children(myZone, typeof(AgPasture.PastureSpecies)))
			{
				Pasture.Add(species);
			}
			YieldRye1 = 0.0;
			YieldRye2 = 0.0;
			PropYieldRye1 = 0.0;
		}
		


		[EventSubscribe("DoManagementCalculations")]
		private void OnDoManagementCalculations(object sender, EventArgs e)
		{
			foreach (AgPasture.PastureSpecies species in Apsim.Children(myZone, typeof(AgPasture.PastureSpecies)))
			{
				//Pasture.Add(species);
			}
			YieldRye1 += Pasture[0].HarvestedWt;
			YieldRye2 += Pasture[1].HarvestedWt;
			if ((YieldRye1 + YieldRye2) > 0.0)
				PropYieldRye1 = YieldRye1 / (YieldRye1 + YieldRye2);
		}

	}
}
```
            MicroClimate: a_interception=0; b_interception=0; c_interception=0; d_interception=0; soil_albedo=0.23; sun_angle=15; soil_heat_flux_fraction=0.4; night_interception_fraction=0.5; refheight=2; albedo=0.293662; emissivity=0.96; RadIntTotal=0
            Irrigation
            Fertiliser
            SurfaceOrganicMatter: same as Tests of Multiple Crops in a Single Zone.Basic Conceptual Test.Experiment.BasicConceptualTest.Field.SurfaceOrganicMatter
            SoluteManager
            PastureSpecies Rye1: MaximumNUptake=10; Albedo=0.26; Gsmax=0.011; R50=200; SpeciesFamily=Grass; PhotosyntheticPathway=C3; InitialShootDM=750; InitialRootDM=450; InitialRootDepth=750; ReferencePhotosyntheticRate=1; LightExtinctionCoefficient=0.5; GrowthTminimum=1; GrowthToptimum=20; GrowthTEffectExponent=1.7; UseHeatStressFactor=yes; HeatOnsetTemperature=28; HeatFullTemperature=35; HeatRecoverySumDD=30; HeatRecoveryTReference=25; UseColdStressFactor=yes; ColdOnsetTemperature=1; ColdFullTemperature=-5; ColdRecoverySumDD=25; ColdRecoveryTReference=0; MaintenanceRespirationCoefficient=0.03; GrowthRespirationCoefficient=0.25; RespirationTReference=20; RespirationExponent=1.5; NThresholdsForLeaves=[0.04, 0.012, 0.05]; NThresholdsForStems=[0.02, 0.006, 0.025]; NThresholdsForStolons=[0, 0, 0]; NThresholdsForRoots=[0.02, 0.006, 0.025]; DegreesDayForGermination=125; TargetShootRootRatio=4; MaxRootAllocation=0.25; ShootRootGlfFactor=0.5; UseReproSeasonFactor=yes; ReproSeasonReferenceLatitude=41; ReproSeasonTimingCoeff=0.14; ReproSeasonMaxAllocationIncrease=0.5; ReproSeasonAllocationCoeff=0.1; FractionLeafMaximum=0.7; FractionLeafMinimum=0.7; FractionLeafDMThreshold=500; FractionLeafDMFactor=2000; FractionLeafExponent=3; FractionToStolon=0; SpecificLeafArea=25; SpecificRootLength=100; StolonEffectOnLAI=0; ShootMaxEffectOnLAI=1000; MaxStemEffectOnLAI=1; LiveLeavesPerTiller=3; TissueTurnoverRateShoot=0.05; TissueTurnoverRateRoot=0.02; DetachmentRateShoot=0.08; TurnoverTemperatureMin=2; TurnoverTemperatureRef=20; TurnoverTemperatureExponent=1; TurnoverDroughtEffectMax=1; TurnoverDroughtThreshold=0.5; TurnoverDefoliationCoefficient=0.5; TurnoverDefoliationRootEffect=0.1; FractionNLuxuryRemobilisable=[0.1, 0.1, 0.1]; MinimumNFixation=0; MaximumNFixation=0; SoilSaturationEffectMax=0.1; MinimumWaterFreePorosity=-1; SoilSaturationRecoveryFactor=0.25; NDillutionCoefficient=0.25; GlfGeneric=1; GlfSoilFertility=1; PlantHeightMinimum=350; PlantHeightMaximum=350; PlantHeightMassForMax=10000; PlantHeightExponent=2.8; RootDepthMinimum=50; RootDepthMaximum=750; RootElongationRate=25; RootDistributionDepthParam=90; RootDistributionExponent=3.2; DigestibilitiesCellWall=[0.6, 0.6, 0.6, 0.2]; MinimumGreenWt=100; FractionStolonStanding=0; PreferenceForGreenOverDead=1; PreferenceForLeafOverStems=1; WaterAvailableMethod=DefaultAPSIM; NitrogenAvailableMethod=BasicAgPasture
            PastureSpecies Rye2: same as Tests of Multiple Crops in a Single Zone.AgPasture Deep Soil Test.Experiment.AgPastureDeepSoilTest.Field.Rye1
            Soil TempletonABlock: Latitude=0; Longitude=0
              Analysis: Thickness=[100, 200, 300, 300, 300, 300]; PH=[6.6, 6.2, 5.7, 5.5, 5.5, 5.5]; PHUnits=Water; BoronUnits=HotWater
              InitialWater Initial water: PercentMethod=EvenlyDistributed; FractionFull=1
              Water: KS=[4832, 389, 16, 16, 98]
                Thickness  BD    AirDry  LL15  DUL   SAT
                100        1     0.05    0.1   0.27  0.42
                200        1     0.05    0.1   0.27  0.4
                300        1.59  0.16    0.16  0.29  0.36
                300        1.57  0.17    0.17  0.3   0.37
                300        1.6   0.17    0.17  0.3   0.37
                300        1.6   0.12    0.12  0.3   0.32
                SoilCrop RyegrassSoil: LL=[0.13, 0.13, 0.1, 0.08, 0.11, 0.11]; KL=[0.06, 0.06, 0.06, 0.06, 0, 0]; XF=[1, 1, 1, 1, 0, 0]
                SoilCrop WhiteCloverSoil: LL=[0.13, 0.13, 0.1, 0.08, 0.11, 0.11]; KL=[0.06, 0.06, 0.06, 0.06, 0, 0]; XF=[1, 1, 1, 1, 0, 0]
                SoilCrop Rye1Soil: LL=[0.13, 0.13, 0.1, 0.08, 0.11, 0.11]; KL=[0.06, 0.06, 0.06, 0.06, 0, 0]; XF=[1, 1, 1, 1, 0, 0]
                SoilCrop Rye2Soil: LL=[0.13, 0.13, 0.1, 0.08, 0.11, 0.11]; KL=[0.06, 0.06, 0.06, 0.06, 0, 0]; XF=[1, 1, 1, 1, 0, 0]
              SoilWater: SummerDate=1-Nov; SummerU=9; SummerCona=4.4; WinterDate=1-Apr; WinterU=9; WinterCona=4.4; DiffusConst=88; DiffusSlope=35.4; Salb=0.18; CN2Bare=68; CNRed=20; CNCov=0.8; max_pond=0; Thickness=[100, 200, 300, 300, 300, 300]; SWCON=[0.55, 0.55, 0.55, 0.55, 0.55, 0.55]; residueinterception=0
              SoilNitrogen: fom_type=[default, manure, mucuna, lablab, shemp, stable]; fract_carb=[0.2, 0.3, 0.54, 0.57, 0.45, 0]; fract_cell=[0.7, 0.3, 0.37, 0.37, 0.47, 0.1]; fract_lign=[0.1, 0.4, 0.09, 0.06, 0.08, 0.9]; wfpsN2N2O_x=[22, 88]; wfpsN2N2O_y=[0.1, 1]
              SoilOrganicMatter: RootCN=30; RootWt=3000; SoilCN=11.5; EnrACoeff=7.4; EnrBCoeff=0.2; OCUnits=Total
                Thickness  OC    FBiom  FInert
                100        1.82  0.025  0.3
                200        1.47  0.025  0.4
                300        1.2   0.015  0.75
                300        1.03  0.01   0.9
                300        0.47  0.01   0.96
                300        0.47  0.01   0.96
              Sample: NO3Units=kgha; NH4Units=ppm; SWUnits=Volumetric; OCUnits=Total; PHUnits=Water
                Thickness  NO3   NH4
                100        27.3  4.3
                200        22.8  7.6
                300        1.2   4.1
                300        9.2   2.7
                300        9.2   2.4
                300        1     0.1
              CERESSoilTemperature
            Report AgPastureDeepSoilTest: EventNames=[Clock].EndOfDay
              VariableNames:
                [Clock].Today as Date
                sum([TempletonABlock].SoilNitrogen.NO3) as NO3
                sum([TempletonABlock].SoilWater.SWmm) as SWDep
                [Rye1].AboveGroundWt
                [Rye2].AboveGroundWt
                [Rye1].HarvestedWt
                [Rye2].HarvestedWt
                ([Rye1].HarvestedWt + [Rye2].HarvestedWt) as Yield
                [PropRye1].Script.PropYieldRye1 as PropYieldRye1
                ([Fertiliser].NitrogenApplied-( 10.0 * [CutRotation].Script.NReturnedInUrine)) as RealFert
                [Rye2].RootDepth
    Folder AgPasture Shallow Soil Test
      Memo Memo AgPastureShallowSoilTest
        This series of simulations is as for “AgPasture Deep Soil Test” but substituting a soil with a lower soil water storage - 60 mm to 750 mm deep.  The graphs of the simulations with equal ryegrasses are not repeated but the standing herbage from the equal ryegrass simulations are shown as a reference on the first two graphs.

        Under conditions of no irrigation or fertiliser the differences between Rye1 and Rye2 are intensified under the shallow soil compared to the earlier simulations with the deep soil.  The proportion of the total yield from Rye1 is greater in the shallow than the deep soil but still reaches a maximum of 0.67.  The dominance of Rye1 seems limited by the couple of months (in winter) at the beginning of the simulation in which the shallow-rooted Rye2 is not much constrained by its shallow root depth.
      Experiment
        Factors: same as Tests of Multiple Crops in a Single Zone.AgPasture Deep Soil Test.Experiment.Factors
        Simulation AgPastureShallowSoilTest
          Clock: StartDate=1971-07-01; EndDate=1972-06-30
          Weather: FileName=%root%\Examples\WeatherFiles\lincoln.met
          Summary
          SoilArbitrator
          Zone Field: Area=1; Slope=0
            Folder Managers: same as Tests of Multiple Crops in a Single Zone.AgPasture Deep Soil Test.Experiment.AgPastureDeepSoilTest.Field.Managers
            MicroClimate: a_interception=0; b_interception=0; c_interception=0; d_interception=0; soil_albedo=0.23; sun_angle=15; soil_heat_flux_fraction=0.4; night_interception_fraction=0.5; refheight=2; albedo=0.293662; emissivity=0.96; RadIntTotal=0
            Irrigation
            Fertiliser
            SurfaceOrganicMatter: same as Tests of Multiple Crops in a Single Zone.Basic Conceptual Test.Experiment.BasicConceptualTest.Field.SurfaceOrganicMatter
            SoluteManager
            PastureSpecies Rye1: same as Tests of Multiple Crops in a Single Zone.AgPasture Deep Soil Test.Experiment.AgPastureDeepSoilTest.Field.Rye1
            PastureSpecies Rye2: same as Tests of Multiple Crops in a Single Zone.AgPasture Deep Soil Test.Experiment.AgPastureDeepSoilTest.Field.Rye1
            Soil ShallowSoil: SoilType=NZ_Sedimentary; LocalName=Lismore; Site=Winchmore; NearestTown=Ashburton; Region=Canterbury; Country=New Zealand; Latitude=-48.48; Longitude=0
              Analysis: same as Tests of Multiple Crops in a Single Zone.Basic Conceptual Test.Experiment.BasicConceptualTest.Field.LismoreSoil.Analysis
              Water
                Thickness  BD    AirDry  LL15   DUL   SAT   KS
                150        1.3   0.05    0.15   0.25  0.45  5000
                150        1.35  0.12    0.14   0.22  0.43  2500
                200        1     0.055   0.055  0.15  0.25  3000
                150        0.53  0.015   0.015  0.05  0.15  10000
                250        0.31  0.01    0.01   0.03  0.11  17500
                300        0.3   0.01    0.01   0.03  0.11  20000
                300        0.3   0.01    0.01   0.03  0.11  20000
                SoilCrop SwardSoil: LL=[0.15, 0.14, 0.06, 0.02, 0.01, 0.01, 0.01]; KL=[0.1, 0.1, 0.08, 0.04, 0.01, 0, 0]; XF=[1, 1, 1, 1, 1, 0, 0]
                SoilCrop RyegrassSoil: LL=[0.15, 0.14, 0.06, 0.02, 0.01, 0.01, 0.01]; KL=[0.1, 0.1, 0.08, 0.04, 0.01, 0, 0]; XF=[1, 1, 1, 1, 1, 0, 0]
                SoilCrop WhiteCloverSoil: LL=[0.15, 0.14, 0.06, 0.02, 0.01, 0.01, 0.01]; KL=[0.1, 0.1, 0.08, 0.04, 0.01, 0, 0]; XF=[1, 1, 1, 1, 1, 0, 0]
                SoilCrop Slurp1Soil: LL=[0.15, 0.14, 0.06, 0.02, 0.01, 0.01, 0.01]; KL=[0.1, 0.1, 0.08, 0.04, 0.01, 0, 0]; XF=[1, 1, 1, 1, 1, 0, 0]
                SoilCrop Slurp2Soil: LL=[0.15, 0.14, 0.06, 0.02, 0.01, 0.01, 0.01]; KL=[0.1, 0.1, 0.08, 0.04, 0.01, 0, 0]; XF=[1, 1, 1, 1, 1, 0, 0]
                SoilCrop Rye1Soil: LL=[0.15, 0.14, 0.06, 0.02, 0.01, 0.01, 0.01]; KL=[0.1, 0.1, 0.08, 0.04, 0.01, 0, 0]; XF=[1, 1, 1, 1, 1, 0, 0]
                SoilCrop Rye2Soil: LL=[0.15, 0.14, 0.06, 0.02, 0.01, 0.01, 0.01]; KL=[0.1, 0.1, 0.08, 0.04, 0.01, 0, 0]; XF=[1, 1, 1, 1, 1, 0, 0]
              SoilWater: same as Tests of Multiple Crops in a Single Zone.Basic Conceptual Test.Experiment.BasicConceptualTest.Field.LismoreSoil.SoilWater
              SoilNitrogen: same as Tests of Multiple Crops in a Single Zone.Basic Conceptual Test.Experiment.BasicConceptualTest.Field.LismoreSoil.SoilNitrogen
              SoilOrganicMatter: same as Tests of Multiple Crops in a Single Zone.Basic Conceptual Test.Experiment.BasicConceptualTest.Field.LismoreSoil.SoilOrganicMatter
              InitialWater Initial water: PercentMethod=EvenlyDistributed; FractionFull=0.95
              Sample Initial nitrogen: NO3Units=ppm; NH4Units=ppm; SWUnits=Volumetric; OCUnits=Total; PHUnits=Water
                Thickness  NO3  NH4
                150        50   0.1
                150        50   0.1
                200        50   0.1
                150        50   0.1
                250        50   0.1
                300        50   0.1
                300        50   0.1
              CERESSoilTemperature
            Report AgPastureShallowSoilTest: EventNames=[Clock].EndOfDay
              VariableNames:
                [Clock].Today as Date
                sum([ShallowSoil].SoilNitrogen.NO3) as NO3
                sum([ShallowSoil].SoilWater.SWmm) as SWDep
                [Rye1].AboveGroundWt
                [Rye2].AboveGroundWt
                [Rye1].HarvestedWt
                [Rye2].HarvestedWt
                ([Rye1].HarvestedWt + [Rye2].HarvestedWt) as Yield
                [PropRye1].Script.PropYieldRye1 as PropYieldRye1
                ([Fertiliser].NitrogenApplied-( 10.0 * [CutRotation].Script.NReturnedInUrine)) as RealFert
                [Rye2].RootDepth
    Folder AgPasture Test Root Depth Differential
      Memo Memo AgPastureTestRootDepthDifferential
        This series of simulations is as for “AgPasture Deep Soil Test” but applying a range of rooting depths to Rye2 while leaving Rye1 at a rooting depth of 750 mm.  The simulations use a soil with 132 mm of PAW to 750 mm deep in the Lincoln environment and are not fertilised or irrigated.

        Total yield (first graph) again shows the small yield penalty as the root systems become more unequal.  Against this trend the total yield (Rye1 + Rye2) when Rye2 has a 100 mm rooting depth is slightly higher (~ 50 kg DM /ha or < 1 % of the total yield) than when Rye2 has a rooting depth of 225 mm.  The most likely explanation is that of less competition effect from the shallowest-rooting Rye2.  The proportion of the total yield arising from the deeper-rooted Rye1 (second graph) ranges from 0.5 for the equal root depth scenario to 0.7 for the scenario with the shallowest Rye2.  Graphs 3 and 4 show the cumulative harvested yield from each of the grasses – the patterns are sensible given the changes in rooting depth.

        The final two graphs show the degree of water stress (1 is no stress) in December and January for each of the grasses.  As the root depth of Rye2 decreases, water stress in Rye1 shows a slower onset and a reduction in magnitude.  Again, these patterns meet expectations.
      Experiment
        Factors
          Factor
            Factor 750mm
              Specifications:
                [OnOffFertiliser].Script.FertOn = 0
                [OnOffIrrigation].Script.IrrigOn = 0
                [Rye2].RootDepthMaximum = 750
                [Rye2].InitialRootDepth = 750
            Factor 500mm
              Specifications:
                [OnOffFertiliser].Script.FertOn = 0
                [OnOffIrrigation].Script.IrrigOn = 0
                [Rye2].RootDepthMaximum = 500
                [Rye2].InitialRootDepth = 500
            Factor 350mm
              Specifications:
                [OnOffFertiliser].Script.FertOn = 0
                [OnOffIrrigation].Script.IrrigOn = 0
                [Rye2].RootDepthMaximum = 350
                [Rye2].InitialRootDepth = 350
            Factor 225mm
              Specifications:
                [OnOffFertiliser].Script.FertOn = 0
                [OnOffIrrigation].Script.IrrigOn = 0
                [Rye2].RootDepthMaximum = 225
                [Rye2].InitialRootDepth = 225
            Factor 100mm
              Specifications:
                [OnOffFertiliser].Script.FertOn = 0
                [OnOffIrrigation].Script.IrrigOn = 0
                [Rye2].RootDepthMaximum = 100
                [Rye2].InitialRootDepth = 100
        Simulation AgPastureTestRootDepthDifferential
          Clock: StartDate=1971-07-01; EndDate=1972-06-30
          Weather: FileName=%root%\Examples\WeatherFiles\lincoln.met
          Summary
          SoilArbitrator
          Zone Field: Area=1; Slope=0
            Folder Managers: same as Tests of Multiple Crops in a Single Zone.AgPasture Deep Soil Test.Experiment.AgPastureDeepSoilTest.Field.Managers
            SurfaceOrganicMatter: same as Tests of Multiple Crops in a Single Zone.Basic Conceptual Test.Experiment.BasicConceptualTest.Field.SurfaceOrganicMatter
            MicroClimate: a_interception=0; b_interception=0; c_interception=0; d_interception=0; soil_albedo=0.23; sun_angle=15; soil_heat_flux_fraction=0.4; night_interception_fraction=0.5; refheight=2; albedo=0.293662; emissivity=0.96; RadIntTotal=0
            Irrigation
            Fertiliser
            SoluteManager
            PastureSpecies Rye1: same as Tests of Multiple Crops in a Single Zone.AgPasture Deep Soil Test.Experiment.AgPastureDeepSoilTest.Field.Rye1
            PastureSpecies Rye2: same as Tests of Multiple Crops in a Single Zone.AgPasture Deep Soil Test.Experiment.AgPastureDeepSoilTest.Field.Rye1
            Soil: same as Tests of Multiple Crops in a Single Zone.AgPasture Deep Soil Test.Experiment.AgPastureDeepSoilTest.Field.TempletonABlock
            Report AgPastureTestRootDepthDifferential: EventNames=[Clock].EndOfDay
              VariableNames:
                [Clock].Today as Date
                [Clock].Today.Month
                [Clock].Today.Year
                sum([Soil].SoilNitrogen.NO3) as NO3
                sum([Soil].SoilWater.SWmm) as SWDep
                [Rye1].AboveGroundWt
                [Rye2].AboveGroundWt
                [Rye1].HarvestedWt
                [Rye2].HarvestedWt
                ([Rye1].HarvestedWt + [Rye2].HarvestedWt) as Yield
                [PropRye1].Script.PropYieldRye1 as PropYieldRye1
                ([Fertiliser].NitrogenApplied-( 10.0 * [CutRotation].Script.NReturnedInUrine)) as RealFert
                [Rye2].RootDepth
                [Rye2].GlfWaterSupply
                sum([Rye2].WaterAvailable)
                sum([Rye2].WaterUptake)
                [Rye1].GlfWaterSupply
    Folder A Ryegrass and White Clover Example
      Memo Memo RyegrassWhiteCloverExample
        The final test in the single zone set is of a typical ryegrass and white clover pasture.  The white clover has a rooting depth of 150 mm and the ryegrass has roots down to 750 mm deep.  The simulations use a soil with 132 mm of PAW to 750 mm deep in the Lincoln environment which the pasture harvested by cutting down to 1000 kg DM /ha every 21 days with all herbage removed from the paddock. The simulation is run for ten years and in three combinations: no irrigation or fertiliser, irrigation but no fertiliser, and both irrigation and fertiliser.

        The first graph shows the proportion of the total harvested dry matter that was ryegrass and the next three graphs show the standing dry matter of the white clover (pink) and the total (clover plus ryegrass) sward.  In this deep soil with no irrigation or fertiliser and under a cutting regime, the grass and clover stabilise to about 35% grass and 65% clover.  The soil here allows for reasonable growth in the shallow-rooted clover and the poor nutrient status of the soil (no nutrient returns at all) gives the clover a competitive advantage.  When fertiliser is added to the dry simulation the sward becomes 90% grass (not shown).  With irrigation but no fertiliser, the sward becomes clover dominant (about 70%) but when fertilised the sward swaps to grass-dominant (about 20% clover).  These patterns make sense given the physiological characteristics of the individual plants and suggests that the Runge-Kutta method is a reasonable representation of the competitive processes in the soil.
      Experiment
        Factors
          Factor
            Factor 0_DryNone
              Specifications:
                [OnOffFertiliser].Script.FertOn = 0
                [OnOffIrrigation].Script.IrrigOn = 0
            Factor 1_IrrigNone
              Specifications:
                [OnOffFertiliser].Script.FertOn = 0
                [OnOffIrrigation].Script.IrrigOn = 1
            Factor 2_IrrigFert
              Specifications:
                [OnOffFertiliser].Script.FertOn = 1
                [OnOffIrrigation].Script.IrrigOn = 1
        Simulation RyegrassWhiteCloverExample
          Clock: StartDate=2000-07-01; EndDate=2010-06-30
          Weather: FileName=%root%\Examples\WeatherFiles\lincoln.met
          Summary
          SoilArbitrator
          Zone Field: Area=1; Slope=0
            Folder Managers: same as Tests of Multiple Crops in a Single Zone.AgPasture Deep Soil Test.Experiment.AgPastureDeepSoilTest.Field.Managers
            SurfaceOrganicMatter: same as Tests of Multiple Crops in a Single Zone.Basic Conceptual Test.Experiment.BasicConceptualTest.Field.SurfaceOrganicMatter
            MicroClimate: a_interception=0; b_interception=0; c_interception=0; d_interception=0; soil_albedo=0.23; sun_angle=15; soil_heat_flux_fraction=0.4; night_interception_fraction=0.5; refheight=2; albedo=0.293662; emissivity=0.96; RadIntTotal=0
            Irrigation
            Fertiliser
            SoluteManager
            PastureSpecies Ryegrass: MaximumNUptake=10; Albedo=0.26; Gsmax=0.011; R50=200; SpeciesFamily=Grass; PhotosyntheticPathway=C3; InitialShootDM=750; InitialRootDM=450; InitialRootDepth=750; ReferencePhotosyntheticRate=1; LightExtinctionCoefficient=0.5; GrowthTminimum=1; GrowthToptimum=20; GrowthTEffectExponent=1.7; UseHeatStressFactor=yes; HeatOnsetTemperature=28; HeatFullTemperature=35; HeatRecoverySumDD=30; HeatRecoveryTReference=25; UseColdStressFactor=yes; ColdOnsetTemperature=1; ColdFullTemperature=-5; ColdRecoverySumDD=25; ColdRecoveryTReference=0; MaintenanceRespirationCoefficient=0.03; GrowthRespirationCoefficient=0.25; RespirationTReference=20; RespirationExponent=1.5; NThresholdsForLeaves=[0.04, 0.012, 0.05]; NThresholdsForStems=[0.02, 0.006, 0.025]; NThresholdsForStolons=[0, 0, 0]; NThresholdsForRoots=[0.02, 0.006, 0.025]; DegreesDayForGermination=125; TargetShootRootRatio=4; MaxRootAllocation=0.25; ShootRootGlfFactor=0.5; UseReproSeasonFactor=yes; ReproSeasonReferenceLatitude=41; ReproSeasonTimingCoeff=0.14; ReproSeasonMaxAllocationIncrease=0.5; ReproSeasonAllocationCoeff=0.1; FractionLeafMaximum=0.7; FractionLeafMinimum=0.7; FractionLeafDMThreshold=500; FractionLeafDMFactor=2000; FractionLeafExponent=3; FractionToStolon=0; SpecificLeafArea=25; SpecificRootLength=100; StolonEffectOnLAI=0; ShootMaxEffectOnLAI=1000; MaxStemEffectOnLAI=1; LiveLeavesPerTiller=3; TissueTurnoverRateShoot=0.05; TissueTurnoverRateRoot=0.02; DetachmentRateShoot=0.08; TurnoverTemperatureMin=2; TurnoverTemperatureRef=20; TurnoverTemperatureExponent=1; TurnoverDroughtEffectMax=1; TurnoverDroughtThreshold=0.5; TurnoverDefoliationCoefficient=0.5; TurnoverDefoliationRootEffect=0.1; FractionNLuxuryRemobilisable=[0.1, 0.1, 0.1]; MinimumNFixation=0; MaximumNFixation=0; SoilSaturationEffectMax=0.1; MinimumWaterFreePorosity=-1; SoilSaturationRecoveryFactor=0.25; NDillutionCoefficient=0.25; GlfGeneric=1; GlfSoilFertility=1; PlantHeightMinimum=25; PlantHeightMaximum=600; PlantHeightMassForMax=10000; PlantHeightExponent=2.8; RootDepthMinimum=50; RootDepthMaximum=750; RootElongationRate=25; RootDistributionDepthParam=90; RootDistributionExponent=3.2; DigestibilitiesCellWall=[0.6, 0.6, 0.6, 0.2]; MinimumGreenWt=100; FractionStolonStanding=0; PreferenceForGreenOverDead=1; PreferenceForLeafOverStems=1; WaterAvailableMethod=DefaultAPSIM; NitrogenAvailableMethod=BasicAgPasture
            PastureSpecies WhiteClover: MaximumNUptake=10; Albedo=0.26; Gsmax=0.011; R50=200; SpeciesFamily=Legume; PhotosyntheticPathway=C3; InitialShootDM=500; InitialRootDM=150; InitialRootDepth=150; ReferencePhotosyntheticRate=1; LightExtinctionCoefficient=0.8; GrowthTminimum=2; GrowthToptimum=22; GrowthTEffectExponent=1.7; UseHeatStressFactor=yes; HeatOnsetTemperature=30; HeatFullTemperature=36; HeatRecoverySumDD=20; HeatRecoveryTReference=25; UseColdStressFactor=yes; ColdOnsetTemperature=2; ColdFullTemperature=-5; ColdRecoverySumDD=30; ColdRecoveryTReference=0; MaintenanceRespirationCoefficient=0.04; GrowthRespirationCoefficient=0.25; RespirationTReference=20; RespirationExponent=1.5; NThresholdsForLeaves=[0.045, 0.02, 0.055]; NThresholdsForStems=[0.0225, 0.01, 0.0275]; NThresholdsForStolons=[0.0225, 0.01, 0.0275]; NThresholdsForRoots=[0.0225, 0.01, 0.0275]; DegreesDayForGermination=125; TargetShootRootRatio=4; MaxRootAllocation=0.25; ShootRootGlfFactor=0.5; UseReproSeasonFactor=yes; ReproSeasonReferenceLatitude=41; ReproSeasonTimingCoeff=0.14; ReproSeasonMaxAllocationIncrease=0.5; ReproSeasonAllocationCoeff=0.1; FractionLeafMaximum=0.56; FractionLeafMinimum=0.28; FractionLeafDMThreshold=500; FractionLeafDMFactor=2000; FractionLeafExponent=3; FractionToStolon=0.2; SpecificLeafArea=30; SpecificRootLength=45; StolonEffectOnLAI=0.3; ShootMaxEffectOnLAI=500; MaxStemEffectOnLAI=0.5; LiveLeavesPerTiller=3; TissueTurnoverRateShoot=0.05; TissueTurnoverRateRoot=0.02; DetachmentRateShoot=0.11; TurnoverTemperatureMin=2; TurnoverTemperatureRef=20; TurnoverTemperatureExponent=1; TurnoverDroughtEffectMax=1; TurnoverDroughtThreshold=0.5; TurnoverDefoliationCoefficient=0.5; TurnoverDefoliationRootEffect=0.1; FractionNLuxuryRemobilisable=[0.1, 0.1, 0.1]; MinimumNFixation=0.2; MaximumNFixation=0.6; SoilSaturationEffectMax=0.1; MinimumWaterFreePorosity=-1; SoilSaturationRecoveryFactor=0.25; NDillutionCoefficient=1; GlfGeneric=1; GlfSoilFertility=1; PlantHeightMinimum=25; PlantHeightMaximum=350; PlantHeightMassForMax=7500; PlantHeightExponent=2.5; RootDepthMinimum=30; RootDepthMaximum=150; RootElongationRate=25; RootDistributionDepthParam=70; RootDistributionExponent=2.5; DigestibilitiesCellWall=[0.6, 0.6, 0.6, 0.2]; MinimumGreenWt=50; FractionStolonStanding=0; PreferenceForGreenOverDead=1; PreferenceForLeafOverStems=1; WaterAvailableMethod=DefaultAPSIM; NitrogenAvailableMethod=BasicAgPasture
            Soil: same as Tests of Multiple Crops in a Single Zone.AgPasture Deep Soil Test.Experiment.AgPastureDeepSoilTest.Field.TempletonABlock
            Report RyegrassWhiteCloverExample: EventNames=[Clock].EndOfDay
              VariableNames:
                [Clock].Today as Date
                sum([Soil].SoilNitrogen.NO3) as NO3
                sum([Soil].SoilWater.SWmm) as SWDep
                [Ryegrass].AboveGroundWt
                [WhiteClover].AboveGroundWt
                [Ryegrass].AboveGroundWt + [WhiteClover].AboveGroundWt as TotalAboveGround
                [Ryegrass].HarvestedWt
                [WhiteClover].HarvestedWt
                ([Ryegrass].HarvestedWt + [WhiteClover].HarvestedWt) as Yield
                [PropRye1].Script.PropYieldRye1 as PropYieldRyegrass
                ([Fertiliser].NitrogenApplied-( 10.0 * [CutRotation].Script.NReturnedInUrine)) as RealFert
  Folder Tests of Crops with Roots Across Zones
    Memo Description
      The series of test and simulations in this section test the performance of SoilArbitrator when there are plants with roots spread across zones.  All of these tests are in a uniform soil with lots of soil water storage but no source of organic N.  The climate is a uniform or controlled environment.  The plant is a ryegrass.

      The first three series demonstrate two-zone simulations with the ryegrass in Zone0 and a bare soil in Zone1.  The Zone0 ryegrass can spread a variable proportion of its roots into Zone1.

      The last two simulations are each three zones and a ryegrass in each zone.  The ryegrass in the central zone can spread roots into its neighbours but the ryegrasses in the outer zones can access only their ‘home’ zones.  The simulations start with either uniform mineral N across the zones or with increased N in Zone0.
    Folder Test With No Stress
      Memo Memo TestWithNoStress
        The conditions for this series of simulations are:

        •	a controlled environment with 25 MJ /m2 solar radiation, 15 C minimum and 25 C maximum air temperature, no rainfall;

        •	a uniform soil with 210 mm of PAW to 600 mm deep;

        •	the soil has no organic matter and there is no surface organic matter;

        •	Zone0 has a ryegrass with roots to 600 mm deep;

        •	Zone 1 has no plant in the zone;

        •	the ryegrass is trimmed every day to maintain 2250 kg DM /ha with all herbage removed from the simulation; and

        •	water and fertiliser are applied every day sufficient to maintain conditions of no water or N stress.

        The series of simulations add some roots from the ryegrass in Zone0 into Zone1 such that Zone1 contains 0, 0.25, 0.5, 0.75 or 1.0 of the roots in Zone0 so that the ryegrass can meet its water and N demand from some combination of the resources in the two zones.  Note that there is no canopy cover in Zone1 and therefore evaporation from the soil surface will be greater than that in Zone0.  The expectation is that as a greater proportion of the roots are in Zone1, that:

        •	the irrigation need in Zone0 will decrease and that in Zone 1 will increase and possibly exceed that in Zone0 when there is an even spread of roots (because of the expected additional evaporation of soil water without canopy cover in Zone1)

        •	the amount of fertiliser added should decrease in Zone0 and increase in Zone1 as more rots are spread into Zone1

        The graphs show that these expectations are met.
      Experiment
        Factors
          Factor NumOfZones: Specifications=[DoRootsSingle].Script.Zone1Prop=0.0,0.25,0.5,0.75,1.0
        Simulation TestWithNoStress
          Clock: StartDate=2000-01-01; EndDate=2000-12-31
          ControlledEnvironment: MaxT=25; MinT=15; Rain=0; Radn=25; PanEvap=0; VP=17; Wind=3; CO2=350; AirPressure=1010; Latitude=0; DayLength=12
          SoilArbitrator
          Summary
          Zone Zone0: Area=1; Slope=0
            Folder Managers
              Manager DoRootsSingle
                Zone0Depth = 600
                Zone0Mass = 500
                Zone1Name = Zone1
                Zone1Prop = 0
                Zone2Name = Zone2
                Zone2Prop = 0
                Zone3Name = Zone3
                Zone3Prop = 0
```csharp
// Defoliates AgPasture on a regular rotation or one-off via a schedule
// currenty defoliates the amount specified by spreading evenly over the specified period

using System;
using System.Collections.Generic;
using System.Xml.Serialization;
using Models.Core;
using Models.PMF;
using APSIM.Shared.Utilities;

namespace Models
{
	[Serializable]
	public class Script : Model
	{
		// - Links to APSIM models
		[Link] Zone myZone;
		[Link] Clock Clock;
		[Link] ISummary summary = null;
		
		List<AgPasture.PastureSpecies> Pasture = new List<AgPasture.PastureSpecies>();
		
		// - Paramters for this manager
		[Description("Root depth in the plant's zone (mm): ")]  public double Zone0Depth { get; set; }
		[Description("Root mass  in the plant's zone (mm): ")]  public double Zone0Mass { get; set; }

		[Description("Name of the first zone: ")] public string Zone1Name { get; set; }
		[Description("Proportionate depth and mass in the first zone (-): ")]  public double Zone1Prop { get; set; }

		[Description("Name of the second zone: ")] public string Zone2Name { get; set; }
		[Description("Proportionate depth and mass in the first zone (-): ")]  public double Zone2Prop { get; set; }

		[Description("Name of the third zone: ")] public string Zone3Name { get; set; }
		[Description("Proportionate depth and mass in the first zone (-): ")]  public double Zone3Prop { get; set; }

		// - Outputs from this manager

		// - Internal variables

		[EventSubscribe("Commencing")]
		private void OnSimulationCommencing(object sender, EventArgs e)
		{
			int SpeciesNum = 0;
			foreach (AgPasture.PastureSpecies species in Apsim.Children(myZone, typeof(AgPasture.PastureSpecies)))
			{
				SpeciesNum += 1;
				if (SpeciesNum == 1)
				{
					//double test = species.RootWt;
					if (Zone1Prop > 0)
						species.AddZone(zoneName: Zone1Name, rootDepth: Zone1Prop * Zone0Depth, rootDM: Zone1Prop * Zone0Mass, specificRootLength: 100);
					if (Zone2Prop > 0)
						species.AddZone(zoneName: Zone1Name, rootDepth: Zone2Prop * Zone0Depth, rootDM: Zone2Prop * Zone0Mass, specificRootLength: 100);
					if (Zone3Prop > 0)
						species.AddZone(zoneName: Zone1Name, rootDepth: Zone3Prop * Zone0Depth, rootDM: Zone3Prop * Zone0Mass, specificRootLength: 100);
				}
			}

			//Pasture[1].AddZone(zoneName: "Zone1", rootDepth: 100, rootDM: 1000, specificRootLength: 100);
			//Pasture[1].AddZone(zoneName: "Zone2", rootDepth: 50, rootDM: 500, specificRootLength: 100);
		}
	}
}
```
              Manager AutomaticFertiliser
                AllowFertiliser = yes
                Depth2SoilN = 600
                CriticalSoilN = 100
                FertNAmount = 50
                FertType = UreaN
                FertApplicationDepth = 1
                FertMinimumDays = 1
```csharp
using System;
using Models.Core;
using Models.PMF;
using Models.Soils;
using APSIM.Shared.Utilities;
using System.Xml.Serialization;

namespace Models
{
	[Serializable]
	public class Script : Model
	{
		[Link] Clock Clock;
		[Link] Fertiliser fertiliser;
		[Link] ISummary summary = null;
		[Link] Soil Soil;

		//User inputs from properties tab
		[Description("Turn ferliser applications on? ")]
		public yesnoType AllowFertiliser { get; set; }
		
		[Description("Depth to calculate available soil N (mm): ")]
		public double Depth2SoilN { get; set; }

		[Description("Minimum available N, triggers an application (kgN/ha): ")]
		public double CriticalSoilN { get; set; }

		[Description("Amount of N fertiliser for each application (kgN/ha): ")]
		public double FertNAmount { get; set; }

		[Description("Type of N fertiliser to apply: ")]
		public Fertiliser.Types FertType { get; set; }

		[Description("Depth at which to apply the fertiliser (mm): ")]
		public double FertApplicationDepth { get; set; }
	   
		[Description("Minimum period between applications (days): ")]
		public double FertMinimumDays { get; set; }
	   
		public enum yesnoType
		{
			/// <summary>a positive answer</summary>
			yes,
			/// <summary>a negative answer</summary>
			no
		}

		[XmlIgnore] public double TopMineralN { get; set; }
		
		private DateTime lastApplicationDate;
		private bool fertiliserIsAllowed;
		private int nLayers;

		[EventSubscribe("StartOfSimulation")]
		private void OnStartOfSimulation(object sender, EventArgs e)
		{
			fertiliserIsAllowed = (AllowFertiliser == yesnoType.yes);
			nLayers = Soil.SoilWater.Thickness.Length;
		}

		[EventSubscribe("DoManagement")]
		private void OnDoManagement(object sender, EventArgs e)
		{
			double daysSinceLastApplication = (Clock.Today - lastApplicationDate).TotalDays;
			
			// get the N stored in the soil
			double depthFromSurface = 0.0;
			double fracLayer = 0.0;
			TopMineralN = 0.0;
			for (int layer = 0; layer < nLayers; layer++)
			{
				fracLayer = Math.Min(1.0, (Depth2SoilN - depthFromSurface) / Soil.SoilWater.Thickness[layer]);
				TopMineralN += (Soil.SoilNitrogen.NO3[layer]
				+ Soil.SoilNitrogen.NH4[layer]
				+ Soil.SoilNitrogen.urea[layer])
				* fracLayer;
				depthFromSurface += Soil.SoilWater.Thickness[layer];
				if (depthFromSurface >= Depth2SoilN)
					layer = nLayers;
			}

			if (fertiliserIsAllowed && (daysSinceLastApplication >= FertMinimumDays) && (TopMineralN <= CriticalSoilN))
			{
				fertiliser.Apply(FertNAmount, FertType, FertApplicationDepth);
				lastApplicationDate = Clock.Today;
			}
		}
	}
}
```
              Manager AutomaticIrrigation
                allowIrrigation = yes
                allowIrrigationAll = yes
                seasonStart = 1-Jan
                seasonEnd = 31-Dec
                seasonsAllocation = 10000
                triggerDeficit = 99
                targetDeficit = 100
                returndays = 1
                maximumAmount = 5
                depthPAWC = 600
```csharp
using System;
using Models.Core;
using Models.PMF;
using Models.Soils;
using System.Xml.Serialization;
using Models.PMF;
using APSIM.Shared.Utilities;

        
namespace Models
{
	[Serializable] 
	[System.Xml.Serialization.XmlInclude(typeof(Model))]
	public class Script : Model
	{
		//Communication to other modules
		[Link] ISummary summary = null;
		[Link] Irrigation Irrigation;
		[Link] Clock Clock;
		[Link] Soil Soil;
		[Link(IsOptional = true)] ICrop existingCrop;
	   
		//User inputs from properties tab
		[Description("Turn irrigation on?")] public answerType allowIrrigation { get; set; }
		[Description("Irrigate regardless of crop state?")] public answerType allowIrrigationAll { get; set; }
		[Description("Start of irrigation season (dd-MMM)")]
		public string seasonStart { get; set; }
		[Description("End of irrigation season (dd-MMM)")]
		public string seasonEnd { get; set; }
		[Description("Season allocation (mm)")]
		public double seasonsAllocation { get; set; }
		[Description("Deficit to trigger irrigation (% PAWC)")]
		public double triggerDeficit { get; set; }
		[Description("Deficit to stop irrigaton (% PAWC)")]
		public double targetDeficit { get; set; }
		[Description("Minimum days for irrigation to return")]
		public double returndays { get; set; }
		[Description("Maximum irrigation application (mm/day)")]
		public double maximumAmount { get; set; }
		[Description("Depth to calculate PAWC (mm)")]
		public double depthPAWC { get; set; }
	   
		public enum answerType
		{
			/// <summary>a positive answer</summary>
			yes,
			/// <summary>a negative answer</summary>
			no
		}

		//Class members
		[XmlIgnore] public double TopSWdeficit { get; set; }
		[XmlIgnore] public double TopSWC { get; set; }
		[XmlIgnore] public double DaysSinceIrrigation { get; set; }
		[XmlIgnore] public double AmountToApply { get; set; }
		[XmlIgnore] public double SeasonAppliedAmount { get; set; }
		
		private bool IrrigationIsAllowed { get; set; }
		private bool IrrigationIsAlwaysAllowed { get; set; }
		
		private bool SeasonIsOpen { get; set; }
		private bool CropIsActive { get; set; }
		private bool IrrigatorIsAvailable { get; set; }
		private bool SoilIsDry { get; set; }

		private DateTime StartDate;
		private DateTime EndDate;
		private double TopDUL;
		private double TopLL;
		private int nLayers;
	
		//Calculate static soil variables
		[EventSubscribe("StartOfSimulation")]
		private void OnStartOfSimulation(object sender, EventArgs e)
		{   
			//Set the season dates
			StartDate = DateTime.Parse(seasonStart + "-" + Clock.Today.Year.ToString());
			EndDate = DateTime.Parse(seasonEnd + "-" + Clock.Today.Year.ToString());
			
			//Can we irrigate at all?
			IrrigationIsAllowed = false; 
			if (allowIrrigation == answerType.yes)
				IrrigationIsAllowed = true; 
			if (allowIrrigationAll == answerType.yes)
				IrrigationIsAlwaysAllowed = true; 





			//Calculate soil water variables
			double depthFromSurface = 0.0;
			double fracLayer = 0.0;
			nLayers = Soil.SoilWater.Thickness.Length;
			for (int layer = 0; layer < nLayers; layer++)
			{
				fracLayer = Math.Min(1.0, (depthPAWC - depthFromSurface) / Soil.SoilWater.Thickness[layer]);
				TopLL += Soil.SoilWater.LL15mm[layer] * fracLayer;
				TopDUL += Soil.SoilWater.DULmm[layer] * fracLayer;
				depthFromSurface += Soil.SoilWater.Thickness[layer];
				if (depthFromSurface >= depthPAWC)
					layer = nLayers;
			}
		}
	   	  
		//Determine daily requirement for irrigation
		[EventSubscribe("StartOfDay")]
		private void OnStartOfDay(object sender, EventArgs e)
		{
			//Can we irrigate today?		  
			SeasonIsOpen = isBetween(Clock.Today, StartDate, EndDate);

			//Is there a crop in the ground that needs irrigation?
			CropIsActive = false;
			if (IrrigationIsAlwaysAllowed)
				CropIsActive = true;  // might not be but we don't care
			else if ((existingCrop != null) && (existingCrop.IsAlive))
				CropIsActive = true;
			//if ((existingCrop.Phenology.Stage >= 3.0) && (existingCrop.Phenology.Stage < 6.0))
	      
			//Is the irrigator available?
			IrrigatorIsAvailable = false;
			DaysSinceIrrigation += 1;
			if (DaysSinceIrrigation >= returndays)
				IrrigatorIsAvailable = true;
	      
			//Is the soil dry enough to require irrigation?
			SoilIsDry = false;
			double depthFromSurface = 0.0;
			double fracLayer = 0.0;
			TopSWC = 0.0;
			for (int layer = 0; layer < nLayers; layer++)
			//for (int layer = 0; depthFromSurface < depthPAWC + Soil.SoilWater.Thickness[layer]; layer++)
			{
				fracLayer = Math.Min(1.0, (depthPAWC - depthFromSurface) / Soil.SoilWater.Thickness[layer]);
				TopSWC += Soil.SoilWater.SWmm[layer] * fracLayer;
				depthFromSurface += Soil.SoilWater.Thickness[layer];
				if (depthFromSurface >= depthPAWC)
					layer = nLayers;
			}
			
			TopSWdeficit = TopSWC - TopDUL;
			if (Math.Max(0.0, -TopSWdeficit) >= (TopDUL - TopLL) * (100 - triggerDeficit) / 100)
				SoilIsDry = true;
	            
			//Are all the conditions ratifying irrigation
			if (IrrigationIsAllowed && SeasonIsOpen && CropIsActive && IrrigatorIsAvailable && SoilIsDry)
			{
				//Lets bloody well irrigate then!!!!
				AmountToApply = TopDUL * targetDeficit / 100 - TopSWC;
				AmountToApply = Math.Max(0.0, Math.Min(AmountToApply, seasonsAllocation - SeasonAppliedAmount));
				Irrigation.Apply(AmountToApply);
				DaysSinceIrrigation = 0;
				SeasonAppliedAmount += AmountToApply;
			}
		}
		
		///Checks whether theDate is between iniDate and endDate (non-year specific)
		private bool isBetween(DateTime theDay, DateTime iniDate, DateTime endDate)
		{
			bool result = false;
			if (iniDate.DayOfYear < endDate.DayOfYear)
			{
				// period is within one year, ex: summer in the northern hemisphere
				if ((theDay.DayOfYear >= iniDate.DayOfYear) && (theDay.DayOfYear <= endDate.DayOfYear))
					result = true;
			}
			else
			{
				// period goes over the end of the year, ex: summer in the southern hemisphere
				if ((theDay.DayOfYear >= iniDate.DayOfYear) || (theDay.DayOfYear <= endDate.DayOfYear))
					result = true;
			}
			
			return result;
		}
	}
}
```
              Manager CutRotation
                rotationAllowed = True
                CutRotationStartDate = 1900-07-01
                CutRotationEndDate = 2100-12-31
                CutInterval = 1
                IntervalType = FixedInterval
                DurationOfCut = 1
                RemoveAmountType = ResidualDM
                AmountGiven = 2250
                DMRemoveType = RemoveAll
                FractionN2Remove = 1
                ProportionN2Dung = 0
                script: same as in Tests of Multiple Crops in a Single Zone.AgPasture Deep Soil Test.Experiment.AgPastureDeepSoilTest.Field.Managers.CutRotation
            MicroClimate: a_interception=0; b_interception=1; c_interception=0; d_interception=0; soil_albedo=0.23; sun_angle=15; soil_heat_flux_fraction=0.4; night_interception_fraction=0.5; refheight=2; albedo=0.15; emissivity=0.96; RadIntTotal=0
            Irrigation
            Fertiliser
            SurfaceOrganicMatter: PondActive=no; ReportAdditions=no; ReportRemovals=no; PoolName=Sward; type=grass; mass=0; standing_fraction=0; cnr=15; CriticalResidueWeight=2000; OptimumDecompTemp=20; MaxCumulativeEOS=20; CNRatioDecompCoeff=0.277; CNRatioDecompThreshold=25; TotalLeachRain=25; MinRainToLeach=10; CriticalMinimumOrganicC=0.004; DefaultCPRatio=0; DefaultStandingFraction=0; StandingExtinctCoeff=0.5; FractionFaecesAdded=0.5
              Pools:
                {PoolName=Sward, ResidueType=grass, Mass=0, CNRatio=15, StandingFraction=0}
              ResidueTypes: LoadFromResource=ResidueTypes
              TillageTypes TillageTypesList
            Soil: LocalName=Stores lots of water; Site=Made up; Latitude=0; Longitude=0
              Analysis: PHUnits=Water; BoronUnits=HotWater
                Thickness  Rocks  PH  CEC  ParticleSizeSand  ParticleSizeSilt  ParticleSizeClay
                150        0      6   10   10                30                60
                150        0      6   10   10                30                60
                150        0      6   10   10                30                60
                150        0      6   10   10                30                60
              Water
                Thickness  BD   AirDry  LL15  DUL   SAT  KS
                150        1.3  0.05    0.1   0.45  0.5  500
                150        1.3  0.1     0.1   0.45  0.5  500
                150        1.3  0.1     0.1   0.45  0.5  500
                150        1.3  0.1     0.1   0.45  0.5  500
                SoilCrop RyegrassSoil: LL=[0.1, 0.1, 0.1, 0.1]; KL=[0.05, 0.05, 0.05, 0.05]; XF=[1, 1, 1, 1]
                SoilCrop WhiteCloverSoil: LL=[0.1, 0.1, 0.1, 0.1]; KL=[0.05, 0.05, 0.05, 0.05]; XF=[1, 1, 1, 1]
              SoilWater: SummerDate=1-Nov; SummerU=6; SummerCona=3.5; WinterDate=1-apr; WinterU=6; WinterCona=3.5; DiffusConst=88; DiffusSlope=35; Salb=0.13; CN2Bare=73; CNRed=20; CNCov=0.8; slope=0; discharge_width=0; catchment_area=0; max_pond=0; residueinterception=0
                Thickness  SWCON  KLAT
                150        0.3    0
                150        0.3    0
                150        0.3    0
                150        0.3    0
              SoilNitrogen: fom_type=[default, manure, mucuna, lablab, shemp, stable]; fract_carb=[0.2, 0.3, 0.54, 0.57, 0.45, 0]; fract_cell=[0.7, 0.3, 0.37, 0.37, 0.47, 0.1]; fract_lign=[0.1, 0.4, 0.09, 0.06, 0.08, 0.9]; wfpsN2N2O_x=[22, 88]; wfpsN2N2O_y=[0.1, 1]; oc=[3.71368, 2.46983, 1.2384, 0.49836]
              SoilOrganicMatter: RootCN=40; RootWt=0; SoilCN=12; EnrACoeff=7.4; EnrBCoeff=0.2; OCUnits=Total
                Thickness  OC  FBiom  FInert
                150        0   0      0
                150        0   0      0
                150        0   0      0
                150        0   0      0
              InitialWater Initial water: PercentMethod=EvenlyDistributed; FractionFull=0.95
              Sample Initial nitrogen: NO3Units=ppm; NH4Units=ppm; SWUnits=Volumetric; OCUnits=Total; PHUnits=Water
                Thickness  NO3  NH4
                150        15   0
                150        15   0
                150        15   0
                150        15   0
              CERESSoilTemperature
            SoluteManager
            PastureSpecies Ryegrass: MaximumNUptake=10; Albedo=0.26; Gsmax=0.011; R50=200; SpeciesFamily=Grass; PhotosyntheticPathway=C3; InitialShootDM=2500; InitialRootDM=500; InitialRootDepth=600; ReferencePhotosyntheticRate=1; LightExtinctionCoefficient=0.5; GrowthTminimum=1; GrowthToptimum=20; GrowthTEffectExponent=1.7; UseHeatStressFactor=yes; HeatOnsetTemperature=28; HeatFullTemperature=35; HeatRecoverySumDD=30; HeatRecoveryTReference=25; UseColdStressFactor=yes; ColdOnsetTemperature=1; ColdFullTemperature=-5; ColdRecoverySumDD=25; ColdRecoveryTReference=0; MaintenanceRespirationCoefficient=0.03; GrowthRespirationCoefficient=0.25; RespirationTReference=20; RespirationExponent=1.5; NThresholdsForLeaves=[0.04, 0.012, 0.05]; NThresholdsForStems=[0.02, 0.006, 0.025]; NThresholdsForStolons=[0, 0, 0]; NThresholdsForRoots=[0.02, 0.006, 0.025]; DegreesDayForGermination=125; TargetShootRootRatio=4; MaxRootAllocation=0.25; ShootRootGlfFactor=0.5; UseReproSeasonFactor=yes; ReproSeasonReferenceLatitude=41; ReproSeasonTimingCoeff=0.14; ReproSeasonMaxAllocationIncrease=0.5; ReproSeasonAllocationCoeff=0.1; FractionLeafMaximum=0.7; FractionLeafMinimum=0.7; FractionLeafDMThreshold=500; FractionLeafDMFactor=2000; FractionLeafExponent=3; FractionToStolon=0; SpecificLeafArea=25; SpecificRootLength=100; StolonEffectOnLAI=0; ShootMaxEffectOnLAI=1000; MaxStemEffectOnLAI=1; LiveLeavesPerTiller=3; TissueTurnoverRateShoot=0.05; TissueTurnoverRateRoot=0.02; DetachmentRateShoot=0.08; TurnoverTemperatureMin=2; TurnoverTemperatureRef=20; TurnoverTemperatureExponent=1; TurnoverDroughtEffectMax=1; TurnoverDroughtThreshold=0.5; TurnoverDefoliationCoefficient=0.5; TurnoverDefoliationRootEffect=0.1; FractionNLuxuryRemobilisable=[0.1, 0.1, 0.1]; MinimumNFixation=0; MaximumNFixation=0; SoilSaturationEffectMax=0.1; MinimumWaterFreePorosity=-1; SoilSaturationRecoveryFactor=0.25; NDillutionCoefficient=0.25; GlfGeneric=1; GlfSoilFertility=1; PlantHeightMinimum=25; PlantHeightMaximum=600; PlantHeightMassForMax=10000; PlantHeightExponent=2.8; RootDepthMinimum=50; RootDepthMaximum=750; RootElongationRate=25; RootDistributionDepthParam=90; RootDistributionExponent=3.2; DigestibilitiesCellWall=[0.6, 0.6, 0.6, 0.2]; MinimumGreenWt=100; FractionStolonStanding=0; PreferenceForGreenOverDead=1; PreferenceForLeafOverStems=1; WaterAvailableMethod=DefaultAPSIM; NitrogenAvailableMethod=BasicAgPasture
            Report TestWithNoStress: EventNames=[Clock].EndOfDay
              VariableNames:
                [Clock].Today as Date
                [Ryegrass].AboveGroundWt as PlantMass
                [Ryegrass].HarvestedWt as Harvested
                [Ryegrass].WaterDemand as SW_Demand
                sum([Ryegrass].WaterUptake) as SW_Uptake
                [Ryegrass].GlfWaterSupply as glfWater
                [Ryegrass].GlfNSupply as glfNitrogen
                sum([Soil].SoilWater.SWmm) as SoilWater
                sum([Soil].SoilNitrogen.NH4)+sum([Soil].SoilNitrogen.NO3) as SoilNitrogen
                [Irrigation].IrrigationApplied as Irrigation
                [Fertiliser].NitrogenApplied as Fertiliser
          Zone Zone1: Area=1; Slope=0
            Folder Managers
              Manager AutomaticFertiliser: same as Tests of Crops with Roots Across Zones.Test With No Stress.Experiment.TestWithNoStress.Zone0.Managers.AutomaticFertiliser
              Manager AutomaticIrrigation: same as Tests of Crops with Roots Across Zones.Test With No Stress.Experiment.TestWithNoStress.Zone0.Managers.AutomaticIrrigation
            MicroClimate: a_interception=0; b_interception=1; c_interception=0; d_interception=0; soil_albedo=0.23; sun_angle=15; soil_heat_flux_fraction=0.4; night_interception_fraction=0.5; refheight=2; albedo=0.15; emissivity=0.96; RadIntTotal=0
            Irrigation
            Fertiliser
            SurfaceOrganicMatter: same as Tests of Crops with Roots Across Zones.Test With No Stress.Experiment.TestWithNoStress.Zone0.SurfaceOrganicMatter
            Soil: same as Tests of Crops with Roots Across Zones.Test With No Stress.Experiment.TestWithNoStress.Zone0.Soil
            SoluteManager
            Report TestWithNoStress: EventNames=[Clock].EndOfDay
              VariableNames:
                [Clock].Today as Date
                sum([Soil].SoilWater.SWmm) as SoilWater
                sum([Soil].SoilNitrogen.NH4)+sum([Soil].SoilNitrogen.NO3) as SoilNitrogen
                [Irrigation].IrrigationApplied as Irrigation
                [Fertiliser].NitrogenApplied as Fertiliser
    Folder Test With Water Stress
      Memo Memo TestWithWaterStress
        This series of simulations are as for the ‘No Stress’ series except there is no irrigation (fertiliser remains turned on).  There is also no rainfall so this is a run-down experiment.  The expectation is that as more roots are spread into Zone1 that:
        •	The plant can access more water so more dry matter will be harvested and, later on when there is insufficient stored soil water, senescence will be slower;

        •	Water demand and water uptake will be maintained for longer;

        •	Water stress will be later and less severe for a while;

        •	There will be no N stress because fertiliser is applied as needed;

        •	The soil water in Zone0 will be depleted more slowly while the soil water in Zone1 will be depleted more quickly;

        •	Soil nitrogen will be unaffected; and

        •	Less fertiliser will be applied in Zone0 and more in Zone1.

        These expectations are met.  It seems likely that the fluctuations in soil N storage are due to the size of each fertiliser addition (50 kg N /ha).
      Experiment
        Factors
          Factor NumOfZones: Specifications=[DoRootsSingle].Script.Zone1Prop=0.0,0.25,0.5,0.75,1.0
        Simulation TestWithWaterStress
          Clock: StartDate=2000-01-01; EndDate=2000-12-31
          ControlledEnvironment: MaxT=25; MinT=15; Rain=0; Radn=25; PanEvap=0; VP=17; Wind=3; CO2=350; AirPressure=1010; Latitude=0; DayLength=12
          SoilArbitrator
          Summary
          Zone Zone0: Area=1; Slope=0
            Folder Managers
              Manager DoRootsSingle: same as Tests of Crops with Roots Across Zones.Test With No Stress.Experiment.TestWithNoStress.Zone0.Managers.DoRootsSingle
              Manager AutomaticFertiliser: same as Tests of Crops with Roots Across Zones.Test With No Stress.Experiment.TestWithNoStress.Zone0.Managers.AutomaticFertiliser
              Manager AutomaticIrrigation
                allowIrrigation = no
                allowIrrigationAll = yes
                seasonStart = 1-Jan
                seasonEnd = 31-Dec
                seasonsAllocation = 10000
                triggerDeficit = 99
                targetDeficit = 100
                returndays = 1
                maximumAmount = 5
                depthPAWC = 600
                script: same as in Tests of Crops with Roots Across Zones.Test With No Stress.Experiment.TestWithNoStress.Zone0.Managers.AutomaticIrrigation
              Manager CutRotation: same as Tests of Crops with Roots Across Zones.Test With No Stress.Experiment.TestWithNoStress.Zone0.Managers.CutRotation
            MicroClimate: a_interception=0; b_interception=1; c_interception=0; d_interception=0; soil_albedo=0.23; sun_angle=15; soil_heat_flux_fraction=0.4; night_interception_fraction=0.5; refheight=2; albedo=0.15; emissivity=0.96; RadIntTotal=0
            Irrigation
            Fertiliser
            SurfaceOrganicMatter: same as Tests of Crops with Roots Across Zones.Test With No Stress.Experiment.TestWithNoStress.Zone0.SurfaceOrganicMatter
            Soil: same as Tests of Crops with Roots Across Zones.Test With No Stress.Experiment.TestWithNoStress.Zone0.Soil
            SoluteManager
            PastureSpecies Ryegrass: same as Tests of Crops with Roots Across Zones.Test With No Stress.Experiment.TestWithNoStress.Zone0.Ryegrass
            Report TestWithWaterStress: same as Tests of Crops with Roots Across Zones.Test With No Stress.Experiment.TestWithNoStress.Zone0.TestWithNoStress
          Zone Zone1: Area=1; Slope=0
            Folder Managers
              Manager AutomaticFertiliser: same as Tests of Crops with Roots Across Zones.Test With No Stress.Experiment.TestWithNoStress.Zone0.Managers.AutomaticFertiliser
              Manager AutomaticIrrigation: same as Tests of Crops with Roots Across Zones.Test With Water Stress.Experiment.TestWithWaterStress.Zone0.Managers.AutomaticIrrigation
            MicroClimate: a_interception=0; b_interception=1; c_interception=0; d_interception=0; soil_albedo=0.23; sun_angle=15; soil_heat_flux_fraction=0.4; night_interception_fraction=0.5; refheight=2; albedo=0.15; emissivity=0.96; RadIntTotal=0
            Irrigation
            Fertiliser
            SurfaceOrganicMatter: same as Tests of Crops with Roots Across Zones.Test With No Stress.Experiment.TestWithNoStress.Zone0.SurfaceOrganicMatter
            Soil: same as Tests of Crops with Roots Across Zones.Test With No Stress.Experiment.TestWithNoStress.Zone0.Soil
            SoluteManager
            Report TestWithWaterStress: EventNames=[Clock].EndOfDay
              VariableNames:
                [Clock].Today as Date
                sum([Soil].SoilWater.SWmm) as SoilWater
                sum([Soil].SoilNitrogen.NH4)+sum([Soil].SoilNitrogen.NO3) as SoilNitrogen
                [Irrigation].IrrigationApplied as Irrigation
                [Fertiliser].NitrogenApplied as Fertiliser
    Folder Test With Nitrogen Stress
      Memo Memo TestWithNitrogenStress
        This series of simulations are as for the ‘No Stress’ series except there is no fertiliser (irrigation remains turned on).  There is also no soil organic matter or initial mineral N so this is a run-down experiment.  The expectation is that as more roots are spread into Zone1 that:
        •	The plant can access more N so more dry matter will be harvested and, later on when there is insufficient stored N, senescence will be slower;

        •	Water demand and water uptake will be maintained for longer;

        •	There will be no water stress;

        •	N stress will be delayed and less severe;

        •	Soil water storage will be unaffected;

        •	The soil N storage in Zone0 will be depleted more slowly while the soil N in Zone1 will be depleted more quickly; and

        •	There is likely to be a reduction in irrigation applied to Zone0 and an increase in Zone1 as more water is extracted from Zone1 but this will be moderated by the reduction in growth as N becomes severely limited.

        These expectations are largely met.  There are some strange dynamics when 0.25 of the roots are in Zone1 for which there is no obvious explanation but otherwise the patterns are as expected.
      Experiment
        Factors
          Factor NumOfZones: Specifications=[DoRootsSingle].Script.Zone1Prop=0.0,0.25,0.5,0.75,1.0
        Simulation TestWithNitrogenStress
          Clock: StartDate=2000-01-01; EndDate=2000-12-31
          ControlledEnvironment: MaxT=25; MinT=15; Rain=0; Radn=25; PanEvap=0; VP=17; Wind=3; CO2=350; AirPressure=1010; Latitude=0; DayLength=12
          SoilArbitrator
          Summary
          Zone Zone0: Area=1; Slope=0
            Folder Managers
              Manager DoRootsSingle: same as Tests of Crops with Roots Across Zones.Test With No Stress.Experiment.TestWithNoStress.Zone0.Managers.DoRootsSingle
              Manager AutomaticFertiliser
                AllowFertiliser = no
                Depth2SoilN = 600
                CriticalSoilN = 100
                FertNAmount = 50
                FertType = UreaN
                FertApplicationDepth = 1
                FertMinimumDays = 1
                script: same as in Tests of Crops with Roots Across Zones.Test With No Stress.Experiment.TestWithNoStress.Zone0.Managers.AutomaticFertiliser
              Manager AutomaticIrrigation: same as Tests of Crops with Roots Across Zones.Test With No Stress.Experiment.TestWithNoStress.Zone0.Managers.AutomaticIrrigation
              Manager CutRotation: same as Tests of Crops with Roots Across Zones.Test With No Stress.Experiment.TestWithNoStress.Zone0.Managers.CutRotation
            MicroClimate: a_interception=0; b_interception=1; c_interception=0; d_interception=0; soil_albedo=0.23; sun_angle=15; soil_heat_flux_fraction=0.4; night_interception_fraction=0.5; refheight=2; albedo=0.15; emissivity=0.96; RadIntTotal=0
            Irrigation
            Fertiliser
            SurfaceOrganicMatter: same as Tests of Crops with Roots Across Zones.Test With No Stress.Experiment.TestWithNoStress.Zone0.SurfaceOrganicMatter
            Soil: same as Tests of Crops with Roots Across Zones.Test With No Stress.Experiment.TestWithNoStress.Zone0.Soil
            SoluteManager
            PastureSpecies Ryegrass: same as Tests of Crops with Roots Across Zones.Test With No Stress.Experiment.TestWithNoStress.Zone0.Ryegrass
            Report TestWithNitrogenStress: same as Tests of Crops with Roots Across Zones.Test With No Stress.Experiment.TestWithNoStress.Zone0.TestWithNoStress
          Zone Zone1: Area=1; Slope=0
            Folder Managers
              Manager AutomaticFertiliser: same as Tests of Crops with Roots Across Zones.Test With Nitrogen Stress.Experiment.TestWithNitrogenStress.Zone0.Managers.AutomaticFertiliser
              Manager AutomaticIrrigation: same as Tests of Crops with Roots Across Zones.Test With No Stress.Experiment.TestWithNoStress.Zone0.Managers.AutomaticIrrigation
            MicroClimate: a_interception=0; b_interception=1; c_interception=0; d_interception=0; soil_albedo=0.23; sun_angle=15; soil_heat_flux_fraction=0.4; night_interception_fraction=0.5; refheight=2; albedo=0.15; emissivity=0.96; RadIntTotal=0
            Irrigation
            Fertiliser
            SurfaceOrganicMatter: same as Tests of Crops with Roots Across Zones.Test With No Stress.Experiment.TestWithNoStress.Zone0.SurfaceOrganicMatter
            Soil: same as Tests of Crops with Roots Across Zones.Test With No Stress.Experiment.TestWithNoStress.Zone0.Soil
            SoluteManager
            Report TestWithNitrogenStress: EventNames=[Clock].EndOfDay
              VariableNames:
                [Clock].Today as Date
                sum([Soil].SoilWater.SWmm) as SoilWater
                sum([Soil].SoilNitrogen.NH4)+sum([Soil].SoilNitrogen.NO3) as SoilNitrogen
                [Irrigation].IrrigationApplied as Irrigation
                [Fertiliser].NitrogenApplied as Fertiliser
    Folder Three Zone Simulation with Initial Uniform Soil N
      Memo Memo ThreeZoneSimulationInitialUniformSoilN
        In this simulation, which is largely based on the one above, there are three zones with a ryegrass, lots of irrigation but no fertiliser and about 35 kg mineral N in the soil at initialisation.  The roots from the ryegrass in Zone1 has roots on Zone0 and Zone2 but the ryegrasses in Zone0 and Zone2 only have roots in their own zone.  As expected:

        •	the ryegrass in Zone1 grows more (note that Zone0 and Zone2 are mostly plotting on top of each other),

        •	water demand and uptake is higher,

        •	N stress is lower for longer because the plant has access to some of the N in Zone 0 and 2,

        •	soil N storage declines more slowly, and

        •	more irrigation is required in Zones 0 and 2 because of the additional water uptake from the Sone1 ryegrass and its spreading roots.
      Simulation ThreeZoneSimulationInitialUniformSoilN
        Clock: StartDate=2000-01-01; EndDate=2000-03-31
        ControlledEnvironment: MaxT=25; MinT=15; Rain=0; Radn=25; PanEvap=0; VP=17; Wind=3; CO2=350; AirPressure=1010; Latitude=0; DayLength=12
        SoilArbitrator
        Summary
        Zone Zone0: Area=1; Slope=0
          Folder Managers
            Manager DoRootsThreeZone
              RootDepth = 600
              RootMass = 500
              Zone0Name = Zone0
              Zone0Prop = 0
              Zone2Name = Zone1
              Zone2Prop = 0
```csharp
// Defoliates AgPasture on a regular rotation or one-off via a schedule
// currenty defoliates the amount specified by spreading evenly over the specified period

using System;
using System.Collections.Generic;
using System.Xml.Serialization;
using Models.Core;
using Models.PMF;
using APSIM.Shared.Utilities;

namespace Models
{
	[Serializable]
	public class Script : Model
	{
		// - Links to APSIM models
		[Link] Zone myZone;
		[Link] Clock Clock;
		[Link] ISummary summary = null;
		
		List<AgPasture.PastureSpecies> Pasture = new List<AgPasture.PastureSpecies>();
		
		// - Paramters for this manager
		[Description("Root depth in the plant's zone (mm): ")]  public double RootDepth { get; set; }
		[Description("Root mass  in the plant's zone (mm): ")]  public double RootMass { get; set; }

		[Description("Name of zone ot the left: ")] public string Zone0Name { get; set; }
		[Description("Proportionate depth and mass in zone to the left (-): ")]  public double Zone0Prop { get; set; }

		[Description("Name of zone ot the right: ")] public string Zone2Name { get; set; }
		[Description("Proportionate depth and mass in zone to the right (-): ")]  public double Zone2Prop { get; set; }

		// - Outputs from this manager

		// - Internal variables

		[EventSubscribe("Commencing")]
		private void OnSimulationCommencing(object sender, EventArgs e)
		{
			int SpeciesNum = 0;
			foreach (AgPasture.PastureSpecies species in Apsim.Children(myZone, typeof(AgPasture.PastureSpecies)))
			{
				SpeciesNum += 1;
				if (SpeciesNum == 1)
				{
					if (Zone0Prop > 0)
						species.AddZone(zoneName: Zone0Name, rootDepth: Zone0Prop * RootDepth, rootDM: Zone0Prop * RootMass, specificRootLength: 100);
					if (Zone2Prop > 0)
						species.AddZone(zoneName: Zone2Name, rootDepth: Zone2Prop * RootDepth, rootDM: Zone2Prop * RootMass, specificRootLength: 100);
				}
			}

			//Pasture[1].AddZone(zoneName: "Zone1", rootDepth: 100, rootDM: 1000, specificRootLength: 100);
			//Pasture[1].AddZone(zoneName: "Zone2", rootDepth: 50, rootDM: 500, specificRootLength: 100);
		}
	}
}
```
            Manager CutRotationSingle
              CutRotationStartDate = 1900-07-01
              CutRotationEndDate = 2100-12-31
              CutInterval = 1
              IntervalType = FixedInterval
              DurationOfCut = 1
              RemoveAmountType = ResidualDM
              AmountGiven = 2250
              DMRemoveType = RemoveAll
              FractionN2Remove = 1
              ProportionN2Dung = 0
```csharp
// Defoliates AgPasture on a regular rotation or one-off via a schedule
// currenty defoliates the amount specified by spreading evenly over the specified period

using System;
using System.Collections.Generic;
using System.Xml.Serialization;
using Models.Core;
using Models.PMF;
using APSIM.Shared.Utilities;

namespace Models
{
	[Serializable]
	public class Script : Model
	{
		// - Links to APSIM models
		[Link] Zone myZone;
		[Link] Clock Clock;
		[Link] Fertiliser fertiliser;
		[Link] ISummary summary = null;
		
		List<AgPasture.PastureSpecies> Pasture = new List<AgPasture.PastureSpecies>();
		
		// - Paramters for this manager
		[Description("Date to begin the rotation: ")]
		public DateTime CutRotationStartDate { get; set; }

		[Description("Date to finish the rotation: ")]
		public DateTime CutRotationEndDate { get; set; }

		[Description("Rotation interval (days): ")]
		public int CutInterval { get; set; }

		[Description("How the interval is defined: ")]
		public rotationIntervalTypes IntervalType { get; set; }

		[Description("Duration of each event (days): ")]
		public int DurationOfCut { get; set; }

		[Description("What amount is being defined: ")]
		public removeAmountTypes RemoveAmountType { get; set; }

		[Description("Amount to use (kg/ha): ")]
		public double AmountGiven { get; set; }

		[Description("Fraction of DM that is removed from the field:")]
		public removeDMTypes DMRemoveType { get; set; }

		[Description("Fraction of N that is removed from the field (0-1):")]
		public double FractionN2Remove { get; set; }

		[Description("Proportion of N returned in dung (0-1):")]
		public double ProportionN2Dung { get; set; }

		// - Outputs from this manager
		[XmlIgnore][Units("g/m2")]// Description: Pasture DM defoliated today
		public double DefoliatedWt { get; set; }
		[XmlIgnore][Units("g/m2")]// Description: Pasture N defoliate today
		public double DefoliatedN { get; set; }
		[XmlIgnore][Units("g/m2")]// Description: Pasture DM harvested today
		public double HarvestedWt { get; set; }
		[XmlIgnore][Units("g/m2")]// Description: Pasture N harvested today
		public double HarvestedN { get; set; }
		[XmlIgnore][Units("g/m2")]// Description: Pasture DM removed from the field
		public double RemovedWt { get; set; }
		[XmlIgnore][Units("g/m2")]// Description: Pasture N removed from the field
		public double RemovedN { get; set; }
		[XmlIgnore][Units("g/m2")]// Description: Residue DM returned to the field
		public double ReturnedWt { get; set; }
		[XmlIgnore][Units("g/m2")]// Description: Residue N returned to the field
		public double ReturnedN { get; set; }
		[XmlIgnore][Units("g/m2")]// Description: Harvested N returned as dung (SurfaceOM)
		public double NReturnedInDung { get; set; }
		[XmlIgnore][Units("g/m2")]// Description: Harvested N returned as urine (urea)
		public double NReturnedInUrine { get; set; }
		[XmlIgnore][Units("day")]// Description: Number of days after last defoliation
		public int DaysAfterCut { get; set; }
		[XmlIgnore][Units("g/m2")]// Description: Total standing DM (Leaf + Stem/Sheath) before cut
		public double PreHarvestDM { get; set; }
		[XmlIgnore][Units("g/m2")]// Description: Total standing DM (Leaf + Stem/Sheath) after cut
		public double PostHarvestDM { get; set; }
		
		// - Internal variables
		// fraction of harvested Dm to actually remove from field
		private double fractionDM2Remove = 1.0;
		// flag whether defoliation is allowed
		private bool rotationAllowed = true;
		// number of days for each defoliation event
		private int cuttingDuration = 0;
		// counter for day within each defoliation
		private int daysCutting = 0;
		// type of interval (Fixed or target)
		private string intervalType;
		// total herbage to remove in g/m2 per day
		private double herbageToRemove;
		// type of DM amount (ResidualDM or DMToRemove)
		private string amountType;
		// auxiliary flag for defoliation
		private bool aCutHasHappened = false;

		// - Event to add residue or dung to surface OM
		public event BiomassRemovedDelegate BiomassRemoved;

		[EventSubscribe("Commencing")]
		private void OnSimulationCommencing(object sender, EventArgs e)
		{
			foreach (AgPasture.PastureSpecies species in Apsim.Children(myZone, typeof(AgPasture.PastureSpecies)))
			{
				Pasture.Add(species);
			}

			// reset variables
			DaysAfterCut = 0;
			resetVariables();
			cuttingDuration = DurationOfCut;
			
			// get the type of amount given
			if (RemoveAmountType == removeAmountTypes.ResidualDM)
				amountType = "SetResidueAmount";
			else
				amountType = "SetRemoveAmount";

			// get the type of amount given
			if (IntervalType == rotationIntervalTypes.FixedInterval)
				intervalType = "Fixed";
			else
				intervalType = "Target";

			// make sure that rotation start when startDate < simulationStartDay
			if ((Clock.Today > CutRotationStartDate) && (Clock.Today < CutRotationEndDate))
				CutRotationStartDate = Clock.Today;
		}
		
		[EventSubscribe("DoManagement")]
		private void OnDoManagement(object sender, EventArgs e)
		{
			if (rotationAllowed)
			{
				if (Clock.Today == CutRotationStartDate)
					DaysAfterCut = CutInterval;

				// Check whether we can defoliate
				if ((Clock.Today >= CutRotationStartDate) && (Clock.Today <= CutRotationEndDate) && (Pasture[0].IsAlive))
				{
					// Check whether we should start a defoliation
					if (DaysAfterCut >= (CutInterval - 1))
					{
						Graze(AmountGiven, amountType, DurationOfCut);
					}
				}
			}

			// Check whether we need to continue cutting
			if ((daysCutting > 0) && (daysCutting < cuttingDuration))
			{
				// reset outputs
				resetVariables();

				removeDM(herbageToRemove);
				returnExcreta();
				daysCutting += 1;
				if (daysCutting == cuttingDuration)
					PostHarvestDM = Pasture[0].StandingHerbageWt; //+ Pasture[1].StandingHerbageWt
			}

			// reset outputs
			if (daysCutting < 0)
			{
				resetVariables();
				daysCutting = 0;
			}
		}

		[EventSubscribe("DoManagementCalculations")]
		private void OnDoManagementCalculations(object sender, EventArgs e)
		{
			// Check whether a cutting has finished
			if (daysCutting == cuttingDuration)
			{
				aCutHasHappened = true;
				daysCutting = -1;
			}

			// Increase the counter for days after cutting
			if (aCutHasHappened && (daysCutting == 0))
				DaysAfterCut += 1;
		}

		public enum removeAmountTypes
		{
			/// <summary>Setting DM amount to remove</summary>
			DMToRemove,
			/// <summary>Setting residual DM amount</summary>
			ResidualDM
		}

		public enum rotationIntervalTypes
		{
			/// <summary>Setting a fixed interval</summary>
			FixedInterval,
			/// <summary>Setting a target (minimum) inteval</summary>
			TargetInterval
		}

		public enum removeDMTypes
		{
			/// <summary>Remove all DM</summary>
			RemoveAll,
			/// <summary>Remove no DM</summary>
			RemoveNone,
			/// <summary>Remove a fraction based on digestibility</summary>
			BasedOnDigestibility
		}

		// Resets the values of all outputs
		private void resetVariables()
		{
			DefoliatedWt = 0.0;
			DefoliatedN = 0.0;
			HarvestedWt = 0.0;
			HarvestedN = 0.0;
			RemovedWt = 0.0;
			RemovedN = 0.0;
			ReturnedWt = 0.0;
			ReturnedN = 0.0;
			NReturnedInDung = 0.0;
			NReturnedInUrine = 0.0;
		}

		// Description: Perform the basic calculations for defoliation
		public void Graze(double amountDM, string amountType, int duration)
		{
			// Get the existing plant amount
			PreHarvestDM = Pasture[0].StandingHerbageWt;  //+ Pasture[1].StandingHerbageWt
			
			// Check the amount to remove and print some info
			if ((amountType == "SetRemoveAmount") && (PreHarvestDM >= amountDM / duration))
			{
				summary.WriteMessage(this, "   Defoliating " + (10 * amountDM).ToString("#0.0") + "kg/ha over " + duration + " days");
				herbageToRemove = amountDM / duration;
			}
			else if ((amountType == "SetResidueAmount") && (PreHarvestDM >= amountDM))
			{
				summary.WriteMessage(this, "   Defoliating down to approximately " + (10 * amountDM).ToString("#0.0") + "kg/ha over " + duration + " days");
				herbageToRemove = (PreHarvestDM - amountDM) / duration;
			}
			else
			{
				summary.WriteMessage(this, "   Defoliation will not happend because there is not enough plant material");
				if (intervalType == "Fixed")
					DaysAfterCut = -duration;
				return;
			}

			cuttingDuration = duration;
			// Preform first defoliation
			removeDM(herbageToRemove);
			returnExcreta();
			daysCutting = 1;
			DaysAfterCut = 0;
			if (daysCutting == cuttingDuration)
				PostHarvestDM = Pasture[0].StandingHerbageWt;  //+ Pasture[1].StandingHerbageWt
		}

		// Do the DM removal
		private void removeDM(double removeAmount)
		{
			double existingWt = Pasture[0].HarvestableWt;  // + Pasture[1].HarvestableWt

			// Check whether we harvest anything
			if (existingWt >= removeAmount)
			{
				foreach (AgPasture.PastureSpecies species in Pasture)
				{
					double amountToRemove = removeAmount * species.HarvestableWt / existingWt;
					species.Graze(amount: amountToRemove, type: "SetRemoveAmount");
				}
				
				// get total harvested
				DefoliatedWt = Pasture[0].HarvestedWt;  // + Pasture[1].HarvestedWt
				DefoliatedN = Pasture[0].HarvestedN;  //+ Pasture[1].HarvestedN
				HarvestedWt = DefoliatedWt;
				HarvestedN = DefoliatedN;

				// get amounts actually removed from field and that to be returned (dung/urine)
				if (DMRemoveType == removeDMTypes.RemoveAll)
					fractionDM2Remove = 1.0;
				else if (DMRemoveType == removeDMTypes.RemoveNone)
					fractionDM2Remove = 0.0;
				else
				{
					fractionDM2Remove = Pasture[0].HarvestedDigestibility * Pasture[0].HarvestedWt;  //+ Pasture[1].HarvestedDigestibility * Pasture[1].HarvestedWt
					fractionDM2Remove /= removeAmount;
				}
				
				RemovedWt = HarvestedWt * fractionDM2Remove;
				RemovedN = HarvestedN * FractionN2Remove;
				ReturnedWt = HarvestedWt - RemovedWt;
				ReturnedN = HarvestedN - RemovedN;
				NReturnedInDung = ReturnedN * ProportionN2Dung;
				NReturnedInUrine = ReturnedN - NReturnedInDung;
			}
		}

		// Return dung and urine
		private void returnExcreta()
		{
			if ((ReturnedWt > 0.0) || (NReturnedInDung > 0.0))
			{
				PMF.BiomassRemovedType BiomassDung = new PMF.BiomassRemovedType();
				string[] type = new string[] { "RuminantDung_PastureFed" };
				float[] dltdm = new float[] { (Single)ReturnedWt };
				float[] dltn = new float[] { (Single)NReturnedInDung };
				float[] dltp = new float[] { 0 };
				float[] fraction = new float[] { 1 };     // fraction is always 1.0 here

				BiomassDung.crop_type = "RuminantDung_PastureFed";
				BiomassDung.dm_type = type;
				BiomassDung.dlt_crop_dm = dltdm;
				BiomassDung.dlt_dm_n = dltn;
				BiomassDung.dlt_dm_p = dltp;
				BiomassDung.fraction_to_residue = fraction;
				BiomassRemoved.Invoke(BiomassDung);
			}

			if (NReturnedInUrine > 0.0)
			{
				fertiliser.Apply(NReturnedInUrine * 10, Fertiliser.Types.UreaN, 1.0);
			}
		}
	}
}
```
            Manager AutomaticFertiliser
              AllowFertiliser = no
              Depth2SoilN = 500
              CriticalSoilN = 50
              FertNAmount = 25
              FertType = UreaN
              FertApplicationDepth = 1
              FertMinimumDays = 1
              script: same as in Tests of Crops with Roots Across Zones.Test With No Stress.Experiment.TestWithNoStress.Zone0.Managers.AutomaticFertiliser
            Manager AutomaticIrrigation
              allowIrrigation = yes
              allowIrrigationAll = yes
              seasonStart = 15-Aug
              seasonEnd = 30-May
              seasonsAllocation = 10000
              triggerDeficit = 99
              targetDeficit = 100
              returndays = 1
              maximumAmount = 5
              depthPAWC = 600
              script: same as in Tests of Crops with Roots Across Zones.Test With No Stress.Experiment.TestWithNoStress.Zone0.Managers.AutomaticIrrigation
          MicroClimate: a_interception=0; b_interception=1; c_interception=0; d_interception=0; soil_albedo=0.23; sun_angle=15; soil_heat_flux_fraction=0.4; night_interception_fraction=0.5; refheight=2; albedo=0.15; emissivity=0.96; RadIntTotal=0
          Irrigation
          Fertiliser
          SurfaceOrganicMatter: same as Tests of Crops with Roots Across Zones.Test With No Stress.Experiment.TestWithNoStress.Zone0.SurfaceOrganicMatter
          Soil: LocalName=Stores lots of water; Site=Made up; Latitude=0; Longitude=0
            Analysis: same as Tests of Crops with Roots Across Zones.Test With No Stress.Experiment.TestWithNoStress.Zone0.Soil.Analysis
            Water: same as Tests of Crops with Roots Across Zones.Test With No Stress.Experiment.TestWithNoStress.Zone0.Soil.Water
            SoilWater: same as Tests of Crops with Roots Across Zones.Test With No Stress.Experiment.TestWithNoStress.Zone0.Soil.SoilWater
            SoilNitrogen: same as Tests of Crops with Roots Across Zones.Test With No Stress.Experiment.TestWithNoStress.Zone0.Soil.SoilNitrogen
            SoilOrganicMatter: RootCN=40; RootWt=0; SoilCN=12; EnrACoeff=7.4; EnrBCoeff=0.2; OCUnits=Total
              Thickness  OC  FBiom  FInert
              150        0   0      0
              150        0   0      0
              150        0   0      0
              150        0   0      0
            InitialWater Initial water: PercentMethod=EvenlyDistributed; FractionFull=0.95
            Sample Initial nitrogen: NO3Units=ppm; NH4Units=ppm; SWUnits=Volumetric; OCUnits=Total; PHUnits=Water
              Thickness  NO3  NH4
              150        5    0
              150        5    0
              150        5    0
              150        5    0
            CERESSoilTemperature
          SoluteManager
          PastureSpecies Ryegrass: same as Tests of Crops with Roots Across Zones.Test With No Stress.Experiment.TestWithNoStress.Zone0.Ryegrass
          Report ThreeZoneSimulationInitialUniformSoilN: same as Tests of Crops with Roots Across Zones.Test With No Stress.Experiment.TestWithNoStress.Zone0.TestWithNoStress
        Zone Zone1: Area=1; Slope=0
          Folder Managers
            Manager DoRootsThreeZone
              RootDepth = 600
              RootMass = 500
              Zone0Name = Zone0
              Zone0Prop = 0.3
              Zone2Name = Zone2
              Zone2Prop = 0.3
              script: same as in Tests of Crops with Roots Across Zones.Three Zone Simulation with Initial Uniform Soil N.ThreeZoneSimulationInitialUniformSoilN.Zone0.Managers.DoRootsThreeZone
            Manager CutRotationSingle: same as Tests of Crops with Roots Across Zones.Three Zone Simulation with Initial Uniform Soil N.ThreeZoneSimulationInitialUniformSoilN.Zone0.Managers.CutRotationSingle
            Manager AutomaticFertiliser: same as Tests of Crops with Roots Across Zones.Three Zone Simulation with Initial Uniform Soil N.ThreeZoneSimulationInitialUniformSoilN.Zone0.Managers.AutomaticFertiliser
            Manager AutomaticIrrigation: same as Tests of Crops with Roots Across Zones.Three Zone Simulation with Initial Uniform Soil N.ThreeZoneSimulationInitialUniformSoilN.Zone0.Managers.AutomaticIrrigation
          MicroClimate: a_interception=0; b_interception=1; c_interception=0; d_interception=0; soil_albedo=0.23; sun_angle=15; soil_heat_flux_fraction=0.4; night_interception_fraction=0.5; refheight=2; albedo=0.15; emissivity=0.96; RadIntTotal=0
          Irrigation
          Fertiliser
          SurfaceOrganicMatter: same as Tests of Crops with Roots Across Zones.Test With No Stress.Experiment.TestWithNoStress.Zone0.SurfaceOrganicMatter
          Soil: same as Tests of Crops with Roots Across Zones.Three Zone Simulation with Initial Uniform Soil N.ThreeZoneSimulationInitialUniformSoilN.Zone0.Soil
          SoluteManager
          PastureSpecies Ryegrass: same as Tests of Crops with Roots Across Zones.Test With No Stress.Experiment.TestWithNoStress.Zone0.Ryegrass
          Report ThreeZoneSimulationInitialUniformSoilN: same as Tests of Crops with Roots Across Zones.Test With No Stress.Experiment.TestWithNoStress.Zone0.TestWithNoStress
        Zone Zone2: Area=1; Slope=0
          Folder Managers
            Manager DoRootsThreeZone
              RootDepth = 600
              RootMass = 500
              Zone0Name = Zone1
              Zone0Prop = 0
              Zone2Name = Zone2
              Zone2Prop = 0
              script: same as in Tests of Crops with Roots Across Zones.Three Zone Simulation with Initial Uniform Soil N.ThreeZoneSimulationInitialUniformSoilN.Zone0.Managers.DoRootsThreeZone
            Manager CutRotationSingle: same as Tests of Crops with Roots Across Zones.Three Zone Simulation with Initial Uniform Soil N.ThreeZoneSimulationInitialUniformSoilN.Zone0.Managers.CutRotationSingle
            Manager AutomaticFertiliser: same as Tests of Crops with Roots Across Zones.Three Zone Simulation with Initial Uniform Soil N.ThreeZoneSimulationInitialUniformSoilN.Zone0.Managers.AutomaticFertiliser
            Manager AutomaticIrrigation: same as Tests of Crops with Roots Across Zones.Three Zone Simulation with Initial Uniform Soil N.ThreeZoneSimulationInitialUniformSoilN.Zone0.Managers.AutomaticIrrigation
          MicroClimate: a_interception=0; b_interception=1; c_interception=0; d_interception=0; soil_albedo=0.23; sun_angle=15; soil_heat_flux_fraction=0.4; night_interception_fraction=0.5; refheight=2; albedo=0.15; emissivity=0.96; RadIntTotal=0
          Irrigation
          Fertiliser
          SurfaceOrganicMatter: same as Tests of Crops with Roots Across Zones.Test With No Stress.Experiment.TestWithNoStress.Zone0.SurfaceOrganicMatter
          Soil: same as Tests of Crops with Roots Across Zones.Three Zone Simulation with Initial Uniform Soil N.ThreeZoneSimulationInitialUniformSoilN.Zone0.Soil
          SoluteManager
          PastureSpecies Ryegrass: same as Tests of Crops with Roots Across Zones.Test With No Stress.Experiment.TestWithNoStress.Zone0.Ryegrass
          Report ThreeZoneSimulationInitialUniformSoilN: same as Tests of Crops with Roots Across Zones.Test With No Stress.Experiment.TestWithNoStress.Zone0.TestWithNoStress
    Folder Three Zone Simulation with Initial Nonuniform Soil N
      Memo Memo ThreeZoneSimulationInitialNonuniformSoilN
        This simulation differs from the previous only in that Zone0 initially starts with 100 kg of mineral N in the soil. This results in the expected changes in plant performance and depletion of soil N and water.
      Simulation ThreeZoneSimulationInitialNonuniformSoilN
        Clock: StartDate=2000-01-01; EndDate=2000-03-31
        ControlledEnvironment: MaxT=25; MinT=15; Rain=0; Radn=25; PanEvap=0; VP=17; Wind=3; CO2=350; AirPressure=1010; Latitude=0; DayLength=12
        SoilArbitrator
        Summary
        Zone Zone0: Area=1; Slope=0
          Folder Managers: same as Tests of Crops with Roots Across Zones.Three Zone Simulation with Initial Uniform Soil N.ThreeZoneSimulationInitialUniformSoilN.Zone0.Managers
          MicroClimate: a_interception=0; b_interception=1; c_interception=0; d_interception=0; soil_albedo=0.23; sun_angle=15; soil_heat_flux_fraction=0.4; night_interception_fraction=0.5; refheight=2; albedo=0.15; emissivity=0.96; RadIntTotal=0
          Irrigation
          Fertiliser
          SurfaceOrganicMatter: same as Tests of Crops with Roots Across Zones.Test With No Stress.Experiment.TestWithNoStress.Zone0.SurfaceOrganicMatter
          Soil: same as Tests of Crops with Roots Across Zones.Test With No Stress.Experiment.TestWithNoStress.Zone0.Soil
          SoluteManager
          PastureSpecies Ryegrass: same as Tests of Crops with Roots Across Zones.Test With No Stress.Experiment.TestWithNoStress.Zone0.Ryegrass
          Report ThreeZoneSimulationInitialNonuniformSoilN: same as Tests of Crops with Roots Across Zones.Test With No Stress.Experiment.TestWithNoStress.Zone0.TestWithNoStress
        Zone Zone1: Area=1; Slope=0
          Folder Managers: same as Tests of Crops with Roots Across Zones.Three Zone Simulation with Initial Uniform Soil N.ThreeZoneSimulationInitialUniformSoilN.Zone1.Managers
          MicroClimate: a_interception=0; b_interception=1; c_interception=0; d_interception=0; soil_albedo=0.23; sun_angle=15; soil_heat_flux_fraction=0.4; night_interception_fraction=0.5; refheight=2; albedo=0.15; emissivity=0.96; RadIntTotal=0
          Irrigation
          Fertiliser
          SurfaceOrganicMatter: same as Tests of Crops with Roots Across Zones.Test With No Stress.Experiment.TestWithNoStress.Zone0.SurfaceOrganicMatter
          Soil: same as Tests of Crops with Roots Across Zones.Three Zone Simulation with Initial Uniform Soil N.ThreeZoneSimulationInitialUniformSoilN.Zone0.Soil
          SoluteManager
          PastureSpecies Ryegrass: same as Tests of Crops with Roots Across Zones.Test With No Stress.Experiment.TestWithNoStress.Zone0.Ryegrass
          Report ThreeZoneSimulationInitialNonuniformSoilN: same as Tests of Crops with Roots Across Zones.Test With No Stress.Experiment.TestWithNoStress.Zone0.TestWithNoStress
        Zone Zone2: Area=1; Slope=0
          Folder Managers: same as Tests of Crops with Roots Across Zones.Three Zone Simulation with Initial Uniform Soil N.ThreeZoneSimulationInitialUniformSoilN.Zone2.Managers
          MicroClimate: a_interception=0; b_interception=1; c_interception=0; d_interception=0; soil_albedo=0.23; sun_angle=15; soil_heat_flux_fraction=0.4; night_interception_fraction=0.5; refheight=2; albedo=0.15; emissivity=0.96; RadIntTotal=0
          Irrigation
          Fertiliser
          SurfaceOrganicMatter: same as Tests of Crops with Roots Across Zones.Test With No Stress.Experiment.TestWithNoStress.Zone0.SurfaceOrganicMatter
          Soil: same as Tests of Crops with Roots Across Zones.Three Zone Simulation with Initial Uniform Soil N.ThreeZoneSimulationInitialUniformSoilN.Zone0.Soil
          SoluteManager
          PastureSpecies Ryegrass: same as Tests of Crops with Roots Across Zones.Test With No Stress.Experiment.TestWithNoStress.Zone0.Ryegrass
          Report ThreeZoneSimulationInitialNonuniformSoilN: same as Tests of Crops with Roots Across Zones.Test With No Stress.Experiment.TestWithNoStress.Zone0.TestWithNoStress
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