Simulations: Version=2
  DataStore
  Folder OneSpecies
    Simulation Ryegrass: Area=0; Slope=0
      Clock: StartDate=2000-07-01; EndDate=2000-07-30
      Weather: FileName=%root%\Tests\WeatherFiles\Ruakura.met
      Manager SetCO2
        ambientCO2 = 380
```csharp
using System;
using Models.Core;
using Models.PMF;
namespace Models
{
	[Serializable]
	public class Script : Model
	{
		[Link] Weather MetData;
		[Link] Clock Clock;
	
		[Description("Ambient CO2 concentration (ppm):")]
		public double ambientCO2 { get; set; }
		//= 350;
	
		[EventSubscribe("Commencing")]
		private void OnSimulationCommencing(object sender, EventArgs e)
		{
			MetData.CO2 = ambientCO2;
		}
	}
}
```
      Summary
      Zone Field: Area=0; Slope=0
        Folder Managers
          Manager CutRotation
            CutRotationStartDate = 2000-07-01
            CutRotationEndDate = 2100-12-31
            CutInterval = 21
            IntervalType = FixedInterval
            DurationOfCut = 1
            RemoveAmountType = ResidualDM
            AmountGiven = 1500
            DMRemoveType = RemoveAll
            FractionN2Remove = 1
            ProportionN2Dung = 0
```csharp
// Defoliates AgPasture on a regular rotation or one-off via a schedule
// currenty defoliates the amount specified by spreading evenly over the specified period

using System;
using System.Xml.Serialization;
using Models.Core;
using Models.PMF;
using APSIM.Shared.Utilities;

namespace Models
{
	[Serializable]
	public class Script : Model
	{
		// - Links to APSIM models
		[Link] Zone zone;
		[Link] Clock Clock;
		[Link] Fertiliser fertiliser;
		[Link] ISummary summary = null;
		[Link] AgPasture.PastureSpecies Pasture;
		
		// - Paramters for this manager
		[Description("Date to begin the rotation: ")]
		public DateTime CutRotationStartDate { get; set; }
		[Description("Date to finish the rotation: ")]
		public DateTime CutRotationEndDate { get; set; }
		[Description("Rotation interval (days): ")]
		public int CutInterval { get; set; }
		[Description("How the interval is defined: ")]
		public rotationIntervalTypes IntervalType { get; set; }
		[Description("Duration of each event (days): ")]
		public int DurationOfCut { get; set; }
		[Description("What amount is being defined: ")]
		public removeAmountTypes RemoveAmountType { get; set; }
		[Description("Amount to use (kg/ha): ")]
		public double AmountGiven { get; set; }
		[Description("Fraction of DM that is removed from the field:")]
		public removeDMTypes DMRemoveType { get; set; }
		[Description("Fraction of N that is removed from the field (0-1):")]
		public double FractionN2Remove { get; set; }
		[Description("Proportion of N returned in dung (0-1):")]
		public double ProportionN2Dung { get; set; }

		// - Outputs from this manager
		[XmlIgnore][Units("g/m2")]// Description: Pasture DM defoliated today
		public double DefoliatedWt { get; set; }
		[XmlIgnore][Units("g/m2")]// Description: Pasture N defoliate today
		public double DefoliatedN { get; set; }
		[XmlIgnore][Units("g/m2")]// Description: Pasture DM harvested today
		public double HarvestedWt { get; set; }
		[XmlIgnore][Units("g/m2")]// Description: Pasture N harvested today
		public double HarvestedN { get; set; }
		[XmlIgnore][Units("g/m2")]// Description: Pasture DM removed from the field
		public double RemovedWt { get; set; }
		[XmlIgnore][Units("g/m2")]// Description: Pasture N removed from the field
		public double RemovedN { get; set; }
		[XmlIgnore][Units("g/m2")]// Description: Residue DM returned to the field
		public double ReturnedWt { get; set; }
		[XmlIgnore][Units("g/m2")]// Description: Residue N returned to the field
		public double ReturnedN { get; set; }
		[XmlIgnore][Units("g/m2")]// Description: Harvested N returned as dung (SurfaceOM)
		public double NReturnedInDung { get; set; }
		[XmlIgnore][Units("g/m2")]// Description: Harvested N returned as urine (urea)
		public double NReturnedInUrine { get; set; }
		[XmlIgnore][Units("day")]// Description: Number of days after last defoliation
		public int DaysAfterCut { get; set; }
		[XmlIgnore][Units("g/m2")]// Description: Total standing DM (Leaf + Stem/Sheath) before cut
		public double PreHarvestDM { get; set; }
		[XmlIgnore][Units("g/m2")]// Description: Total standing DM (Leaf + Stem/Sheath) after cut
		public double PostHarvestDM { get; set; }
		
		// - Internal variables
		// fraction of harvested Dm to actually remove from field
		private double fractionDM2Remove = 1.0;
		// flag whether defoliation is allowed
		private bool rotationAllowed = true;
		// number of days for each defoliation event
		private int cuttingDuration = 0;
		// counter for day within each defoliation
		private int daysCutting = 0;
		// type of interval (Fixed or target)
		private string intervalType;
		// total herbage to remove in g/m2 per day
		private double herbageToRemove;
		// type of DM amount (ResidualDM or DMToRemove)
		private string amountType;
		// auxiliary flag for defoliation
		private bool aCutHasHappened = false;

		// - Event to add residue or dung to surface OM
		public event BiomassRemovedDelegate BiomassRemoved;

		[EventSubscribe("Commencing")]
		private void OnSimulationCommencing(object sender, EventArgs e)
		{
			// reset variables
			DaysAfterCut = 0;
			resetVariables();
			cuttingDuration = DurationOfCut;
			
			// get the type of amount given
			if (RemoveAmountType == removeAmountTypes.ResidualDM)
				amountType = "SetResidueAmount";
			else
				amountType = "SetRemoveAmount";

			// get the type of amount given
			if (IntervalType == rotationIntervalTypes.FixedInterval)
				intervalType = "Fixed";
			else
				intervalType = "Target";

			// make sure that rotation start when startDate < simulationStartDay
			if ((Clock.Today > CutRotationStartDate) && (Clock.Today < CutRotationEndDate))
				CutRotationStartDate = Clock.Today;
		}
		
		[EventSubscribe("DoManagement")]
		private void OnDoManagement(object sender, EventArgs e)
		{
			if (rotationAllowed)
			{
				if (Clock.Today == CutRotationStartDate)
					DaysAfterCut = CutInterval;

				// Check whether we can defoliate
				if ((Clock.Today >= CutRotationStartDate) && (Clock.Today <= CutRotationEndDate) && (Pasture.IsAlive))
				{
					// Check whether we should start a defoliation
					if (DaysAfterCut == CutInterval)
					{
						Graze(AmountGiven, amountType, DurationOfCut);
					}
				}
			}

			// Check whether we need to continue cutting
			if ((daysCutting > 0) && (daysCutting < cuttingDuration))
			{
				// reset outputs
				resetVariables();

				removeDM(herbageToRemove);
				returnExcreta();
				daysCutting += 1;
				if (daysCutting == cuttingDuration)
					PostHarvestDM = Pasture.StandingWt;
			}

			// reset outputs
			if (daysCutting < 0)
			{
				resetVariables();
				daysCutting = 0;
			}
		}

		[EventSubscribe("DoManagementCalculations")]
		private void OnDoManagementCalculations(object sender, EventArgs e)
		{
			// Check whether a cutting has finished
			if (daysCutting == cuttingDuration)
			{
				aCutHasHappened = true;
				daysCutting = -1;
			}

			// Increase the counter for days after cutting
			if (aCutHasHappened && (daysCutting == 0))
				DaysAfterCut += 1;
		}

		public enum removeAmountTypes
		{
			/// <summary>Setting DM amount to remove</summary>
			DMToRemove,
			/// <summary>Setting residual DM amount</summary>
			ResidualDM
		}

		public enum rotationIntervalTypes
		{
			/// <summary>Setting a fixed interval</summary>
			FixedInterval,
			/// <summary>Setting a target (minimum) inteval</summary>
			TargetInterval
		}

		public enum removeDMTypes
		{
			/// <summary>Remove all DM</summary>
			RemoveAll,
			/// <summary>Remove no DM</summary>
			RemoveNone,
			/// <summary>Remove a fraction based on digestibility</summary>
			BasedOnDigestibility
		}

		// Resets the values of all outputs
		private void resetVariables()
		{
			DefoliatedWt = 0.0;
			DefoliatedN = 0.0;
			HarvestedWt = 0.0;
			HarvestedN = 0.0;
			RemovedWt = 0.0;
			RemovedN = 0.0;
			ReturnedWt = 0.0;
			ReturnedN = 0.0;
			NReturnedInDung = 0.0;
			NReturnedInUrine = 0.0;
		}

		// Description: Perform the basic calculations for defoliation
		public void Graze(double amountDM, string amountType, int duration)
		{
			// Get the existing plant amount
			PreHarvestDM = Pasture.StandingWt;
			
			// Check the amount to remove and print some info
			if ((amountType == "SetRemoveAmount") && (PreHarvestDM >= amountDM / duration))
			{
				summary.WriteMessage(this, "   Defoliating " + (10 * amountDM).ToString("#0.0") + "kg/ha over " + duration + " days");
				herbageToRemove = amountDM / duration;
			}
			else if ((amountType == "SetResidueAmount") && (PreHarvestDM >= amountDM))
			{
				summary.WriteMessage(this, "   Defoliating down to approximately " + (10 * amountDM).ToString("#0.0") + "kg/ha over " + duration + " days");
				herbageToRemove = (PreHarvestDM - amountDM) / duration;
			}
			else
			{
				summary.WriteMessage(this, "   Defoliation will not happend because there is not enough plant material");
				if (intervalType == "Fixed")
					DaysAfterCut = -duration;
				return;
			}

			cuttingDuration = duration;
			// Preform first defoliation
			removeDM(herbageToRemove);
			returnExcreta();
			daysCutting = 1;
			DaysAfterCut = 0;
			if (daysCutting == cuttingDuration)
				PostHarvestDM = Pasture.StandingWt;
		}

		// Do the DM removal
		private void removeDM(double removeAmount)
		{
			double existingWt = Pasture.StandingWt;

			// Check whether we harvest anything
			if (existingWt >= removeAmount)
			{
				Pasture.Harvest(amount: removeAmount, type: "SetRemoveAmount");
				
				// get total harvested
				DefoliatedWt = Pasture.HarvestedWt;
				DefoliatedN = Pasture.HarvestedN;
				HarvestedWt = DefoliatedWt;
				HarvestedN = DefoliatedN;

				// get amounts actually removed from field and that to be returned (dung/urine)
				if (DMRemoveType == removeDMTypes.RemoveAll)
					fractionDM2Remove = 1.0;
				else if (DMRemoveType == removeDMTypes.RemoveNone)
					fractionDM2Remove = 0.0;
				else
					fractionDM2Remove = Pasture.HarvestedDigestibility;
				
				RemovedWt = HarvestedWt * fractionDM2Remove;
				RemovedN = HarvestedN * FractionN2Remove;
				ReturnedWt = HarvestedWt - RemovedWt;
				ReturnedN = HarvestedN - RemovedN;
				NReturnedInDung = ReturnedN * ProportionN2Dung;
				NReturnedInUrine = ReturnedN - NReturnedInDung;
			}
		}

		// Return dung and urine
		private void returnExcreta()
		{
			if ((ReturnedWt > 0.0) || (NReturnedInDung > 0.0))
			{
				PMF.BiomassRemovedType BiomassDung = new PMF.BiomassRemovedType();
				string[] type = new string[] { "RuminantDung_PastureFed" };
				float[] dltdm = new float[] { (Single)ReturnedWt };
				float[] dltn = new float[] { (Single)NReturnedInDung };
				float[] dltp = new float[] { 0 };
				float[] fraction = new float[] { 1 };     // fraction is always 1.0 here

				BiomassDung.crop_type = "RuminantDung_PastureFed";
				BiomassDung.dm_type = type;
				BiomassDung.dlt_crop_dm = dltdm;
				BiomassDung.dlt_dm_n = dltn;
				BiomassDung.dlt_dm_p = dltp;
				BiomassDung.fraction_to_residue = fraction;
				BiomassRemoved.Invoke(BiomassDung);
			}

			if (NReturnedInUrine > 0.0)
			{
				fertiliser.Apply(NReturnedInUrine * 10, Fertiliser.Types.UreaN, 1.0);
			}
		}
	}
}
```
          Manager AutomaticFertiliser
            AllowFertiliser = yes
            Depth2SoilN = 500
            CriticalSoilN = 5
            FertNAmount = 20
            FertType = UreaN
            FertApplicationDepth = 1
            FertMinimumDays = 30
```csharp
using System;
using Models.Core;
using Models.PMF;
using Models.Soils;
using APSIM.Shared.Utilities;
using System.Xml.Serialization;

namespace Models
{
	[Serializable]
	public class Script : Model
	{
		[Link] Clock Clock;
		[Link] Fertiliser fertiliser;
		[Link] ISummary summary = null;
		[Link] Soil Soil;

		//User inputs from properties tab
		[Description("Turn ferliser applications on? ")]
		public yesnoType AllowFertiliser { get; set; }
		
		[Description("Depth to calculate available soil N (mm): ")]
		public double Depth2SoilN { get; set; }

		[Description("Minimum available N, triggers an application (kgN/ha): ")]
		public double CriticalSoilN { get; set; }

		[Description("Amount of N fertiliser for each application (kgN/ha): ")]
		public double FertNAmount { get; set; }

		[Description("Type of N fertiliser to apply: ")]
		public Fertiliser.Types FertType { get; set; }

		[Description("Depth at which to apply the fertiliser (mm): ")]
		public double FertApplicationDepth { get; set; }
	   
		[Description("Minimum period between applications (days): ")]
		public double FertMinimumDays { get; set; }
	   
		public enum yesnoType
		{
			/// <summary>a positive answer</summary>
			yes,
			/// <summary>a negative answer</summary>
			no
		}

		[XmlIgnore] public double TopMineralN { get; set; }
		
		private DateTime lastApplicationDate;
		private bool fertiliserIsAllowed;
		private int nLayers;

		[EventSubscribe("StartOfSimulation")]
		private void OnStartOfSimulation(object sender, EventArgs e)
		{
			fertiliserIsAllowed = (AllowFertiliser == yesnoType.yes);
			nLayers = Soil.SoilWater.Thickness.Length;
		}

		[EventSubscribe("DoManagement")]
		private void OnDoManagement(object sender, EventArgs e)
		{
			double daysSinceLastApplication = (Clock.Today - lastApplicationDate).TotalDays;
			
			// get the N stored in the soil
			double depthFromSurface = 0.0;
			double fracLayer = 0.0;
			TopMineralN = 0.0;
			for (int layer = 0; layer < nLayers; layer++)
			{
				fracLayer = Math.Min(1.0, (Depth2SoilN - depthFromSurface) / Soil.SoilWater.Thickness[layer]);
				TopMineralN += (Soil.SoilNitrogen.NO3[layer]
				+ Soil.SoilNitrogen.NH4[layer]
				+ Soil.SoilNitrogen.urea[layer])
				* fracLayer;
				depthFromSurface += Soil.SoilWater.Thickness[layer];
				if (depthFromSurface >= Depth2SoilN)
					layer = nLayers;
			}

			if (fertiliserIsAllowed && (daysSinceLastApplication >= FertMinimumDays) && (TopMineralN <= CriticalSoilN))
			{
				fertiliser.Apply(FertNAmount, FertType, FertApplicationDepth);
				lastApplicationDate = Clock.Today;
			}
		}
	}
}
```
          Manager AutomaticIrrigation
            allowIrrigation = no
            seasonStart = 15-Sep
            seasonEnd = 30-May
            seasonsAllocation = 10000
            triggerDeficit = 90
            targetDeficit = 99
            returndays = 1
            maximumAmount = 30
            depthPAWC = 300
```csharp
using System;
using Models.Core;
using Models.PMF;
using Models.Soils;
using System.Xml.Serialization;
using Models.PMF;
using APSIM.Shared.Utilities;

        
namespace Models
{
	[Serializable] 
	[System.Xml.Serialization.XmlInclude(typeof(Model))]
	public class Script : Model
	{
		//Communication to other modules
		[Link] ISummary summary = null;
		[Link] Irrigation Irrigation;
		[Link] Clock Clock;
		[Link] Soil Soil;
		[Link(IsOptional = true)] Plant existingCrop;
	   
		//User inputs from properties tab
		[Description("Turn irrigation on?")]
		public answerType allowIrrigation { get; set; }
		[Description("Start of irrigation season (dd-MMM)")]
		public string seasonStart { get; set; }
		[Description("End of irrigation season (dd-MMM)")]
		public string seasonEnd { get; set; }
		[Description("Season allocation (mm)")]
		public double seasonsAllocation { get; set; }
		[Description("Deficit to trigger irrigation (% PAWC)")]
		public double triggerDeficit { get; set; }
		[Description("Deficit to stop irrigaton (% PAWC)")]
		public double targetDeficit { get; set; }
		[Description("Minimum days for irrigation to return")]
		public double returndays { get; set; }
		[Description("Maximum irrigation application (mm/day)")]
		public double maximumAmount { get; set; }
		[Description("Depth to calculate PAWC (mm)")]
		public double depthPAWC { get; set; }
	   
		public enum answerType
		{
			/// <summary>a positive answer</summary>
			yes,
			/// <summary>a negative answer</summary>
			no
		}

		//Class members
		[XmlIgnore] public double TopSWdeficit { get; set; }
		[XmlIgnore] public double TopSWC { get; set; }
		[XmlIgnore] public double DaysSinceIrrigation { get; set; }
		[XmlIgnore] public double AmountToApply { get; set; }
		[XmlIgnore] public double SeasonAppliedAmount { get; set; }
		
		private bool IrrigationIsAllowed { get; set; }
		private bool SeasonIsOpen { get; set; }
		private bool CropIsActive { get; set; }
		private bool IrrigatorIsAvailable { get; set; }
		private bool SoilIsDry { get; set; }

		private DateTime StartDate;
		private DateTime EndDate;
		private double TopDUL;
		private double TopLL;
		private int nLayers;
	
		//Calculate static soil variables
		[EventSubscribe("StartOfSimulation")]
		private void OnStartOfSimulation(object sender, EventArgs e)
		{   
			//Set the season dates
			StartDate = DateTime.Parse(seasonStart + "-" + Clock.Today.Year.ToString());
			EndDate = DateTime.Parse(seasonEnd + "-" + Clock.Today.Year.ToString());
			
			//Can we irrigate at all?
			IrrigationIsAllowed = false; 
			if (allowIrrigation == answerType.yes)
				IrrigationIsAllowed = true; 

			//Calculate soil water variables
			double depthFromSurface = 0.0;
			double fracLayer = 0.0;
			nLayers = Soil.SoilWater.Thickness.Length;
			for (int layer = 0; layer < nLayers; layer++)
			{
				fracLayer = Math.Min(1.0, (depthPAWC - depthFromSurface) / Soil.SoilWater.Thickness[layer]);
				TopLL += Soil.SoilWater.LL15mm[layer] * fracLayer;
				TopDUL += Soil.SoilWater.DULmm[layer] * fracLayer;
				depthFromSurface += Soil.SoilWater.Thickness[layer];
				if (depthFromSurface >= depthPAWC)
					layer = nLayers;
			}
		}
	   	  
		//Determine daily requirement for irrigation
		[EventSubscribe("StartOfDay")]
		private void OnStartOfDay(object sender, EventArgs e)
		{
			//Can we irrigate today?		  
			SeasonIsOpen = isBetween(Clock.Today, StartDate, EndDate);

			//Is there a crop in the ground that needs irrigation?
			CropIsActive = false;
			if ((existingCrop != null) && (existingCrop.IsAlive))
				CropIsActive = true;
			//if ((existingCrop.Phenology.Stage >= 3.0) && (existingCrop.Phenology.Stage < 6.0))
	      
			//Is the irrigator available?
			IrrigatorIsAvailable = false;
			DaysSinceIrrigation += 1;
			if (DaysSinceIrrigation >= returndays)
				IrrigatorIsAvailable = true;
	      
			//Is the soil dry enough to require irrigation?
			SoilIsDry = false;
			double depthFromSurface = 0.0;
			double fracLayer = 0.0;
			TopSWC = 0.0;
			for (int layer = 0; layer < nLayers; layer++)
			//for (int layer = 0; depthFromSurface < depthPAWC + Soil.SoilWater.Thickness[layer]; layer++)
			{
				fracLayer = Math.Min(1.0, (depthPAWC - depthFromSurface) / Soil.SoilWater.Thickness[layer]);
				TopSWC += Soil.SoilWater.SWmm[layer] * fracLayer;
				depthFromSurface += Soil.SoilWater.Thickness[layer];
				if (depthFromSurface >= depthPAWC)
					layer = nLayers;
			}
			
			TopSWdeficit = TopSWC - TopDUL;
			if (Math.Max(0.0, -TopSWdeficit) >= (TopDUL - TopLL) * (100 - triggerDeficit) / 100)
				SoilIsDry = true;
	            
			//Are all the conditions ratifying irrigation
			if (IrrigationIsAllowed && SeasonIsOpen && CropIsActive && IrrigatorIsAvailable && SoilIsDry)
			{
				//Lets bloody well irrigate then!!!!
				AmountToApply = TopDUL * targetDeficit / 100 - TopSWC;
				AmountToApply = Math.Max(0.0, Math.Min(AmountToApply, seasonsAllocation - SeasonAppliedAmount));
				Irrigation.Apply(AmountToApply);
				DaysSinceIrrigation = 0;
				SeasonAppliedAmount += AmountToApply;
			}
		}
		
		///Checks whether theDate is between iniDate and endDate (non-year specific)
		private bool isBetween(DateTime theDay, DateTime iniDate, DateTime endDate)
		{
			bool result = false;
			if (iniDate.DayOfYear < endDate.DayOfYear)
			{
				// period is within one year, ex: summer in the northern hemisphere
				if ((theDay.DayOfYear >= iniDate.DayOfYear) && (theDay.DayOfYear <= endDate.DayOfYear))
					result = true;
			}
			else
			{
				// period goes over the end of the year, ex: summer in the southern hemisphere
				if ((theDay.DayOfYear >= iniDate.DayOfYear) || (theDay.DayOfYear <= endDate.DayOfYear))
					result = true;
			}
			
			return result;
		}
	}
}
```
        MicroClimate: a_interception=0; b_interception=1; c_interception=0; d_interception=0; soil_albedo=0.23; air_pressure=1010; soil_emissivity=0.96; sun_angle=15; soil_heat_flux_fraction=0.4; night_interception_fraction=0.5; windspeed_default=3; refheight=2; albedo=0.15; emissivity=0.96; gsmax=0.01; r50=200
        Irrigation
        Fertiliser
        SurfaceOrganicMatter: PondActive=no; ReportAdditions=no; ReportRemovals=no; PoolName=Sward; type=grass; mass=1000; standing_fraction=0; cnr=40; CriticalResidueWeight=2000; OptimumDecompTemp=20; MaxCumulativeEOS=20; CNRatioDecompCoeff=0.277; CNRatioDecompThreshold=25; TotalLeachRain=25; MinRainToLeach=10; CriticalMinimumOrganicC=0.004; DefaultCPRatio=0; DefaultStandingFraction=0; StandingExtinctCoeff=0.5; FractionFaecesAdded=0.5
          Pools:
            {PoolName=Sward, ResidueType=grass, Mass=1000, CNRatio=40, StandingFraction=0}
          ResidueTypes: LoadFromResource=ResidueTypes
          TillageTypes TillageTypesList
        Soil LismoreSoil: SoilType=NZ_Sedimentary; LocalName=Lismore; Site=Winchmore; NearestTown=Ashburton; Region=Canterbury; Country=New Zealand; Latitude=-48.48; Longitude=0; Area=0
          Analysis: PHUnits=Water; BoronUnits=HotWater
            Thickness  Rocks  PH  CEC   ParticleSizeSand  ParticleSizeSilt  ParticleSizeClay
            150        0      6   12.5  15                65                20
            150        0      6   10    20                65                15
            200        10     6   9     25                63                12
            150        40     6   5     35                57                8
            250        60     6   4     40                54                6
            300        70     6   4     40                55                5
            300        70     6   4     40                55                5
          Water
            Thickness  BD    AirDry  LL15   DUL    SAT   KS
            150        1.3   0.05    0.15   0.36   0.45  5000
            150        1.35  0.12    0.14   0.34   0.43  2500
            200        1     0.055   0.055  0.19   0.25  3000
            150        0.53  0.015   0.015  0.065  0.15  10000
            250        0.31  0.01    0.01   0.04   0.11  17500
            300        0.3   0.01    0.01   0.03   0.11  20000
            300        0.3   0.01    0.01   0.03   0.11  20000
            SoilCrop AgPastureSoil: LL=[0.15, 0.13, 0.08, 0.02, 0.01, 0.01, 0.01]; KL=[0.1, 0.1, 0.08, 0.04, 0.01, 0, 0]; XF=[1, 1, 1, 1, 1, 0, 0]
            SoilCrop SwardSoil: LL=[0.15, 0.13, 0.08, 0.02, 0.01, 0.01, 0.01]; KL=[0.1, 0.1, 0.08, 0.04, 0.01, 0, 0]; XF=[1, 1, 1, 1, 1, 0, 0]
            SoilCrop SwardProtoSoil: LL=[0.15, 0.13, 0.08, 0.02, 0.01, 0.01, 0.01]; KL=[0.1, 0.1, 0.08, 0.04, 0.01, 0, 0]; XF=[1, 1, 1, 1, 1, 0, 0]
            SoilCrop RyegrassSoil: LL=[0.15, 0.13, 0.08, 0.02, 0.01, 0.01, 0.01]; KL=[0.1, 0.1, 0.08, 0.04, 0.01, 0, 0]; XF=[1, 1, 1, 1, 1, 0, 0]
            SoilCrop WhiteCloverSoil: LL=[0.15, 0.13, 0.08, 0.02, 0.01, 0.01, 0.01]; KL=[0.1, 0.1, 0.08, 0.04, 0.01, 0, 0]; XF=[1, 1, 1, 1, 1, 0, 0]
            SoilCrop Slurp: LL=[0.14, 0.14, 0.03, 0.02, 0.02, 0.02, 0.02]; KL=[0.06, 0.06, 0.06, 0.06, 0.06, 0.06, 0.06]; XF=[1, 1, 1, 1, 1, 1, 1]
          SoilWater: SummerDate=1-Nov; SummerU=6; SummerCona=3.5; WinterDate=1-apr; WinterU=2; WinterCona=2; DiffusConst=88; DiffusSlope=35; Salb=0.13; CN2Bare=73; CNRed=20; CNCov=0.8; slope=0; discharge_width=0; catchment_area=0; max_pond=0; residueinterception=0
            Thickness  SWCON  KLAT
            150        0.5    0
            150        0.52   0
            200        0.55   0
            150        0.6    0
            250        0.65   0
            300        0.65   0
            300        0.65   0
          SoilNitrogen: fom_type=[default, manure, mucuna, lablab, shemp, stable]; fract_carb=[0.2, 0.3, 0.54, 0.57, 0.45, 0]; fract_cell=[0.7, 0.3, 0.37, 0.37, 0.47, 0.1]; fract_lign=[0.1, 0.4, 0.09, 0.06, 0.08, 0.9]; urea_min=[0, 0, 0, 0, 0, 0, 0]; nh4_min=[0, 0, 0, 0, 0, 0, 0]; no3_min=[0, 0, 0, 0, 0, 0, 0]; wfpsN2N2O_x=[22, 88]; wfpsN2N2O_y=[0.1, 1]
            oc=[2.99129, 1.00057, 0.599738, 0.400471, 0.250698, 0.150431, 0.100235]
          SoilOrganicMatter: RootCN=40; RootWt=1000; SoilCN=12; EnrACoeff=7.4; EnrBCoeff=0.2; OCUnits=Total
            Thickness  OC    FBiom  FInert
            150        3     0.04   0.5
            150        1     0.02   0.7
            200        0.6   0.02   0.83
            150        0.4   0.01   0.9
            250        0.25  0.01   0.95
            300        0.15  0      0.99
            300        0.1   0      0.99
          InitialWater Initial water: PercentMethod=EvenlyDistributed; FractionFull=0.95
          Sample Initial nitrogen: NO3Units=ppm; NH4Units=ppm; SWUnits=Volumetric; OCUnits=Total; PHUnits=Water
            Thickness  NO3   NH4
            150        5     0.1
            150        2.5   0.1
            200        1     0.1
            150        0.75  0.1
            250        0.5   0.1
            300        0.5   0.1
            300        0.5   0.1
        PastureSpecies Ryegrass: interceptedRadn=2.83025; Albedo=0.26; Gsmax=0.011; R50=200; SpeciesFamily=grass; SpeciesPhotoPathway=C3; InitialDMShoot=2000; InitialDMRoot=500; InitialRootDepth=750; ReferencePhotosynthesisRate=1; MaintenanceRespirationCoefficient=0.03; GrowthRespirationCoefficient=0.25; LightExtentionCoeff=0.5; GrowthTmin=2; GrowthTmax=32; GrowthTopt=20; GrowthTq=1.75; HeatOnsetT=28; HeatFullT=35; HeatSumT=30; ReferenceT4Heat=25; ColdFullT=-3; ColdSumT=20; SpecificLeafArea=20; SpecificRootLength=75; MaxRootFraction=0.25; ShootSeasonalAllocationIncrease=0.8; DayInitHigherShootAllocation=232; HigherShootAllocationPeriods=[35, 60, 30]; FracToLeaf=0.7; TurnoverRateLive2Dead=0.025; TurnoverRateDead2Litter=0.11; TurnoverRateRootSenescence=0.02; TissueTurnoverTmin=2; TissueTurnoverTopt=20; TissueTurnoverWFactorMax=2; TissueTurnoverGLFWopt=0.5; DigestibilityLive=0.6; DigestibilityDead=0.2; MinimumGreenWt=300; PreferenceForGreenDM=1; PreferenceForDeadDM=1; LeafNopt=4; LeafNmax=5; LeafNmin=1.2; RelativeNStems=0.5; RelativeNRoots=0.5; RelativeNStage2=1; RelativeNStage3=1; DillutionCoefN=0.5; GlfGeneric=1; GlfSFertility=1; WaterStressExponent=1; WaterLoggingCoefficient=0.1; ReferenceCO2=380; CoefficientCO2EffectOnPhotosynthesis=700; OffsetCO2EffectOnNuptake=600; MinimumCO2EffectOnNuptake=0.7; ExponentCO2EffectOnNuptake=2; ExpoLinearDepthParam=0.12; ExpoLinearCurveParam=3.2; MaximumStomatalConductance=1; KNO3=1; KNH4=1
          zero: ColdOnsetT, ReferenceT4Cold, FracToStolon, MinimumDeadWt, RelativeNStolons, MinimumNFixation, MaximumNFixation, KappaNRemob2, KappaNRemob3, KappaNRemob4
        Report Results_Species: EventNames=[Clock].EndOfDay
          VariableNames:
            Name as ZoneName
            [Clock].Today as Date
            [Ryegrass].Name as Ryegrass.Name
            [Ryegrass].CropType as Ryegrass.CropType
            [Ryegrass].TotalWt as Ryegrass.TotalWt
            [Ryegrass].AboveGroundWt as Ryegrass.AboveGroundWt
            [Ryegrass].BelowGroundWt as Ryegrass.BelowGroundWt
            [Ryegrass].StandingWt as Ryegrass.StandingWt
            [Ryegrass].StandingLiveWt as Ryegrass.StandingLiveWt
            [Ryegrass].StandingDeadWt as Ryegrass.StandingDeadWt
            [Ryegrass].LeafWt as Ryegrass.LeafWt
            [Ryegrass].StemWt as Ryegrass.StemWt
            [Ryegrass].StolonWt as Ryegrass.StolonWt
            [Ryegrass].RootWt as Ryegrass.RootWt
            [Ryegrass].LeafStage1Wt as Ryegrass.LeafStage1Wt
            [Ryegrass].LeafStage2Wt as Ryegrass.LeafStage2Wt
            [Ryegrass].LeafStage3Wt as Ryegrass.LeafStage3Wt
            [Ryegrass].LeafStage4Wt as Ryegrass.LeafStage4Wt
            [Ryegrass].StemStage1Wt as Ryegrass.StemStage1Wt
            [Ryegrass].StemStage2Wt as Ryegrass.StemStage2Wt
            [Ryegrass].StemStage3Wt as Ryegrass.StemStage3Wt
            [Ryegrass].StemStage4Wt as Ryegrass.StemStage4Wt
            [Ryegrass].StolonStage1Wt as Ryegrass.StolonStage1Wt
            [Ryegrass].StolonStage2Wt as Ryegrass.StolonStage2Wt
            [Ryegrass].StolonStage3Wt as Ryegrass.StolonStage3Wt
            [Ryegrass].PotCarbonAssimilation as Ryegrass.PotCarbonAssimilation
            [Ryegrass].CarbonLossRespiration as Ryegrass.CarbonLossRespiration
            [Ryegrass].GrossPotentialGrowthWt as Ryegrass.GrossPotentialGrowthWt
            [Ryegrass].NetPotentialGrowthWt as Ryegrass.NetPotentialGrowthWt
            [Ryegrass].PotGrowthWt_Wstress as Ryegrass.PotGrowthWt_Wstress
            [Ryegrass].ActualGrowthWt as Ryegrass.ActualGrowthWt
            [Ryegrass].EffectiveGrowthWt as Ryegrass.EffectiveGrowthWt
            [Ryegrass].HerbageGrowthWt as Ryegrass.HerbageGrowthWt
            [Ryegrass].LitterWt as Ryegrass.LitterWt
            [Ryegrass].RootSenescedWt as Ryegrass.RootSenescedWt
            [Ryegrass].TotalN as Ryegrass.TotalN
            [Ryegrass].StandingN as Ryegrass.StandingN
            [Ryegrass].LeafN as Ryegrass.LeafN
            [Ryegrass].StemN as Ryegrass.StemN
            [Ryegrass].StolonN as Ryegrass.StolonN
            [Ryegrass].RootN as Ryegrass.RootN
            [Ryegrass].LeafStage1N as Ryegrass.LeafStage1N
            [Ryegrass].LeafStage2N as Ryegrass.LeafStage2N
            [Ryegrass].LeafStage3N as Ryegrass.LeafStage3N
            [Ryegrass].LeafStage4N as Ryegrass.LeafStage4N
            [Ryegrass].StemStage1N as Ryegrass.StemStage1N
            [Ryegrass].StemStage2N as Ryegrass.StemStage2N
            [Ryegrass].StemStage3N as Ryegrass.StemStage3N
            [Ryegrass].StemStage4N as Ryegrass.StemStage4N
            [Ryegrass].StolonStage1N as Ryegrass.StolonStage1N
            [Ryegrass].StolonStage2N as Ryegrass.StolonStage2N
            [Ryegrass].StolonStage3N as Ryegrass.StolonStage3N
            [Ryegrass].LeafNConc as Ryegrass.LeafNConc
            [Ryegrass].StemNConc as Ryegrass.StemNConc
            [Ryegrass].StolonNConc as Ryegrass.StolonNConc
            [Ryegrass].RootNConc as Ryegrass.RootNConc
            [Ryegrass].LeafStage1NConc as Ryegrass.LeafStage1NConc
            [Ryegrass].LeafStage2NConc as Ryegrass.LeafStage2NConc
            [Ryegrass].LeafStage3NConc as Ryegrass.LeafStage3NConc
            [Ryegrass].LeafStage4NConc as Ryegrass.LeafStage4NConc
            [Ryegrass].StemStage1NConc as Ryegrass.StemStage1NConc
            [Ryegrass].StemStage2NConc as Ryegrass.StemStage2NConc
            [Ryegrass].StemStage3NConc as Ryegrass.StemStage3NConc
            [Ryegrass].StemStage4NConc as Ryegrass.StemStage4NConc
            [Ryegrass].StolonStage1NConc as Ryegrass.StolonStage1NConc
            [Ryegrass].StolonStage2NConc as Ryegrass.StolonStage2NConc
            [Ryegrass].StolonStage3NConc as Ryegrass.StolonStage3NConc
            [Ryegrass].RemobilisableSenescedN as Ryegrass.RemobilisableSenescedN
            [Ryegrass].RemobilisedSenescedN as Ryegrass.RemobilisedSenescedN
            [Ryegrass].RemobilisableLuxuryN as Ryegrass.RemobilisableLuxuryN
            [Ryegrass].RemobilisedLuxuryN as Ryegrass.RemobilisedLuxuryN
            [Ryegrass].FixedN as Ryegrass.FixedN
            [Ryegrass].RequiredLuxuryN as Ryegrass.RequiredLuxuryN
            [Ryegrass].RequiredOptimumN as Ryegrass.RequiredOptimumN
            [Ryegrass].DemandSoilN as Ryegrass.DemandSoilN
            sum([Ryegrass].UptakeN) as Ryegrass.UptakeN
            [Ryegrass].LitterN as Ryegrass.LitterN
            [Ryegrass].SenescedRootN as Ryegrass.SenescedRootN
            [Ryegrass].ActualGrowthN as Ryegrass.ActualGrowthN
            [Ryegrass].ActualGrowthNConc as Ryegrass.ActualGrowthNConc
            [Ryegrass].WaterDemand as Ryegrass.WaterDemand
            sum([Ryegrass].WaterUptake) as Ryegrass.WaterUptake
            [Ryegrass].LiveDMTurnoverRate as Ryegrass.LiveDMTurnoverRate
            [Ryegrass].DeadDMTurnoverRate as Ryegrass.DeadDMTurnoverRate
            [Ryegrass].StolonDMTurnoverRate as Ryegrass.StolonDMTurnoverRate
            [Ryegrass].RootDMTurnoverRate as Ryegrass.RootDMTurnoverRate
            [Ryegrass].TotalLAI as Ryegrass.TotalLAI
            [Ryegrass].GreenLAI as Ryegrass.GreenLAI
            [Ryegrass].DeadLAI as Ryegrass.DeadLAI
            [Ryegrass].GlfTemperature as Ryegrass.GlfTemperature
            [Ryegrass].GlfWater as Ryegrass.GlfWater
            [Ryegrass].GlfN as Ryegrass.GlfN
            [Ryegrass].IrradianceTopCanopy as Ryegrass.IrradianceTopCanopy
            [Ryegrass].HarvestableWt as Ryegrass.HarvestableWt
            [Ryegrass].HarvestedWt as Ryegrass.HarvestedWt
            [Ryegrass].HarvestedFraction as Ryegrass.HarvestedFraction
            [Ryegrass].HarvestedN as Ryegrass.HarvestedN
            [Ryegrass].HerbageDigestibility as Ryegrass.HerbageDigestibility
        Report Results_Layers: EventNames=[Clock].EndOfDay
          VariableNames:
            Name as ZoneName
            [Clock].Today as Date
            [Ryegrass].Name as Sward.Name
            [Soil].Thickness as Soil.Thickness
            [Ryegrass].RootWtFraction as Ryegrass.RootWtFraction
            [Ryegrass].RLD as Ryegrass.RLD
            [Ryegrass].NitrogenAvailable as Ryegrass.NitrogenAvailable
            [Ryegrass].NitrogenUptake as Ryegrass.NitrogenUptake
            [Ryegrass].SoilAvailableWater as Ryegrass.SoilAvailableWater
            [Ryegrass].WaterUptake as Ryegrass.WaterUptake
        Report Results_MassBalance: EventNames=[Clock].EndOfDay
          VariableNames:
            Name as ZoneName
            [Clock].Today as Date
            [Ryegrass].Name as Sward.Name
            [Ryegrass].TotalN as TotalPlantN
            sum([Soil].SoilNitrogen.urea) as TotalUrea
            sum([Soil].SoilNitrogen.NH4) as TotalNH4
            sum([Soil].SoilNitrogen.NO3) as TotalNO3
            sum([Soil].SoilNitrogen.HumicN) as TotalHumusN
            sum([Soil].SoilNitrogen.MicrobialN) as TotalBiomN
            sum([Soil].SoilNitrogen.FOMN) as TotalFomN
            [SurfaceOrganicMatter].N as SurfaceOMN
            Fertiliser.NitrogenApplied as FertiliserN
            [Ryegrass].FixedN as NitrogeFixed as FixedN
            [Ryegrass].HarvestedN as HarvestN
            sum([Soil].SoilNitrogen.Denitrification) as DenitrifiedN
            [Soil].SoilWater.LeachNO3 as LeachedN
            sum([Ryegrass].UptakeN) as UptakeN
            [Ryegrass].SenescedNRemobilised as NitrogenRemobilisedSenescence
            [Ryegrass].RemobilisedLuxuryN as NitrogenRemobilisedLuxury
            [Ryegrass].ActualGrowthN as ActualGrowthN
            [Ryegrass].LitterN as LitterDepositionN
            [Ryegrass].SenescedRootN as RootSenescenceN
            sum([Soil].SoilWater.SWmm) as TotalSoilWater
            [Weather].Rain as Rain
            [Irrigation].IrrigationApplied as Irrigation
            [Soil].SoilWater.Runoff as Runoff
            [Soil].SoilWater.Drainage as Drainage
            [Soil].SoilWater.Es as Evaporation
            sum([Ryegrass].WaterUptake) as WaterUptake
            [Ryegrass].StandingPlantWt as Pasture.StandingWt
            [CutRotation].Script.PreHarvestDM as PreHarvestDM
            [CutRotation].Script.PostHarvestDM as PostHarvestDM
            [CutRotation].Script.DefoliatedWt as DefoliatedWt
            [CutRotation].Script.HarvestedWt as HarvestedWt
            [CutRotation].Script.RemovedWt as RemovedWt
            [CutRotation].Script.ReturnedWt as ReturnedWt
            [CutRotation].Script.DefoliatedN as DefoliatedN
            [CutRotation].Script.HarvestedN as HarvestedN
            [CutRotation].Script.RemovedN as RemovedN
            [CutRotation].Script.NReturnedInDung as NReturnedInDung
            [CutRotation].Script.NReturnedInUrine as NReturnedInUrine
            [CutRotation].Script.DaysAfterCut as DaysAfterCut
        Report MicroClimate1: EventNames=[Clock].EndOfDay
          VariableNames:
            Name as ZoneName
            [Clock].Today as Date
            [MicroClimate].ga
            [MicroClimate].gc
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