Simulations: Version=6
  DataStore
  Simulation Test
    Weather: FileName=%root%\Examples\WeatherFiles\lincoln.met
    Clock: StartDate=2003-01-01; EndDate=2003-01-31
    Summary
    Zone Field: Area=1; Slope=0
      Report: EventNames=[Clock].DoReport
        VariableNames:
          [Clock].Today
          [Soil].SoilWater.SWmm()
          [Man1].Script.Var1
          [Man2].Script.Var2
      Manager Man1
        Var1 = 5
```csharp
using System;
using Models.Core;
using Models.PMF;
using Models.Soils;
using Models.Utilities;
using APSIM.Shared.Utilities;

namespace Models
{
	[Serializable]
	public class Script : Model
	{
		[Link] Clock Clock;
		[Link] Summary Summary;
		
		[Description("Variable 1")]
		public int Var1 { get; set; }
		
	}
}
```
      Manager Man2
        Var2 = 0
```csharp
using System;
using Models.Core;
using Models.PMF;
using Models.Soils;
using Models.Utilities;
using APSIM.Shared.Utilities;

namespace Models
{
	[Serializable]
	public class Script : Model
	{
		[Link] Clock Clock;
		[Link] Summary Summary;
		[Link] Zone zone;
		
		public int Var2 { get; set; }
	
		[EventSubscribe("DoManagement")]
		private void OnDoManagement(object sender, EventArgs e)
		{
			Var2 = (int)zone.Get("[Man1].Script.Var1") * 5;
		}
		
	}
}
```
      Manager Man3
        Var3 = 0
```csharp
using System;
using Models.Core;
using Models.PMF;
using Models.Soils;
using Models.Utilities;
using APSIM.Shared.Utilities;

namespace Models
{
	[Serializable]
	public class Script : Model
	{
		[Link] Clock Clock;
		[Link] Summary Summary;
		[ScopedLinkByName] Manager Man1;
		//[Link] Zone zone;
		
		public int Var3 { get; set; }
	
		[EventSubscribe("DoManagement")]
		private void OnDoManagement(object sender, EventArgs e)
		{
			//Var3 = Man1.Get("Manager.Var1") * 15;
			//Var3 = Man1.Get("[Script].Var1") * 15;
			//[Man3]: 'Models.Manager' does not contain a definition for 'Get' and no extension method 'Get' accepting a first argument of type 'Models.Manager' could be found (are you missing a using directive or an assembly reference?). Line number: 23

			//Var3 = (int)zone.Get("[Man1].Script.Var1") * 15;
			//myVariable = Man1.Get("Script.Var1");
		}
		
	}
}
```
      Soil: SoilType=Black Vertosol; LocalName=Waco; Site=Jimbour; NearestTown=Jimbour, Q 4352; Region=South East Queensland; NaturalVegetation=Grassland, mainly Qld bluegrass; Latitude=0; Longitude=0
        Water
          Thickness  BD    AirDry  LL15  DUL   SAT
          150        1.02  0.15    0.29  0.54  0.59
          150        1.03  0.26    0.29  0.53  0.58
          300        1.02  0.29    0.29  0.54  0.59
          300        1.02  0.29    0.29  0.54  0.58
          300        1.06  0.3     0.3   0.52  0.57
          300        1.11  0.31    0.31  0.5   0.55
          300        1.12  0.32    0.32  0.5   0.55
          300        1.15  0.33    0.33  0.48  0.53
          300        1.18  0.34    0.34  0.47  0.52
          300        1.2   0.35    0.35  0.46  0.51
          300        1.25  0.36    0.36  0.44  0.49
          SoilCrop WheatSoil
            LL=[0.29, 0.29, 0.32, 0.38, 0.39, 0.39, 0.41, 0.48, 0.47, 0.46, 0.44]
            KL=[0.1, 0.1, 0.08, 0.06, 0.04, 0.02, 0.01, 0, 0, 0, 0]
            XF=[1, 1, 1, 1, 1, 1, 1, 0, 0, 0, 0]
          SoilCrop BarleySoil
            LL=[0.29, 0.29, 0.36, 0.43, 0.51, 0.5, 0.5, 0.48, 0.47, 0.46, 0.44]
            KL=[0.1, 0.1, 0.08, 0.06, 0.04, 0.02, 0.01, 0, 0, 0, 0]
            XF=[1, 1, 1, 1, 1, 1, 1, 0, 0, 0, 0]
          SoilCrop PotatoSoil
            LL=[0.29, 0.29, 0.36, 0.43, 0.51, 0.5, 0.5, 0.48, 0.47, 0.46, 0.44]
            KL=[0.1, 0.1, 0.08, 0.06, 0.04, 0.02, 0.01, 0, 0, 0, 0]
            XF=[1, 1, 1, 1, 1, 1, 1, 0, 0, 0, 0]
        SoilWater: SummerDate=1-Nov; SummerU=6; SummerCona=3; WinterDate=1-Apr; WinterU=6; WinterCona=3; DiffusConst=40; DiffusSlope=16; Salb=0.13; CN2Bare=73; CNRed=20; CNCov=0.8; slope=0; discharge_width=0; catchment_area=0; max_pond=0; residueinterception=0
          Thickness  SWCON  KLAT
          150        0.3    0
          150        0.3    0
          300        0.3    0
          300        0.3    0
          300        0.3    0
          300        0.3    0
          300        0.3    0
          300        0.3    0
          300        0.3    0
          300        0.3    0
          300        0.3    0
        SoilNitrogen: fom_type=[default, manure, mucuna, lablab, shemp, stable]; fract_carb=[0.2, 0.3, 0.54, 0.57, 0.45, 0]; fract_cell=[0.7, 0.3, 0.37, 0.37, 0.47, 0.1]; fract_lign=[0.1, 0.4, 0.09, 0.06, 0.08, 0.9]; wfpsN2N2O_x=[22, 88]; wfpsN2N2O_y=[0.1, 1]
        SoilOrganicMatter: RootCN=40; RootWt=200; SoilCN=12.5; EnrACoeff=7.4; EnrBCoeff=0.2; OCUnits=Total
          Thickness  OC    FBiom  FInert
          150        1.04  0.025  0.4
          150        0.89  0.02   0.6
          300        0.89  0.015  0.8
          300        0.89  0.01   0.9
          300        0.77  0.01   0.95
          300        0.45  0.01   0.95
          300        0.27  0.01   0.95
          300        0.22  0.01   0.95
          300        0.16  0.01   0.95
          300        0.13  0.01   0.95
          300        0.12  0.01   0.95
        Analysis: PHUnits=Water; BoronUnits=HotWater
          Thickness  EC    PH
          150        0.2   8.4
          150        0.25  8.8
          300        0.31  9
          300        0.4   9.2
          300        0.59  9.2
          300        0.84  9.1
          300        0.93  9
          300        1.01  9
          300        1.06  8.9
          300        1.05  8.9
          300        1.01  8.9
        InitialWater Initial water: PercentMethod=FilledFromTop; FractionFull=1
        Sample: NO3Units=ppm; NH4Units=ppm; SWUnits=Volumetric; OCUnits=Total; PHUnits=Water
          Thickness  NO3     NH4
          150        1116.5  0.599004
          150        2.101   0.100001
          300        2.101   0.100001
          300        1.701   0.100001
          300        1.701   0.100001
          300        1.701   0.100001
          300        1.701   0.100001
          300        1.701   0.100001
          300        1.701   0.100001
          300        1.701   0.100001
          300        1.701   0.100001
        CERESSoilTemperature
      SurfaceOrganicMatter: PoolName=Potato; type=Potato; mass=1000; standing_fraction=0; cnr=80; CriticalResidueWeight=2000; OptimumDecompTemp=20; MaxCumulativeEOS=20; CNRatioDecompCoeff=0.277; CNRatioDecompThreshold=25; TotalLeachRain=25; MinRainToLeach=10; CriticalMinimumOrganicC=0.004; DefaultCPRatio=0; DefaultStandingFraction=0; StandingExtinctCoeff=0.5; FractionFaecesAdded=0.5
        Pools:
          {PoolName=Potato, ResidueType=Potato, Mass=1000, CNRatio=80, StandingFraction=0}
        ResidueTypes ResidueTypesList: LoadFromResource=ResidueTypes
          ResidueType: fom_type=wheat; fraction_C=0.4; po4ppm=0; nh4ppm=0; no3ppm=0; specific_area=0.0005; cf_contrib=1; pot_decomp_rate=0.1; fr_c=[0.2, 0.7, 0.1]; fr_n=[0.2, 0.7, 0.1]; fr_p=[0.2, 0.7, 0.1]
          ResidueType: fom_type=lucerne; fraction_C=0.4; po4ppm=0; nh4ppm=0; no3ppm=0; specific_area=0.0002; cf_contrib=1; pot_decomp_rate=0.1; fr_c=[0.2, 0.7, 0.1]; fr_n=[0.2, 0.7, 0.1]; fr_p=[0.2, 0.7, 0.1]
          ResidueType: fom_type=barley; fraction_C=0.4; po4ppm=0; nh4ppm=0; no3ppm=0; specific_area=0.0005; cf_contrib=1; pot_decomp_rate=0.1; fr_c=[0.2, 0.7, 0.1]; fr_n=[0.2, 0.7, 0.1]; fr_p=[0.2, 0.7, 0.1]
          ResidueType: fom_type=tithonia; fraction_C=0.4; po4ppm=0; nh4ppm=0; no3ppm=0; specific_area=0.0005; cf_contrib=1; pot_decomp_rate=0.1; fr_c=[0.2, 0.7, 0.1]; fr_n=[0.2, 0.7, 0.1]; fr_p=[0.2, 0.7, 0.1]
          ResidueType: fom_type=bambatsi; fraction_C=0.4; po4ppm=0; nh4ppm=0; no3ppm=0; specific_area=0.0005; cf_contrib=1; pot_decomp_rate=0.1; fr_c=[0.2, 0.7, 0.1]; fr_n=[0.2, 0.7, 0.1]; fr_p=[0.2, 0.7, 0.1]
          ResidueType: fom_type=barley; fraction_C=0.4; po4ppm=0; nh4ppm=0; no3ppm=0; specific_area=0.0005; cf_contrib=1; pot_decomp_rate=0.1; fr_c=[0.2, 0.7, 0.1]; fr_n=[0.2, 0.7, 0.1]; fr_p=[0.2, 0.7, 0.1]
          ResidueType: fom_type=broccoli; fraction_C=0.4; po4ppm=0; nh4ppm=0; no3ppm=0; specific_area=0.0004; cf_contrib=1; pot_decomp_rate=0.1; fr_c=[0.2, 0.7, 0.1]; fr_n=[0.2, 0.7, 0.1]; fr_p=[0.2, 0.7, 0.1]
          ResidueType: fom_type=butterflypea; fraction_C=0.4; po4ppm=0; nh4ppm=0; no3ppm=0; specific_area=0.0004; cf_contrib=1; pot_decomp_rate=0.1; fr_c=[0.2, 0.7, 0.1]; fr_n=[0.2, 0.7, 0.1]; fr_p=[0.2, 0.7, 0.1]
          ResidueType: fom_type=camaldulensis; fraction_C=0.4; po4ppm=0; nh4ppm=0; no3ppm=0; specific_area=0.0002; cf_contrib=1; pot_decomp_rate=0.1; fr_c=[0.2, 0.7, 0.1]; fr_n=[0.2, 0.7, 0.1]; fr_p=[0.2, 0.7, 0.1]
          ResidueType: fom_type=canola; fraction_C=0.4; po4ppm=0; nh4ppm=0; no3ppm=0; specific_area=0.0002; cf_contrib=1; pot_decomp_rate=0.1; fr_c=[0.2, 0.7, 0.1]; fr_n=[0.2, 0.7, 0.1]; fr_p=[0.2, 0.7, 0.1]
          ResidueType: fom_type=centro; fraction_C=0.4; po4ppm=0; nh4ppm=0; no3ppm=0; specific_area=0.0004; cf_contrib=1; pot_decomp_rate=0.1; fr_c=[0.2, 0.7, 0.1]; fr_n=[0.2, 0.7, 0.1]; fr_p=[0.2, 0.7, 0.1]
          ResidueType: fom_type=chickpea; fraction_C=0.4; po4ppm=0; nh4ppm=0; no3ppm=0; specific_area=0.0002; cf_contrib=1; pot_decomp_rate=0.1; fr_c=[0.2, 0.7, 0.1]; fr_n=[0.2, 0.7, 0.1]; fr_p=[0.2, 0.7, 0.1]
          ResidueType: fom_type=cowpea; fraction_C=0.4; po4ppm=0; nh4ppm=0; no3ppm=0; specific_area=0.0002; cf_contrib=1; pot_decomp_rate=0.1; fr_c=[0.2, 0.7, 0.1]; fr_n=[0.2, 0.7, 0.1]; fr_p=[0.2, 0.7, 0.1]
          ResidueType: fom_type=danthonia; fraction_C=0.4; po4ppm=0; nh4ppm=0; no3ppm=0; specific_area=0.0005; cf_contrib=1; pot_decomp_rate=0.1; fr_c=[0.2, 0.7, 0.1]; fr_n=[0.2, 0.7, 0.1]; fr_p=[0.2, 0.7, 0.1]
          ResidueType: fom_type=nativepasture; fraction_C=0.4; po4ppm=0; nh4ppm=0; no3ppm=0; specific_area=0.0005; cf_contrib=1; pot_decomp_rate=0.1; fr_c=[0.2, 0.7, 0.1]; fr_n=[0.2, 0.7, 0.1]; fr_p=[0.2, 0.7, 0.1]
          ResidueType: fom_type=pasture; fraction_C=0.4; po4ppm=0; nh4ppm=0; no3ppm=0; specific_area=0.0005; cf_contrib=1; pot_decomp_rate=0.1; fr_c=[0.2, 0.7, 0.1]; fr_n=[0.2, 0.7, 0.1]; fr_p=[0.2, 0.7, 0.1]
          ResidueType: fom_type=globulus; fraction_C=0.4; po4ppm=0; nh4ppm=0; no3ppm=0; specific_area=0.0002; cf_contrib=1; pot_decomp_rate=0.1; fr_c=[0.2, 0.7, 0.1]; fr_n=[0.2, 0.7, 0.1]; fr_p=[0.2, 0.7, 0.1]
          ResidueType: fom_type=grandis; fraction_C=0.4; po4ppm=0; nh4ppm=0; no3ppm=0; specific_area=0.0002; cf_contrib=1; pot_decomp_rate=0.1; fr_c=[0.2, 0.7, 0.1]; fr_n=[0.2, 0.7, 0.1]; fr_p=[0.2, 0.7, 0.1]
          ResidueType: fom_type=oilmallee; fraction_C=0.4; po4ppm=0; nh4ppm=0; no3ppm=0; specific_area=0.0002; cf_contrib=1; pot_decomp_rate=0.1; fr_c=[0.2, 0.7, 0.1]; fr_n=[0.2, 0.7, 0.1]; fr_p=[0.2, 0.7, 0.1]
          ResidueType: fom_type=fababean; fraction_C=0.4; po4ppm=0; nh4ppm=0; no3ppm=0; specific_area=0.0002; cf_contrib=1; pot_decomp_rate=0.1; fr_c=[0.2, 0.7, 0.1]; fr_n=[0.2, 0.7, 0.1]; fr_p=[0.2, 0.7, 0.1]
          ResidueType: fom_type=fieldpea; fraction_C=0.4; po4ppm=0; nh4ppm=0; no3ppm=0; specific_area=0.0002; cf_contrib=1; pot_decomp_rate=0.1; fr_c=[0.2, 0.7, 0.1]; fr_n=[0.2, 0.7, 0.1]; fr_p=[0.2, 0.7, 0.1]
          ResidueType: fom_type=grass; fraction_C=0.4; po4ppm=0; nh4ppm=0; no3ppm=0; specific_area=0.0004; cf_contrib=1; pot_decomp_rate=0.1; fr_c=[0.2, 0.7, 0.1]; fr_n=[0.2, 0.7, 0.1]; fr_p=[0.2, 0.7, 0.1]
          ResidueType: fom_type=lablab; fraction_C=0.4; po4ppm=0; nh4ppm=0; no3ppm=0; specific_area=0.0002; cf_contrib=1; pot_decomp_rate=0.1; fr_c=[0.2, 0.7, 0.1]; fr_n=[0.2, 0.7, 0.1]; fr_p=[0.2, 0.7, 0.1]
          ResidueType: fom_type=lentil; fraction_C=0.4; po4ppm=0; nh4ppm=0; no3ppm=0; specific_area=0.0002; cf_contrib=1; pot_decomp_rate=0.1; fr_c=[0.2, 0.7, 0.1]; fr_n=[0.2, 0.7, 0.1]; fr_p=[0.2, 0.7, 0.1]
          ResidueType: fom_type=lolium_rigidum; fraction_C=0.4; po4ppm=0; nh4ppm=0; no3ppm=0; specific_area=0.0002; cf_contrib=1; pot_decomp_rate=0.1; fr_c=[0.2, 0.7, 0.1]; fr_n=[0.2, 0.7, 0.1]; fr_p=[0.2, 0.7, 0.1]
          ResidueType: fom_type=lucerne; fraction_C=0.4; po4ppm=0; nh4ppm=0; no3ppm=0; specific_area=0.0002; cf_contrib=1; pot_decomp_rate=0.1; fr_c=[0.2, 0.7, 0.1]; fr_n=[0.2, 0.7, 0.1]; fr_p=[0.2, 0.7, 0.1]
          ResidueType: fom_type=lupin; fraction_C=0.4; po4ppm=0; nh4ppm=0; no3ppm=0; specific_area=0.0002; cf_contrib=1; pot_decomp_rate=0.1; fr_c=[0.2, 0.7, 0.1]; fr_n=[0.2, 0.7, 0.1]; fr_p=[0.2, 0.7, 0.1]
          ResidueType: fom_type=maize; fraction_C=0.4; po4ppm=0; nh4ppm=0; no3ppm=0; specific_area=0.0004; cf_contrib=1; pot_decomp_rate=0.1; fr_c=[0.2, 0.7, 0.1]; fr_n=[0.2, 0.7, 0.1]; fr_p=[0.2, 0.7, 0.1]
          ResidueType: fom_type=medic; fraction_C=0.4; po4ppm=0; nh4ppm=0; no3ppm=0; specific_area=0.0002; cf_contrib=1; pot_decomp_rate=0.1; fr_c=[0.2, 0.7, 0.1]; fr_n=[0.2, 0.7, 0.1]; fr_p=[0.2, 0.7, 0.1]
          ResidueType: fom_type=millet; fraction_C=0.4; po4ppm=0; nh4ppm=0; no3ppm=0; specific_area=0.0004; cf_contrib=1; pot_decomp_rate=0.1; fr_c=[0.2, 0.7, 0.1]; fr_n=[0.2, 0.7, 0.1]; fr_p=[0.2, 0.7, 0.1]
          ResidueType: fom_type=mucuna; fraction_C=0.4; po4ppm=0; nh4ppm=0; no3ppm=0; specific_area=0.0002; cf_contrib=1; pot_decomp_rate=0.1; fr_c=[0.2, 0.7, 0.1]; fr_n=[0.2, 0.7, 0.1]; fr_p=[0.2, 0.7, 0.1]
          ResidueType: fom_type=mungbean; fraction_C=0.4; po4ppm=0; nh4ppm=0; no3ppm=0; specific_area=0.0002; cf_contrib=1; pot_decomp_rate=0.1; fr_c=[0.2, 0.7, 0.1]; fr_n=[0.2, 0.7, 0.1]; fr_p=[0.2, 0.7, 0.1]
          ResidueType: fom_type=horsegram; fraction_C=0.4; po4ppm=0; nh4ppm=0; no3ppm=0; specific_area=0.0002; cf_contrib=1; pot_decomp_rate=0.1; fr_c=[0.2, 0.7, 0.1]; fr_n=[0.2, 0.7, 0.1]; fr_p=[0.2, 0.7, 0.1]
          ResidueType: fom_type=navybean; fraction_C=0.4; po4ppm=0; nh4ppm=0; no3ppm=0; specific_area=0.0002; cf_contrib=1; pot_decomp_rate=0.1; fr_c=[0.2, 0.7, 0.1]; fr_n=[0.2, 0.7, 0.1]; fr_p=[0.2, 0.7, 0.1]
          ResidueType: fom_type=frenchbean; fraction_C=0.4; po4ppm=0; nh4ppm=0; no3ppm=0; specific_area=0.0002; cf_contrib=1; pot_decomp_rate=0.1; fr_c=[0.2, 0.7, 0.1]; fr_n=[0.2, 0.7, 0.1]; fr_p=[0.2, 0.7, 0.1]
          ResidueType: fom_type=cotton; fraction_C=0.4; po4ppm=0; nh4ppm=0; no3ppm=0; specific_area=0.0002; cf_contrib=1; pot_decomp_rate=0.1; fr_c=[0.2, 0.7, 0.1]; fr_n=[0.2, 0.7, 0.1]; fr_p=[0.2, 0.7, 0.1]
          ResidueType: fom_type=oats; fraction_C=0.4; po4ppm=0; nh4ppm=0; no3ppm=0; specific_area=0.0005; cf_contrib=1; pot_decomp_rate=0.1; fr_c=[0.2, 0.7, 0.1]; fr_n=[0.2, 0.7, 0.1]; fr_p=[0.2, 0.7, 0.1]
          ResidueType: fom_type=oilpalmunderstory; fraction_C=0.4; po4ppm=0; nh4ppm=0; no3ppm=0; specific_area=0.0002; cf_contrib=1; pot_decomp_rate=0.1; fr_c=[0.2, 0.7, 0.1]; fr_n=[0.2, 0.7, 0.1]; fr_p=[0.2, 0.7, 0.1]
          ResidueType: fom_type=orobanche; fraction_C=0.4; po4ppm=0; nh4ppm=0; no3ppm=0; specific_area=0.0002; cf_contrib=1; pot_decomp_rate=0.1; fr_c=[0.2, 0.7, 0.1]; fr_n=[0.2, 0.7, 0.1]; fr_p=[0.2, 0.7, 0.1]
          ResidueType: fom_type=peanut; fraction_C=0.4; po4ppm=0; nh4ppm=0; no3ppm=0; specific_area=0.0002; cf_contrib=1; pot_decomp_rate=0.1; fr_c=[0.2, 0.7, 0.1]; fr_n=[0.2, 0.7, 0.1]; fr_p=[0.2, 0.7, 0.1]
          ResidueType: fom_type=pigeonpea; fraction_C=0.4; po4ppm=0; nh4ppm=0; no3ppm=0; specific_area=0.0002; cf_contrib=1; pot_decomp_rate=0.1; fr_c=[0.2, 0.7, 0.1]; fr_n=[0.2, 0.7, 0.1]; fr_p=[0.2, 0.7, 0.1]
          ResidueType: fom_type=poppies; fraction_C=0.4; po4ppm=0; nh4ppm=0; no3ppm=0; specific_area=0.0005; cf_contrib=1; pot_decomp_rate=0.1; fr_c=[0.2, 0.7, 0.1]; fr_n=[0.2, 0.7, 0.1]; fr_p=[0.2, 0.7, 0.1]
          ResidueType: fom_type=potato; fraction_C=0.4; po4ppm=0; nh4ppm=0; no3ppm=0; specific_area=0.0005; cf_contrib=1; pot_decomp_rate=0.1; fr_c=[0.2, 0.7, 0.1]; fr_n=[0.2, 0.7, 0.1]; fr_p=[0.2, 0.7, 0.1]
          ResidueType: fom_type=raphanus_raphanistrum; fraction_C=0.4; po4ppm=0; nh4ppm=0; no3ppm=0; specific_area=0.0002; cf_contrib=1; pot_decomp_rate=0.1; fr_c=[0.2, 0.7, 0.1]; fr_n=[0.2, 0.7, 0.1]; fr_p=[0.2, 0.7, 0.1]
          ResidueType: fom_type=rice; fraction_C=0.4; po4ppm=0; nh4ppm=0; no3ppm=0; specific_area=0.0005; cf_contrib=1; pot_decomp_rate=0.1; fr_c=[0.2, 0.7, 0.1]; fr_n=[0.2, 0.7, 0.1]; fr_p=[0.2, 0.7, 0.1]
          ResidueType: fom_type=soybean; fraction_C=0.4; po4ppm=0; nh4ppm=0; no3ppm=0; specific_area=0.0002; cf_contrib=1; pot_decomp_rate=0.1; fr_c=[0.2, 0.7, 0.1]; fr_n=[0.2, 0.7, 0.1]; fr_p=[0.2, 0.7, 0.1]
          ResidueType: fom_type=sorghum; fraction_C=0.4; po4ppm=0; nh4ppm=0; no3ppm=0; specific_area=0.0004; cf_contrib=1; pot_decomp_rate=0.1; fr_c=[0.2, 0.7, 0.1]; fr_n=[0.2, 0.7, 0.1]; fr_p=[0.2, 0.7, 0.1]
          ResidueType: fom_type=stylo; fraction_C=0.4; po4ppm=0; nh4ppm=0; no3ppm=0; specific_area=0.0002; cf_contrib=1; pot_decomp_rate=0.1; fr_c=[0.2, 0.7, 0.1]; fr_n=[0.2, 0.7, 0.1]; fr_p=[0.2, 0.7, 0.1]
          ResidueType: fom_type=sugar; fraction_C=0.4; po4ppm=0; nh4ppm=0; no3ppm=0; specific_area=0.0007; cf_contrib=1; pot_decomp_rate=0.1; fr_c=[0.2, 0.7, 0.1]; fr_n=[0.2, 0.7, 0.1]; fr_p=[0.2, 0.7, 0.1]
          ResidueType: fom_type=sunflower; fraction_C=0.4; po4ppm=0; nh4ppm=0; no3ppm=0; specific_area=0.0002; cf_contrib=1; pot_decomp_rate=0.1; fr_c=[0.2, 0.7, 0.1]; fr_n=[0.2, 0.7, 0.1]; fr_p=[0.2, 0.7, 0.1]
          ResidueType: fom_type=sweetcorn; fraction_C=0.4; po4ppm=0; nh4ppm=0; no3ppm=0; specific_area=0.0004; cf_contrib=1; pot_decomp_rate=0.1; fr_c=[0.2, 0.7, 0.1]; fr_n=[0.2, 0.7, 0.1]; fr_p=[0.2, 0.7, 0.1]
          ResidueType: fom_type=sweetsorghum; fraction_C=0.4; po4ppm=0; nh4ppm=0; no3ppm=0; specific_area=0.0004; cf_contrib=1; pot_decomp_rate=0.1; fr_c=[0.2, 0.7, 0.1]; fr_n=[0.2, 0.7, 0.1]; fr_p=[0.2, 0.7, 0.1]
          ResidueType: fom_type=vetch; fraction_C=0.4; po4ppm=0; nh4ppm=0; no3ppm=0; specific_area=0.0002; cf_contrib=1; pot_decomp_rate=0.1; fr_c=[0.2, 0.7, 0.1]; fr_n=[0.2, 0.7, 0.1]; fr_p=[0.2, 0.7, 0.1]
          ResidueType: fom_type=weed; fraction_C=0.4; po4ppm=0; nh4ppm=0; no3ppm=0; specific_area=0.0004; cf_contrib=1; pot_decomp_rate=0.1; fr_c=[0.2, 0.7, 0.1]; fr_n=[0.2, 0.7, 0.1]; fr_p=[0.2, 0.7, 0.1]
          ResidueType: fom_type=WF_Millet; fraction_C=0.4; po4ppm=0; nh4ppm=0; no3ppm=0; specific_area=0.0004; cf_contrib=1; pot_decomp_rate=0.1; fr_c=[0.2, 0.7, 0.1]; fr_n=[0.2, 0.7, 0.1]; fr_p=[0.2, 0.7, 0.1]
          ResidueType: fom_type=wheat; fraction_C=0.4; po4ppm=0; nh4ppm=0; no3ppm=0; specific_area=0.0005; cf_contrib=1; pot_decomp_rate=0.1; fr_c=[0.2, 0.7, 0.1]; fr_n=[0.2, 0.7, 0.1]; fr_p=[0.2, 0.7, 0.1]
          ResidueType: fom_type=inert; fraction_C=0.4; po4ppm=0; nh4ppm=0; no3ppm=0; specific_area=0.0005; cf_contrib=1; pot_decomp_rate=0; fr_c=[0.2, 0.7, 0.1]; fr_n=[0.2, 0.7, 0.1]; fr_p=[0.2, 0.7, 0.1]
          ResidueType: fom_type=slurp; fraction_C=0.4; po4ppm=0; nh4ppm=0; no3ppm=0; specific_area=0.0005; cf_contrib=1; pot_decomp_rate=0.1; fr_c=[0.2, 0.7, 0.1]; fr_n=[0.2, 0.7, 0.1]; fr_p=[0.2, 0.7, 0.1]
          ResidueType: fom_type=manure; fraction_C=0.08; po4ppm=10; nh4ppm=10; no3ppm=10; specific_area=0.0001; cf_contrib=1; pot_decomp_rate=0.1; fr_c=[0.3, 0.3, 0.4]; fr_n=[0.3, 0.3, 0.4]; fr_p=[0.3, 0.3, 0.4]
          ResidueType: fom_type=RuminantDung_PastureFed; fraction_C=0.4; po4ppm=5; nh4ppm=1250; no3ppm=0; specific_area=0.0001; cf_contrib=1; pot_decomp_rate=0.1; fr_c=[0.3, 0.5, 0.2]; fr_n=[0.3, 0.5, 0.2]; fr_p=[0.3, 0.5, 0.2]
          ResidueType: fom_type=algae; fraction_C=0.4; po4ppm=0; nh4ppm=0; no3ppm=0; specific_area=0.0005; cf_contrib=1; pot_decomp_rate=0.1; fr_c=[0.2, 0.7, 0.1]; fr_n=[0.2, 0.7, 0.1]; fr_p=[0.2, 0.7, 0.1]
          ResidueType: fom_type=fym; fraction_C=0.8; po4ppm=40; nh4ppm=10; no3ppm=10; specific_area=0.0001; cf_contrib=1; pot_decomp_rate=0.1; fr_c=[0.3, 0.3, 0.4]; fr_n=[0.3, 0.3, 0.4]; fr_p=[0.3, 0.3, 0.4]
          ResidueType: fom_type=goatmanure; fraction_C=0.8; po4ppm=5; nh4ppm=1307; no3ppm=481; specific_area=0.0001; cf_contrib=1; pot_decomp_rate=0.1; fr_c=[0.3, 0.6, 0.3]; fr_n=[0.3, 0.6, 0.3]; fr_p=[0.3, 0.6, 0.34]
          ResidueType: fom_type=cm; fraction_C=0.277; po4ppm=5; nh4ppm=2558; no3ppm=873; specific_area=0.0001; cf_contrib=1; pot_decomp_rate=0.1; fr_c=[0, 0.5, 0.5]; fr_n=[0, 0.5, 0.5]; fr_p=[0, 0.5, 0.5]
          ResidueType: fom_type=cmA; fraction_C=0.374; po4ppm=5; nh4ppm=1307; no3ppm=481; specific_area=0.0001; cf_contrib=1; pot_decomp_rate=0.1; fr_c=[0, 0.5, 0.5]; fr_n=[0, 0.5, 0.5]; fr_p=[0, 0.5, 0.5]
          ResidueType: fom_type=cmB; fraction_C=0.24; po4ppm=5; nh4ppm=3009; no3ppm=36; specific_area=0.0001; cf_contrib=1; pot_decomp_rate=0.1; fr_c=[0, 0.5, 0.5]; fr_n=[0, 0.5, 0.5]; fr_p=[0, 0.5, 0.5]
          ResidueType: fom_type=manB; fraction_C=0.08; po4ppm=5; nh4ppm=1307; no3ppm=481; specific_area=0.0001; cf_contrib=1; pot_decomp_rate=0.1; fr_c=[0.1, 0.01, 0.89]; fr_n=[0.1, 0.01, 0.89]; fr_p=[0.1, 0.01, 0.89]
          ResidueType: fom_type=oilpalm; fraction_C=0.44; po4ppm=0; nh4ppm=0; no3ppm=0; specific_area=0.0002; cf_contrib=1; pot_decomp_rate=0.05; fr_c=[0.2, 0.7, 0.1]; fr_n=[0.2, 0.7, 0.1]; fr_p=[0.2, 0.7, 0.1]
          ResidueType: fom_type=oilpalmstem; fraction_C=0.44; po4ppm=0; nh4ppm=0; no3ppm=0; specific_area=5E-06; cf_contrib=1; pot_decomp_rate=0.1; fr_c=[0.2, 0.7, 0.1]; fr_n=[0.2, 0.7, 0.1]; fr_p=[0.2, 0.7, 0.1]
          ResidueType Potato: fom_type=inert; fraction_C=0.08; po4ppm=10; nh4ppm=10; no3ppm=10; specific_area=0.0001; cf_contrib=1; pot_decomp_rate=0.1; fr_c=[0.3, 0.3, 0.4]; fr_n=[0.3, 0.3, 0.4]; fr_p=[0.3, 0.3, 0.4]
        TillageTypes
      MicroClimate: a_interception=0; b_interception=1; c_interception=0; d_interception=0; soil_albedo=0.3; sun_angle=15; soil_heat_flux_fraction=0.4; night_interception_fraction=0.5; refheight=2; albedo=0.293662; emissivity=0.96; RadIntTotal=0
      SoluteManager
